# OpenSim document version 30512
Model FBKnee:
  gravity: 0 -9.80665 0
  length_units: m
  force_units: N
  defaults: Thelen2003Muscle default: optimal_fiber_length=0 pennation_angle_at_optimal=0 [radians]
      max_contraction_velocity=10 FmaxTendonStrain=0.05 FmaxMuscleStrain=1 KshapeActive=0.35 KshapePassive=4 Af=0.3
      Flen=1.5 activation_time_constant=0.01 [seconds] deactivation_time_constant=0.03 [seconds]
  WISCO_ContactMesh femurMesh: socket_parent_frame_connectee_name=femur_distal_r file_name=ACLC01-R-femur-cart.stl
    PhysicalOffsetFrame mesh_frame: socket_parent_connectee_name=../../femur_distal_r translation=(0 0 0)
  WISCO_ContactMesh tibiaMesh: socket_parent_frame_connectee_name=tibia_proximal_r file_name=ACLC01-R-tibia-cart.stl
    PhysicalOffsetFrame mesh_frame: socket_parent_connectee_name=../../tibia_proximal_r translation=(0 0 0)
  WISCO_ContactMesh patellaMesh: socket_parent_frame_connectee_name=patella_r file_name=ACLC01-R-patella.stl
    PhysicalOffsetFrame mesh_frame: socket_parent_connectee_name=../../patella_r translation=(0 0 0)
  Ground
  BodySet:
    Body pelvis: mass=8.3775 [kg] mass_center=(-0.0893 -0.025796 0) inertia=(0.053993 0.061279 0.067263 0 0 0)
        meshes=(pelvis.vtp pelvflip.vtp sacrum.vtp)
      WrapEllipsoid PS_at_brim_r: translation=(-0.0798 -0.0654 0.0656) quadrant=all dimensions=(0.052 0.0492 0.071)
      WrapEllipsoid IL_at_brim_r: translation=(-0.0685 -0.0557 0.0756) quadrant=all dimensions=(0.0549 0.0665 0.071)
      WrapEllipsoid Gmax_at_pelvis_r: xyz_body_rotation=(-0.637045 0.383623 -0.684867)
          translation=(-0.0795 -0.0825 0.0665) quadrant=all dimensions=(0.04 0.04 0.06)
      WrapEllipsoid PS_at_brim_l: translation=(-0.0798 -0.0654 -0.0656) quadrant=all dimensions=(0.052 0.0492 0.071)
      WrapEllipsoid IL_at_brim_l: translation=(-0.0685 -0.0557 -0.0756) quadrant=all dimensions=(0.0549 0.0665 0.071)
      WrapEllipsoid Gmax_at_pelvis_l: xyz_body_rotation=(0.637045 -0.383623 -0.684867)
          translation=(-0.0795 -0.0825 -0.0665) quadrant=all dimensions=(0.04 0.04 0.06)
    Body femur_r: mass=10.1325 mass_center=(0 -0.162162 0) inertia=(0.171988 0.035276 0.171988 0 0 0)
      WrapEllipsoid AB_at_femshaft_r: xyz_body_rotation=(0.111701 0 0.176278)
          translation=(0.0146011 -0.117162 0.025469) quadrant=all dimensions=(0.0165 0.07 0.021)
      WrapEllipsoid AL_at_femshaft_r: xyz_body_rotation=(0.111701 0 0.0541052)
          translation=(0.0308673 -0.23799 0.0119159) quadrant=all dimensions=(0.0201 0.1 0.018)
      WrapEllipsoid AMprox_at_femshaft_r: xyz_body_rotation=(0.111701 0 0.211185)
          translation=(0.00603642 -0.0775977 0.0299068) quadrant=all dimensions=(0.0211 0.07 0.032)
      WrapEllipsoid AMmid_at_femshaft_r: xyz_body_rotation=(0.111701 0 0.123918)
          translation=(0.0230125 -0.160711 0.0205842) quadrant=all dimensions=(0.0214 0.12 0.031)
      WrapEllipsoid AMdist_at_femshaft_r: xyz_body_rotation=(0.111701 0 0.176278)
          translation=(0.0307071 -0.260769 0.00936092) quadrant=all dimensions=(0.0218 0.2 0.0215)
      WrapEllipsoid AMisch_at_condyles_r: xyz_body_rotation=(0.111701 0 -0.434587)
          translation=(-0.0286471 -0.376993 -0.00367576) quadrant=all dimensions=(0.05 0.24 0.0402)
      WrapEllipsoid PECT_at_femshaft_r: xyz_body_rotation=(0.111701 0 0.211185)
          translation=(0.00762137 -0.0852965 0.0290433) quadrant=all dimensions=(0.0166 0.05 0.0131)
      WrapCylinder KnExt_at_fem_r: translation=(0.01 -0.397 0) quadrant=x radius=0.028 length=0.2
      WrapCylinder KnExt_vasint_at_fem_r: translation=(0.01 -0.397 0) quadrant=x radius=0.026 length=0.2
      WrapEllipsoid Gastroc_at_Condyles_r: xyz_body_rotation=(0.0589921 -0.0872665 0.0232129)
          translation=(0.01 -0.4075 0.0003) quadrant=all dimensions=(0.03 0.025 0.15)
    Body femur_distal_r: mass=0.01 mass_center=(0 0 0) inertia=(0.001 0.001 0.001 0 0 0)
        meshes=(ACLC01-R-femur-cart-volume.vtp ACLC01-R-femur-060914.vtp)
      WrapCylinder Capsule_r: xyz_body_rotation=(-0.0299066 0.02 0.331613) translation=(-0.004 -0.003 0) quadrant=all
          radius=0.018 length=0.5
    Body patella_r: mass=0.4875 mass_center=(0.0018 0.0264 0) inertia=(1.6e-5 7.4e-5 7.4e-5 0 0 0)
        meshes=(ACLC01-R-patella-cart-060914.vtp ACLC01-R-patella-060914.vtp)
      WrapEllipsoid PatTen_r: xyz_body_rotation=(0 0 0.01) translation=(0.0005 -0.009389232 0.00048233) quadrant=all
          dimensions=(0.005 0.008 0.012)
    Body tibia_proximal_r: mass=0.01 mass_center=(0 0 0) inertia=(0.001 0.001 0.001 0 0 0)
        meshes=(ACLC01-R-tibia-cart-111214.vtp ACLC01-R-tibia-111214.vtp ACLC01-R-fibula-111214.vtp)
      WrapEllipsoid Med_Lig_r: xyz_body_rotation=(-0.104907 -0.0349066 0.181613) translation=(0.001 -0.0346 -0.0187)
          quadrant=all dimensions=(0.03 0.018 0.012)
      WrapEllipsoid Med_LigP_r: xyz_body_rotation=(-0.139813 0.349066 0.181613) translation=(-0.0104 -0.0314 -0.0227)
          quadrant=all dimensions=(0.025 0.0054 0.0053)
    Body tibia_r: mass=3.2475 mass_center=(0 -0.171713 0) inertia=(0.029999 0.005157 0.031231 0 0 0)
      WrapEllipsoid GR_at_condyles_r: xyz_body_rotation=(0 0 -0.18326) translation=(0 0 0) quadrant=all
          dimensions=(0.036 0.0635 0.0533)
      WrapEllipsoid SM_at_condyles_r: xyz_body_rotation=(0 0 -0.296706) translation=(0 0 0) quadrant=all
          dimensions=(0.0352 0.0602 0.0489)
      WrapEllipsoid ST_at_condyles_r: xyz_body_rotation=(0 0 -0.270526) translation=(0 0 0) quadrant=all
          dimensions=(0.0425 0.069 0.0572)
      WrapCylinder BFLH_at_gastroc_r: translation=(-0.0316 -0.0443 0) quadrant=y radius=0.01 length=0.1
      WrapCylinder Gastroc_at_Shank_r: xyz_body_rotation=(2.96723 0.0289725 -1.47812)
          translation=(-0.0074 -0.074 -0.0033) quadrant=-y radius=0.055 length=0.1
    Body talus_r: mass=0.045 mass_center=(0.0055 0.0023 0) inertia=(3e-6 1e-6 3e-6 0 0 0) meshes=talus_rv.vtp
    Body calcn_r: mass=1.235 mass_center=(0.101865 0.0156 0) inertia=(0.001269 0.003229 0.003744 0 0 0)
        meshes=(calcaneous_rv.vtp navicular_rv.vtp cuboid_rv.vtp first_cuneiform_rv.vtp second_cuneiform_rv.vtp third_cuneiform_rv.vtp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)
    Body toes_r: mass=0.1975 mass_center=(0.0307 -0.0026 0.0105) inertia=(0.000202 0.000517 0.000595 0 0 0)
        meshes=(prox_phalanx1_rvs.vtp prox_phalanx2_rvs.vtp prox_phalanx3_rvs.vtp prox_phalanx4_rvs.vtp prox_phalanx5_rvs.vtp mid_phalanx2_rvs.vtp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)
    Body femur_l: mass=10.1325 mass_center=(0 -0.162162 0) inertia=(0.171988 0.035276 0.171988 0 0 0)
        meshes=femur_l.vtp
      WrapEllipsoid AB_at_femshaft_l: xyz_body_rotation=(-0.111701 0 0.176278)
          translation=(0.0146011 -0.117162 -0.025469) quadrant=all dimensions=(0.0165 0.07 0.021)
      WrapEllipsoid AL_at_femshaft_l: xyz_body_rotation=(-0.111701 0 0.0541052)
          translation=(0.0308673 -0.23799 -0.0119159) quadrant=all dimensions=(0.0201 0.1 0.018)
      WrapEllipsoid AMprox_at_femshaft_l: xyz_body_rotation=(-0.111701 0 0.211185)
          translation=(0.00603642 -0.0775977 -0.0299068) quadrant=all dimensions=(0.0211 0.07 0.032)
      WrapEllipsoid AMmid_at_femshaft_l: xyz_body_rotation=(-0.111701 0 0.123918)
          translation=(0.0230125 -0.160711 -0.0205842) quadrant=all dimensions=(0.0214 0.12 0.031)
      WrapEllipsoid AMdist_at_femshaft_l: xyz_body_rotation=(-0.111701 0 0.176278)
          translation=(0.0307071 -0.260769 -0.00936092) quadrant=all dimensions=(0.0218 0.2 0.0215)
      WrapEllipsoid AMisch_at_condyles_l: xyz_body_rotation=(-0.111701 0 -0.434587)
          translation=(-0.0286471 -0.376993 0.00367576) quadrant=all dimensions=(0.05 0.24 0.0402)
      WrapEllipsoid PECT_at_femshaft_l: xyz_body_rotation=(-0.111701 0 0.211185)
          translation=(0.00762137 -0.0852965 -0.0290433) quadrant=all dimensions=(0.0166 0.05 0.0131)
      WrapCylinder KnExt_at_fem_l: xyz_body_rotation=(0.0623371 -0.0507601 -0.892533)
          translation=(0.00358828 -0.402732 -0.00209111) quadrant=all radius=0.025 length=0.1
      WrapEllipsoid Gastroc_at_Condyles_l: xyz_body_rotation=(-0.0589921 0.0937242 0.0232129)
          translation=(0.0048 -0.4075 -0.0003) quadrant=all dimensions=(0.03 0.025 0.05)
    Body patella_l: mass=0.4875 mass_center=(0.0018 0.0264 0) inertia=(1.6e-5 7.4e-5 7.4e-5 0 0 0) meshes=patella_l.vtp
    Body tibia_l: mass=3.2475 mass_center=(0 -0.171713 0) inertia=(0.029999 0.005157 0.031231 0 0 0)
        meshes=(tibia_l.vtp fibula_l.vtp)
      WrapEllipsoid GR_at_condyles_l: xyz_body_rotation=(0 0 -0.18326) translation=(0 0 0) quadrant=all
          dimensions=(0.036 0.0635 0.0533)
      WrapEllipsoid SM_at_condyles_l: xyz_body_rotation=(0 0 -0.296706) translation=(0 0 0) quadrant=all
          dimensions=(0.0352 0.0602 0.0489)
      WrapEllipsoid ST_at_condyles_l: xyz_body_rotation=(0 0 -0.270526) translation=(0 0 0) quadrant=all
          dimensions=(0.0425 0.069 0.0572)
      WrapCylinder BFLH_at_gastroc_l: translation=(-0.0316 -0.0443 0) quadrant=y radius=0.01 length=0.1
      WrapCylinder Gastroc_at_Shank_l: xyz_body_rotation=(-2.96723 -0.0289725 -1.47812)
          translation=(-0.0074 -0.074 0.0033) quadrant=-y radius=0.055 length=0.1
    Body talus_l: mass=0.045 mass_center=(0.0055 0.0023 0) inertia=(3e-6 1e-6 3e-6 0 0 0) meshes=talus_lv.vtp
    Body calcn_l: mass=1.235 mass_center=(0.101865 0.0156 0) inertia=(0.001269 0.003229 0.003744 0 0 0)
        meshes=(calcaneous_lv.vtp navicular_lv.vtp cuboid_lv.vtp first_cuneiform_lv.vtp second_cuneiform_lv.vtp third_cuneiform_lv.vtp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)
    Body toes_l: mass=0.1975 mass_center=(0.0307 -0.0026 -0.0105) inertia=(0.000202 0.000517 0.000595 0 0 0)
        meshes=(prox_phalanx1_lvs.vtp prox_phalanx2_lvs.vtp prox_phalanx3_lvs.vtp prox_phalanx4_lvs.vtp prox_phalanx5_lvs.vtp mid_phalanx2_lvs.vtp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)
    Body torso: mass=24.2175 mass_center=(0 0.256438 0) inertia=(0.440821 0.276872 0.596511 0 0 0)
        meshes=(lumbar1sm.vtp lumbar2sm.vtp lumbar3sm.vtp lumbar4sm.vtp lumbar5.vtp ribcage_s.vtp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)
    Body neckhead: mass=5.205 mass_center=(0.0288 0.161501 0) inertia=(0.030471 0.02092 0.028195 0 0 0)
        meshes=(cerv1sm.vtp cerv2sm.vtp cerv3sm.vtp cerv4sm.vtp cerv5sm.vtp cerv6sm.vtp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)
    Body humerus_r: mass=2.0325 mass_center=(0 -0.164502 0) inertia=(0.011946 0.004121 0.013409 0 0 0)
        meshes=humerus_rv.vtp
    Body ulna_r: mass=0.6075 mass_center=(0 -0.120525 0) inertia=(0.002962 0.000618 0.003213 0 0 0) meshes=ulna_rv.vtp
    Body radius_r: mass=0.6075 mass_center=(0 -0.120525 0) inertia=(0.002962 0.000618 0.003213 0 0 0)
        meshes=radius_rv.vtp
    Body hand_r: mass=0.4575 mass_center=(0 -0.068095 0) inertia=(0.000892 0.000547 0.00134 0 0 0)
        meshes=(pisiform_rvs.vtp lunate_rvs.vtp scaphoid_rvs.vtp triquetrum_rvs.vtp hamate_rvs.vtp capitate_rvs.vtp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)
    Body humerus_l: mass=2.0325 mass_center=(0 -0.164502 0) inertia=(0.011946 0.004121 0.013409 0 0 0)
        meshes=humerus_lv.vtp
    Body ulna_l: mass=0.6075 mass_center=(0 -0.120525 0) inertia=(0.002962 0.000618 0.003213 0 0 0) meshes=ulna_lv.vtp
    Body radius_l: mass=0.6075 mass_center=(0 -0.120525 0) inertia=(0.002962 0.000618 0.003213 0 0 0)
        meshes=radius_lv.vtp
    Body hand_l: mass=0.4575 mass_center=(0 -0.068095 0) inertia=(0.000892 0.000547 0.00134 0 0 0)
        meshes=(pisiform_lvs.vtp lunate_lvs.vtp scaphoid_lvs.vtp triquetrum_lvs.vtp hamate_lvs.vtp capitate_lvs.vtp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)
  JointSet:
    CustomJoint gnd_pelvis: socket_parent_frame_connectee_name=../ground socket_child_frame_connectee_name=../pelvis
      Coordinate pelvis_tilt: default_value=0 range=(-4.712389 4.712389) clamped=false
      Coordinate pelvis_list: default_value=0 range=(-4.712389 4.712389) clamped=false
      Coordinate pelvis_rot: default_value=0 range=(-4.712389 4.712389) clamped=false
      Coordinate pelvis_tx: default_value=0 range=(-10 10) clamped=false
      Coordinate pelvis_ty: default_value=0.969 range=(-10 10) clamped=false
      Coordinate pelvis_tz: default_value=0 range=(-10 10) clamped=false
      SpatialTransform:
        TransformAxis rotation1: coordinates=pelvis_tilt axis=(0 0 1) LinearFunction(coefficients=1 0)
        TransformAxis rotation2: coordinates=pelvis_list axis=(1 0 0) LinearFunction(coefficients=1 0)
        TransformAxis rotation3: coordinates=pelvis_rot axis=(0 1 0) LinearFunction(coefficients=1 0)
        TransformAxis translation1: coordinates=pelvis_tx axis=(1 0 0) LinearFunction(coefficients=1 0)
        TransformAxis translation2: coordinates=pelvis_ty axis=(0 1 0) LinearFunction(coefficients=1 0)
        TransformAxis translation3: coordinates=pelvis_tz axis=(0 0 1) LinearFunction(coefficients=1 0)
    CustomJoint hip_r: socket_parent_frame_connectee_name=pelvis_offset socket_child_frame_connectee_name=../femur_r
      Coordinate hip_flex_r: default_value=0 range=(-1.047198 2.617994) clamped=true
      Coordinate hip_add_r: default_value=0 range=(-1.047198 1.047198) clamped=true
      Coordinate hip_rot_r: default_value=0 range=(-1.047198 1.047198) clamped=true
      PhysicalOffsetFrame pelvis_offset: socket_parent_connectee_name=../../pelvis
          translation=(-0.056276 -0.07849 0.07726)
      SpatialTransform: axes_held_at_zero=(translation1 translation2 translation3)
        TransformAxis rotation1: coordinates=hip_flex_r axis=(0 0 1) LinearFunction(coefficients=1 0)
        TransformAxis rotation2: coordinates=hip_add_r axis=(1 0 0) LinearFunction(coefficients=1 0)
        TransformAxis rotation3: coordinates=hip_rot_r axis=(0 1 0) LinearFunction(coefficients=1 0)
    WeldJoint femur_femur: socket_parent_frame_connectee_name=femur_r_offset
        socket_child_frame_connectee_name=../femur_distal_r
      PhysicalOffsetFrame femur_r_offset: socket_parent_connectee_name=../../femur_r
          translation=(-0.00600005 -0.404425 -0.00126524)
    CustomJoint pf_r: socket_parent_frame_connectee_name=../femur_distal_r
        socket_child_frame_connectee_name=../patella_r
      Coordinate pf_flex_r: default_value=0 range=(-1.570796 1.570796) clamped=true
      Coordinate pf_rot_r: default_value=0 range=(-1.570796 1.570796) clamped=true
      Coordinate pf_tilt_r: default_value=0 range=(-0.8726646 0.8726646) clamped=true
      Coordinate pf_tx_r: default_value=0.053 range=(-0.2 0.2) clamped=true
      Coordinate pf_ty_r: default_value=0.005 range=(-0.2 0.2) clamped=true
      Coordinate pf_tz_r: default_value=0.004 range=(-0.2 0.2) clamped=true
      SpatialTransform:
        TransformAxis rotation1: coordinates=pf_flex_r axis=(0 0 1)
          SimmSpline: x=(-6.28319 6.28319) y=(6.28319 -6.28319)
        TransformAxis rotation2: coordinates=pf_rot_r axis=(1 0 0) LinearFunction(coefficients=1 0)
        TransformAxis rotation3: coordinates=pf_tilt_r axis=(0 1 0) LinearFunction(coefficients=1 0)
        TransformAxis translation1: coordinates=pf_tx_r axis=(1 0 0) LinearFunction(coefficients=1 0)
        TransformAxis translation2: coordinates=pf_ty_r axis=(0 1 0) LinearFunction(coefficients=1 0)
        TransformAxis translation3: coordinates=pf_tz_r axis=(0 0 1) LinearFunction(coefficients=1 0)
    CustomJoint knee_r: socket_parent_frame_connectee_name=../femur_distal_r
        socket_child_frame_connectee_name=../tibia_proximal_r
      Coordinate knee_flex_r: default_value=0 range=(-0.1745329 2.792527) clamped=true
      Coordinate knee_add_r: default_value=0 range=(-0.8726646 0.8726646) clamped=true
      Coordinate knee_rot_r: default_value=0 range=(-0.8726646 0.8726646) clamped=true
      Coordinate knee_tx_r: default_value=0 range=(-0.2 0.2) clamped=true
      Coordinate knee_ty_r: default_value=0 range=(-0.2 0.2) clamped=true
      Coordinate knee_tz_r: default_value=0 range=(-0.2 0.2) clamped=true
      SpatialTransform:
        TransformAxis rotation1: coordinates=knee_flex_r axis=(0 0 1) LinearFunction(coefficients=-1 0)
        TransformAxis rotation2: coordinates=knee_add_r axis=(1 0 0) LinearFunction(coefficients=1 0)
        TransformAxis rotation3: coordinates=knee_rot_r axis=(0 1 0) LinearFunction(coefficients=1 0)
        TransformAxis translation1: coordinates=knee_tx_r axis=(1 0 0) LinearFunction(coefficients=1 0)
        TransformAxis translation2: coordinates=knee_ty_r axis=(0 1 0) LinearFunction(coefficients=1 0)
        TransformAxis translation3: coordinates=knee_tz_r axis=(0 0 1) LinearFunction(coefficients=1 0)
    WeldJoint tibia_tibia: socket_parent_frame_connectee_name=tibia_proximal_r_offset
        socket_child_frame_connectee_name=../tibia_r
      PhysicalOffsetFrame tibia_proximal_r_offset: socket_parent_connectee_name=../../tibia_proximal_r
          translation=(0.006 0 0)
    CustomJoint ankle_r: socket_parent_frame_connectee_name=tibia_r_offset socket_child_frame_connectee_name=../talus_r
      Coordinate ankle_flex_r: default_value=0 range=(-1.570796 1.570796) clamped=true
      PhysicalOffsetFrame tibia_r_offset: socket_parent_connectee_name=../../tibia_r translation=(-0.01 -0.4 0)
      SpatialTransform: axes_held_at_zero=(rotation2 rotation3 translation1 translation2 translation3)
        TransformAxis rotation1: coordinates=ankle_flex_r axis=(-0.105014 -0.1740221 0.9791263)
            LinearFunction(coefficients=1 0)
    CustomJoint subtalar_r: socket_parent_frame_connectee_name=talus_r_offset
        socket_child_frame_connectee_name=../calcn_r
      Coordinate subt_angle_r: default_value=0 range=(-1.047198 1.047198) clamped=true
      PhysicalOffsetFrame talus_r_offset: socket_parent_connectee_name=../../talus_r
          translation=(-0.04877 -0.04195 0.00792)
      SpatialTransform: axes_held_at_zero=(rotation2 rotation3 translation1 translation2 translation3)
        TransformAxis rotation1: coordinates=subt_angle_r axis=(0.78718 0.604747 -0.120949)
            LinearFunction(coefficients=1 0)
    CustomJoint mtp_r: socket_parent_frame_connectee_name=calcn_r_offset socket_child_frame_connectee_name=../toes_r
      Coordinate mtp_angle_r: default_value=0 range=(-1.047198 1.047198) clamped=true
      PhysicalOffsetFrame calcn_r_offset: socket_parent_connectee_name=../../calcn_r
          translation=(0.1788 -0.002 0.00108)
      SpatialTransform: axes_held_at_zero=(rotation2 rotation3 translation1 translation2 translation3)
        TransformAxis rotation1: coordinates=mtp_angle_r axis=(0.5809542 0 -0.8139363) LinearFunction(coefficients=1 0)
    CustomJoint hip_l: socket_parent_frame_connectee_name=pelvis_offset socket_child_frame_connectee_name=../femur_l
      Coordinate hip_flex_l: default_value=0 range=(-1.047198 2.617994) clamped=true
      Coordinate hip_add_l: default_value=0 range=(-1.047198 0.3490659) clamped=true
      Coordinate hip_rot_l: default_value=0 range=(-1.047198 1.047198) clamped=true
      PhysicalOffsetFrame pelvis_offset: socket_parent_connectee_name=../../pelvis
          translation=(-0.056276 -0.07849 -0.07726)
      SpatialTransform: axes_held_at_zero=(translation1 translation2 translation3)
        TransformAxis rotation1: coordinates=hip_flex_l axis=(0 0 1) LinearFunction(coefficients=1 0)
        TransformAxis rotation2: coordinates=hip_add_l axis=(1 0 0) LinearFunction(coefficients=1 0)
        TransformAxis rotation3: coordinates=hip_rot_l axis=(0 1 0) LinearFunction(coefficients=1 0)
    CustomJoint pf_l: socket_parent_frame_connectee_name=../femur_l socket_child_frame_connectee_name=../patella_l
      Coordinate pf_l_r3: default_value=0.001136855 range=(-99999.9 99999.9) clamped=false
      Coordinate pf_l_tx: default_value=0.04435 range=(-99999.9 99999.9) clamped=false
      Coordinate pf_l_ty: default_value=-0.418712 range=(-99999.9 99999.9) clamped=false
      SpatialTransform: axes_held_at_zero=(rotation2 rotation3 translation3)
        TransformAxis rotation1: coordinates=pf_l_r3 axis=(0 0 1) LinearFunction(coefficients=1 0)
        TransformAxis translation1: coordinates=pf_l_tx axis=(1 0 0) LinearFunction(coefficients=1 0)
        TransformAxis translation2: coordinates=pf_l_ty axis=(0 1 0) LinearFunction(coefficients=1 0)
    CustomJoint knee_l: socket_parent_frame_connectee_name=../femur_l socket_child_frame_connectee_name=../tibia_l
      Coordinate knee_flex_l: default_value=0 range=(-0.1745329 2.792527) clamped=true
      SpatialTransform:
        TransformAxis rotation1: coordinates=knee_flex_l axis=(0 0 1)
          SimmSpline: x=(-6.28319 6.28319) y=(6.28319 -6.28319)
        TransformAxis rotation2: coordinates=knee_flex_l axis=(1 0 0)
          SimmSpline: x=(-0.174533 0 0.174533 0.349066 0.523599 0.698132 0.872665 1.0472 1.22173 1.39626 1.5708 1.74533 1.91986 2.0944)
              y=(0.00498946 0 -0.00605681 -0.0127056 -0.0193932 -0.025694 -0.0313393 -0.0362355 -0.0404783 -0.044365 -0.0484046 -0.0533308 -0.0601155 -0.0699935)
        TransformAxis rotation3: coordinates=knee_flex_l axis=(0 1 0)
          SimmSpline: x=(-0.174533 0 0.174533 0.349066 0.523599 0.698132 0.872665 1.0472 1.22173 1.39626 1.5708 1.74533 1.91986 2.0944)
              y=(0.0568237 0 -0.0473143 -0.0858667 -0.116487 -0.140093 -0.157672 -0.170252 -0.178879 -0.184595 -0.18842 -0.191344 -0.194325 -0.198293)
        TransformAxis translation1: coordinates=knee_flex_l axis=(1 0 0)
          SimmSpline: x=(-0.174533 0 0.174533 0.349066 0.523599 0.698132 0.872665 1.0472 1.22173 1.39626 1.5708 1.74533 1.91986 2.0944)
              y=(-0.00164957 -4.8e-7 0.00153765 0.00280273 0.00366246 0.00401894 0.00381314 0.00302974 0.00169348 -0.00013342 -0.00235575 -0.00485457 -0.00749805 -0.0101522)
        TransformAxis translation2: coordinates=knee_flex_l axis=(0 1 0)
          SimmSpline: x=(-0.174533 0 0.174533 0.349066 0.523599 0.698132 0.872665 1.0472 1.22173 1.39626 1.5708 1.74533 1.91986 2.0944)
              y=(-0.403959 -0.404425 -0.40548 -0.407056 -0.40905 -0.411333 -0.413758 -0.416171 -0.418425 -0.420384 -0.42194 -0.423017 -0.423578 -0.423625)
        TransformAxis translation3: coordinates=knee_flex_l axis=(0 0 1)
          SimmSpline: x=(-0.174533 0 0.174533 0.349066 0.523599 0.698132 0.872665 1.0472 1.22173 1.39626 1.5708 1.74533 1.91986 2.0944)
              y=(0.00082532 0.00126524 0.00170877 0.0021306 0.00251419 0.00284969 0.00313273 0.00336333 0.00354482 0.00368239 0.00378263 0.00385241 0.00389806 0.00392316)
    CustomJoint ankle_l: socket_parent_frame_connectee_name=tibia_l_offset socket_child_frame_connectee_name=../talus_l
      Coordinate ankle_flex_l: default_value=0 range=(-1.570796 1.570796) clamped=true
      PhysicalOffsetFrame tibia_l_offset: socket_parent_connectee_name=../../tibia_l translation=(-0.01 -0.4 0)
      SpatialTransform: axes_held_at_zero=(rotation2 rotation3 translation1 translation2 translation3)
        TransformAxis rotation1: coordinates=ankle_flex_l axis=(-0.105014 -0.1740221 -0.9791263)
          SimmSpline: x=(-6.28319 6.28319) y=(6.28319 -6.28319)
    CustomJoint subtalar_l: socket_parent_frame_connectee_name=talus_l_offset
        socket_child_frame_connectee_name=../calcn_l
      Coordinate subt_angle_l: default_value=0 range=(-0.6981317 0.6981317) clamped=true
      PhysicalOffsetFrame talus_l_offset: socket_parent_connectee_name=../../talus_l
          translation=(-0.04877 -0.04195 -0.00792)
      SpatialTransform: axes_held_at_zero=(rotation2 rotation3 translation1 translation2 translation3)
        TransformAxis rotation1: coordinates=subt_angle_l axis=(0.78718 0.604747 0.120949)
          SimmSpline: x=(-6.28319 6.28319) y=(6.28319 -6.28319)
    CustomJoint mtp_l: socket_parent_frame_connectee_name=calcn_l_offset socket_child_frame_connectee_name=../toes_l
      Coordinate mtp_angle_l: default_value=0 range=(-1.047198 1.047198) clamped=true
      PhysicalOffsetFrame calcn_l_offset: socket_parent_connectee_name=../../calcn_l
          translation=(0.1788 -0.002 -0.00108)
      SpatialTransform: axes_held_at_zero=(rotation2 rotation3 translation1 translation2 translation3)
        TransformAxis rotation1: coordinates=mtp_angle_l axis=(0.5809542 0 0.8139363)
          SimmSpline: x=(-6.28319 6.28319) y=(6.28319 -6.28319)
    CustomJoint pelvis_torso: socket_parent_frame_connectee_name=pelvis_offset
        socket_child_frame_connectee_name=../torso
      Coordinate lumbar_ext: default_value=0 range=(-1.047198 1.047198) clamped=true
      Coordinate lumbar_latbend: default_value=0 range=(-1.047198 1.047198) clamped=true
      Coordinate lumbar_rot: default_value=0 range=(-1.047198 1.047198) clamped=true
      PhysicalOffsetFrame pelvis_offset: socket_parent_connectee_name=../../pelvis translation=(-0.1 0.055 0)
      SpatialTransform: axes_held_at_zero=(translation1 translation2 translation3)
        TransformAxis rotation1: coordinates=lumbar_ext axis=(0 0 1) LinearFunction(coefficients=1 0)
        TransformAxis rotation2: coordinates=lumbar_latbend axis=(1 0 0) LinearFunction(coefficients=1 0)
        TransformAxis rotation3: coordinates=lumbar_rot axis=(0 1 0) LinearFunction(coefficients=1 0)
    CustomJoint torso_neckhead: socket_parent_frame_connectee_name=torso_offset
        socket_child_frame_connectee_name=../neckhead
      Coordinate neck_ext: default_value=0 range=(-0.8726646 1.256637) clamped=true
      Coordinate neck_latbend: default_value=0 range=(-0.6981317 0.6981317) clamped=true
      Coordinate neck_rot: default_value=0 range=(-1.151917 1.151917) clamped=true
      PhysicalOffsetFrame torso_offset: socket_parent_connectee_name=../../torso translation=(-0.0253 0.44895 0)
      SpatialTransform: axes_held_at_zero=(translation1 translation2 translation3)
        TransformAxis rotation1: coordinates=neck_ext axis=(0 0 1) LinearFunction(coefficients=1 0)
        TransformAxis rotation2: coordinates=neck_latbend axis=(1 0 0) LinearFunction(coefficients=1 0)
        TransformAxis rotation3: coordinates=neck_rot axis=(0 1 0) LinearFunction(coefficients=1 0)
    CustomJoint acromial_r: socket_parent_frame_connectee_name=torso_offset
        socket_child_frame_connectee_name=../humerus_r
      Coordinate arm_add_r: default_value=0 range=(-2.094395 1.570796) clamped=true
      Coordinate arm_flex_r: default_value=0 range=(-1.570796 1.570796) clamped=true
      Coordinate arm_rot_r: default_value=0 range=(-1.570796 1.570796) clamped=true
      PhysicalOffsetFrame torso_offset: socket_parent_connectee_name=../../torso translation=(-0.0281 0.41645 0.199)
      SpatialTransform: axes_held_at_zero=(translation1 translation2 translation3)
        TransformAxis rotation1: coordinates=arm_add_r axis=(1 0 0) LinearFunction(coefficients=1 0)
        TransformAxis rotation2: coordinates=arm_flex_r axis=(0 0 1) LinearFunction(coefficients=1 0)
        TransformAxis rotation3: coordinates=arm_rot_r axis=(0 1 0) LinearFunction(coefficients=1 0)
    CustomJoint elbow_r: socket_parent_frame_connectee_name=humerus_r_offset
        socket_child_frame_connectee_name=../ulna_r
      Coordinate elbow_flex_r: default_value=0 range=(0 2.792527) clamped=true
      PhysicalOffsetFrame humerus_r_offset: socket_parent_connectee_name=../../humerus_r
          translation=(0.013144 -0.286273 -0.009595)
      SpatialTransform: axes_held_at_zero=(rotation2 rotation3 translation1 translation2 translation3)
        TransformAxis rotation1: coordinates=elbow_flex_r axis=(0.226047 0.022269 0.9738618)
            LinearFunction(coefficients=1 0)
    CustomJoint radioulnar_r: socket_parent_frame_connectee_name=ulna_r_offset
        socket_child_frame_connectee_name=../radius_r
      Coordinate pro_sup_r: default_value=1.047198 range=(0 1.570796) clamped=true
      PhysicalOffsetFrame ulna_r_offset: socket_parent_connectee_name=../../ulna_r
          translation=(-0.006727 -0.013007 0.026083)
      SpatialTransform: axes_held_at_zero=(rotation1 rotation3 translation1 translation2 translation3)
        TransformAxis rotation2: coordinates=pro_sup_r axis=(0.05639803 0.9984065 0.001952001)
            LinearFunction(coefficients=1 0)
    CustomJoint radius_hand_r: socket_parent_frame_connectee_name=radius_r_offset
        socket_child_frame_connectee_name=../hand_r
      Coordinate wrist_flex_r: default_value=0 range=(-1.22173 1.22173) clamped=true
      PhysicalOffsetFrame radius_r_offset: socket_parent_connectee_name=../../radius_r
          translation=(-0.008797 -0.235841 0.01361)
      SpatialTransform: axes_held_at_zero=(rotation2 rotation3 translation1 translation2 translation3)
        TransformAxis rotation1: coordinates=wrist_flex_r axis=(0 0 1) LinearFunction(coefficients=1 0)
    CustomJoint acromial_l: socket_parent_frame_connectee_name=torso_offset
        socket_child_frame_connectee_name=../humerus_l
      Coordinate arm_add_l: default_value=0 range=(-2.094395 1.570796) clamped=true
      Coordinate arm_flex_l: default_value=0 range=(-1.570796 1.570796) clamped=true
      Coordinate arm_rot_l: default_value=0 range=(-1.570796 1.570796) clamped=true
      PhysicalOffsetFrame torso_offset: socket_parent_connectee_name=../../torso translation=(-0.0281 0.41645 -0.199)
      SpatialTransform: axes_held_at_zero=(translation1 translation2 translation3)
        TransformAxis rotation1: coordinates=arm_add_l axis=(-1 0 0) LinearFunction(coefficients=1 0)
        TransformAxis rotation2: coordinates=arm_flex_l axis=(0 0 1) LinearFunction(coefficients=1 0)
        TransformAxis rotation3: coordinates=arm_rot_l axis=(0 -1 0) LinearFunction(coefficients=1 0)
    CustomJoint elbow_l: socket_parent_frame_connectee_name=humerus_l_offset
        socket_child_frame_connectee_name=../ulna_l
      Coordinate elbow_flex_l: default_value=0 range=(0 2.792527) clamped=true
      PhysicalOffsetFrame humerus_l_offset: socket_parent_connectee_name=../../humerus_l
          translation=(0.013144 -0.286273 0.009595)
      SpatialTransform: axes_held_at_zero=(rotation2 rotation3 translation1 translation2 translation3)
        TransformAxis rotation1: coordinates=elbow_flex_l axis=(-0.226047 -0.022269 0.9738618)
            LinearFunction(coefficients=1 0)
    CustomJoint radioulnar_l: socket_parent_frame_connectee_name=ulna_l_offset
        socket_child_frame_connectee_name=../radius_l
      Coordinate pro_sup_l: default_value=1.047198 range=(0 1.570796) clamped=true
      PhysicalOffsetFrame ulna_l_offset: socket_parent_connectee_name=../../ulna_l
          translation=(-0.006727 -0.013007 -0.026083)
      SpatialTransform: axes_held_at_zero=(rotation1 rotation3 translation1 translation2 translation3)
        TransformAxis rotation2: coordinates=pro_sup_l axis=(-0.05639803 -0.9984065 0.001952001)
            LinearFunction(coefficients=1 0)
    CustomJoint radius_hand_l: socket_parent_frame_connectee_name=radius_l_offset
        socket_child_frame_connectee_name=../hand_l
      Coordinate wrist_flex_l: default_value=0 range=(-1.22173 1.22173) clamped=true
      PhysicalOffsetFrame radius_l_offset: socket_parent_connectee_name=../../radius_l
          translation=(-0.008797 -0.235841 -0.01361)
      SpatialTransform: axes_held_at_zero=(rotation2 rotation3 translation1 translation2 translation3)
        TransformAxis rotation1: coordinates=wrist_flex_l axis=(0 0 1) LinearFunction(coefficients=1 0)
  ForceSet:
    Thelen2003Muscle addbrev_r: max_isometric_force=303.7 optimal_fiber_length=0.1031 tendon_slack_length=0.036
        pennation_angle_at_optimal=0.1064651
      PathPoint P1: socket_parent_frame_connectee_name=../../../pelvis (-0.0191 -0.094 0.0154)
      PathPoint P2: socket_parent_frame_connectee_name=../../../femur_r (-0.002 -0.118 0.0249)
    Thelen2003Muscle addlong_r: max_isometric_force=399.5 optimal_fiber_length=0.1082 tendon_slack_length=0.13
        pennation_angle_at_optimal=0.1235693
      PathPoint P1: socket_parent_frame_connectee_name=../../../pelvis (-0.00758 -0.0889 0.01888)
      PathPoint P2: socket_parent_frame_connectee_name=../../../femur_r (0.01126 -0.23937 0.01583)
    Thelen2003Muscle addmagProx_r: max_isometric_force=324.2 optimal_fiber_length=0.1056 tendon_slack_length=0.043
        pennation_angle_at_optimal=0.3872886
      PathPoint P1: socket_parent_frame_connectee_name=../../../pelvis (-0.03098 -0.10755 0.01365)
      PathPoint P2: socket_parent_frame_connectee_name=../../../femur_r (-0.01527 -0.07886 0.03202)
    Thelen2003Muscle addmagMid_r: max_isometric_force=324.2 optimal_fiber_length=0.1377 tendon_slack_length=0.048
        pennation_angle_at_optimal=0.2567379
      PathPoint P1: socket_parent_frame_connectee_name=../../../pelvis (-0.05266 -0.12075 0.02854)
      PathPoint P2: socket_parent_frame_connectee_name=../../../femur_r (0.00242 -0.1624 0.02922)
    Thelen2003Muscle addmagDist_r: max_isometric_force=324.2 optimal_fiber_length=0.1772 tendon_slack_length=0.09
        pennation_angle_at_optimal=0.2412045
      PathPoint P1: socket_parent_frame_connectee_name=../../../pelvis (-0.07404 -0.12767 0.03982)
      PathPoint P2: socket_parent_frame_connectee_name=../../../femur_r (0.01125 -0.2625 0.0193)
    Thelen2003Muscle addmagIsch_r: max_isometric_force=324.2 optimal_fiber_length=0.1562 tendon_slack_length=0.221
        pennation_angle_at_optimal=0.2073451
      PathPoint P1: socket_parent_frame_connectee_name=../../../pelvis (-0.08962 -0.12976 0.04171)
      PathPoint P2: socket_parent_frame_connectee_name=../../../femur_r (0.00481 -0.38797 -0.03273)
    Thelen2003Muscle bflh_r: max_isometric_force=705.2 optimal_fiber_length=0.0976 tendon_slack_length=0.322
        pennation_angle_at_optimal=0.2021091
      PathPoint P1: socket_parent_frame_connectee_name=../../../pelvis (-0.104 -0.1191 0.0586)
      PathPoint P2: socket_parent_frame_connectee_name=../../../tibia_r (-0.0317 -0.0425 0.0333)
    Thelen2003Muscle bfsh_r: max_isometric_force=631.6 optimal_fiber_length=0.1103 tendon_slack_length=0.104
        pennation_angle_at_optimal=0.2151991
      PathPoint P1: socket_parent_frame_connectee_name=../../../femur_r (0.005 -0.2111 0.0234)
      PathPoint P2: socket_parent_frame_connectee_name=../../../tibia_r (-0.0301 -0.0419 0.0318)
    Thelen2003Muscle edl_r: max_isometric_force=345.4 optimal_fiber_length=0.0693 tendon_slack_length=0.3673
        pennation_angle_at_optimal=0.1890192
      PathPoint P1: socket_parent_frame_connectee_name=../../../tibia_r (-0.016 -0.1157 0.0205)
      PathPoint P2: socket_parent_frame_connectee_name=../../../tibia_r (0.0164 -0.376 0.0112)
      PathPoint P3: socket_parent_frame_connectee_name=../../../calcn_r (0.0919 0.036 0.0008)
      PathPoint P4: socket_parent_frame_connectee_name=../../../calcn_r (0.1616 0.0055 0.013)
      PathPoint P5: socket_parent_frame_connectee_name=../../../toes_r (0.0003 0.0047 0.0153)
      PathPoint P6: socket_parent_frame_connectee_name=../../../toes_r (0.0443 -0.0004 0.025)
    Thelen2003Muscle ehl_r: max_isometric_force=165 optimal_fiber_length=0.0748 tendon_slack_length=0.3315
        pennation_angle_at_optimal=0.1647591
      PathPoint P1: socket_parent_frame_connectee_name=../../../tibia_r (-0.014 -0.155 0.0189)
      PathPoint P2: socket_parent_frame_connectee_name=../../../tibia_r (0.007 -0.2909 0.0164)
      PathPoint P3: socket_parent_frame_connectee_name=../../../tibia_r (0.02 -0.3693 -0.0028)
      PathPoint P4: socket_parent_frame_connectee_name=../../../calcn_r (0.097 0.0389 -0.0211)
      PathPoint P5: socket_parent_frame_connectee_name=../../../calcn_r (0.1293 0.0309 -0.0257)
      PathPoint P6: socket_parent_frame_connectee_name=../../../calcn_r (0.1734 0.0139 -0.028)
      PathPoint P7: socket_parent_frame_connectee_name=../../../toes_r (0.0298 0.0041 -0.0245)
      PathPoint P8: socket_parent_frame_connectee_name=../../../toes_r (0.0563 0.0034 -0.0186)
    Thelen2003Muscle fdl_r: max_isometric_force=274.4 optimal_fiber_length=0.0446 tendon_slack_length=0.3777
        pennation_angle_at_optimal=0.2380629
      PathPoint P1: socket_parent_frame_connectee_name=../../../tibia_r (-0.0023 -0.1832 -0.0018)
      PathPoint P2: socket_parent_frame_connectee_name=../../../tibia_r (-0.0176 -0.3645 -0.0124)
      PathPoint P3: socket_parent_frame_connectee_name=../../../calcn_r (0.0436 0.0315 -0.028)
      PathPoint P4: socket_parent_frame_connectee_name=../../../calcn_r (0.0708 0.0176 -0.0263)
      PathPoint P5: socket_parent_frame_connectee_name=../../../calcn_r (0.1658 -0.0081 0.0116)
      PathPoint P6: socket_parent_frame_connectee_name=../../../toes_r (-0.0019 -0.0078 0.0147)
      PathPoint P7: socket_parent_frame_connectee_name=../../../toes_r (0.0285 -0.0071 0.0215)
      PathPoint P8: socket_parent_frame_connectee_name=../../../toes_r (0.0441 -0.006 0.0242)
    Thelen2003Muscle fhl_r: max_isometric_force=436.8 optimal_fiber_length=0.0527 tendon_slack_length=0.356
        pennation_angle_at_optimal=0.2947861
      PathPoint P1: socket_parent_frame_connectee_name=../../../tibia_r (-0.031 -0.2163 0.02)
      PathPoint P2: socket_parent_frame_connectee_name=../../../tibia_r (-0.0242 -0.3671 -0.0076)
      PathPoint P3: socket_parent_frame_connectee_name=../../../calcn_r (0.0374 0.0276 -0.0241)
      PathPoint P4: socket_parent_frame_connectee_name=../../../calcn_r (0.1038 0.0068 -0.0256)
      PathPoint P5: socket_parent_frame_connectee_name=../../../calcn_r (0.1726 -0.0053 -0.0269)
      PathPoint P6: socket_parent_frame_connectee_name=../../../toes_r (0.0155 -0.0064 -0.0265)
      PathPoint P7: socket_parent_frame_connectee_name=../../../toes_r (0.0562 -0.0102 -0.0181)
    Thelen2003Muscle gaslat_r: max_isometric_force=606.4 optimal_fiber_length=0.0588 tendon_slack_length=0.369
        pennation_angle_at_optimal=0.2101376 FmaxMuscleStrain=2
      PathPoint P1: socket_parent_frame_connectee_name=../../../femur_r (-0.003 -0.3814 0.0277)
      PathPoint P2: socket_parent_frame_connectee_name=../../../calcn_r (0.0044 0.031 -0.0053)
      PathWrap pathwrap_0: wrap_object=Gastroc_at_Condyles_r method=hybrid
    Thelen2003Muscle gasmed_r: max_isometric_force=1308 optimal_fiber_length=0.051 tendon_slack_length=0.389
        pennation_angle_at_optimal=0.1724385 FmaxMuscleStrain=2
      PathPoint P1: socket_parent_frame_connectee_name=../../../femur_r (0.008 -0.3788 -0.0208)
      PathPoint P2: socket_parent_frame_connectee_name=../../../calcn_r (0.0044 0.031 -0.0053)
      PathWrap pathwrap_0: wrap_object=Gastroc_at_Condyles_r method=hybrid
    Thelen2003Muscle gem_r: max_isometric_force=218 optimal_fiber_length=0.024 tendon_slack_length=0.039
        pennation_angle_at_optimal=0
      PathPoint P1: socket_parent_frame_connectee_name=../../../pelvis (-0.10357 -0.0764 0.06707)
      PathPoint P2: socket_parent_frame_connectee_name=../../../femur_r (-0.0142 -0.0033 0.0443)
    Thelen2003Muscle glmax1_r: max_isometric_force=1092.2 optimal_fiber_length=0.1473 tendon_slack_length=0.05
        pennation_angle_at_optimal=0.3829252
      PathPoint P1: socket_parent_frame_connectee_name=../../../pelvis (-0.1231 0.0345 0.0563)
      PathPoint P2: socket_parent_frame_connectee_name=../../../pelvis (-0.1257 -0.0242 0.0779)
      PathPoint P3: socket_parent_frame_connectee_name=../../../femur_r (-0.0444 -0.0326 0.0302)
      PathPoint P4: socket_parent_frame_connectee_name=../../../femur_r (-0.0277 -0.0566 0.047)
      PathWrap pathwrap_0: wrap_object=Gmax_at_pelvis_r method=hybrid
    Thelen2003Muscle glmax2_r: max_isometric_force=1561 optimal_fiber_length=0.1569 tendon_slack_length=0.0733
        pennation_angle_at_optimal=0.3829252
      PathPoint P1: socket_parent_frame_connectee_name=../../../pelvis (-0.1317 0.0087 0.0462)
      PathPoint P2: socket_parent_frame_connectee_name=../../../pelvis (-0.1344 -0.0609 0.0813)
      PathPoint P3: socket_parent_frame_connectee_name=../../../femur_r (-0.045 -0.0584 0.0252)
      PathPoint P4: socket_parent_frame_connectee_name=../../../femur_r (-0.0156 -0.1016 0.0419)
      PathWrap pathwrap_0: wrap_object=Gmax_at_pelvis_r method=hybrid
    Thelen2003Muscle glmax3_r: max_isometric_force=1058.2 optimal_fiber_length=0.1665 tendon_slack_length=0.0702
        pennation_angle_at_optimal=0.3829252
      PathPoint P1: socket_parent_frame_connectee_name=../../../pelvis (-0.13 -0.0525 0.009)
      PathPoint P2: socket_parent_frame_connectee_name=../../../pelvis (-0.1273 -0.1263 0.0435)
      PathPoint P3: socket_parent_frame_connectee_name=../../../femur_r (-0.0281 -0.1125 0.0094)
      PathPoint P4: socket_parent_frame_connectee_name=../../../femur_r (-0.006 -0.1419 0.0411)
      PathWrap pathwrap_0: wrap_object=Gmax_at_pelvis_r method=hybrid
    Thelen2003Muscle glmed1_r: max_isometric_force=1762.2 optimal_fiber_length=0.0733 tendon_slack_length=0.0565
        pennation_angle_at_optimal=0.3572689
      PathPoint P1: socket_parent_frame_connectee_name=../../../pelvis (-0.0445 0.0245 0.1172)
      PathPoint P2: socket_parent_frame_connectee_name=../../../femur_r (-0.0218 -0.0117 0.0555)
    Thelen2003Muscle glmed2_r: max_isometric_force=1033 optimal_fiber_length=0.0733 tendon_slack_length=0.066
        pennation_angle_at_optimal=0.3572689
      PathPoint P1: socket_parent_frame_connectee_name=../../../pelvis (-0.085 0.0316 0.0675)
      PathPoint P2: socket_parent_frame_connectee_name=../../../femur_r (-0.0258 -0.0058 0.0527)
    Thelen2003Muscle glmed3_r: max_isometric_force=1404 optimal_fiber_length=0.0733 tendon_slack_length=0.046
        pennation_angle_at_optimal=0.3572689
      PathPoint P1: socket_parent_frame_connectee_name=../../../pelvis (-0.1152 -0.0073 0.0526)
      PathPoint P2: socket_parent_frame_connectee_name=../../../femur_r (-0.0309 -0.0047 0.0518)
    Thelen2003Muscle glmin1_r: max_isometric_force=720 optimal_fiber_length=0.068 tendon_slack_length=0.016
        pennation_angle_at_optimal=0.1745329
      PathPoint P1: socket_parent_frame_connectee_name=../../../pelvis (-0.0464 -0.0149 0.1042)
      PathPoint P2: socket_parent_frame_connectee_name=../../../femur_r (-0.0072 -0.0104 0.056)
    Thelen2003Muscle glmin2_r: max_isometric_force=760 optimal_fiber_length=0.056 tendon_slack_length=0.026
        pennation_angle_at_optimal=0
      PathPoint P1: socket_parent_frame_connectee_name=../../../pelvis (-0.0616 -0.0142 0.0971)
      PathPoint P2: socket_parent_frame_connectee_name=../../../femur_r (-0.0096 -0.0104 0.056)
    Thelen2003Muscle glmin3_r: max_isometric_force=860 optimal_fiber_length=0.038 tendon_slack_length=0.051
        pennation_angle_at_optimal=0.01745329
      PathPoint P1: socket_parent_frame_connectee_name=../../../pelvis (-0.0789 -0.0155 0.0798)
      PathPoint P2: socket_parent_frame_connectee_name=../../../femur_r (-0.0135 -0.0083 0.055)
    Thelen2003Muscle grac_r: max_isometric_force=137.3 optimal_fiber_length=0.2278 tendon_slack_length=0.169
        pennation_angle_at_optimal=0.1424189
      PathPoint P1: socket_parent_frame_connectee_name=../../../pelvis (-0.04736 -0.12932 0.02456)
      PathPoint P2: socket_parent_frame_connectee_name=../../../tibia_r (-0.01842 -0.04755 -0.02961)
      PathPoint P3: socket_parent_frame_connectee_name=../../../tibia_r (0.00178 -0.06962 -0.01573)
      PathWrap pathwrap_0: wrap_object=GR_at_condyles_r method=midpoint
    Thelen2003Muscle iliacus_r: max_isometric_force=2487.6 optimal_fiber_length=0.1066 tendon_slack_length=0.094
        pennation_angle_at_optimal=0.2494076
      PathPoint P1: socket_parent_frame_connectee_name=../../../pelvis (-0.0605 0.0309 0.0843)
      PathPoint P2: socket_parent_frame_connectee_name=../../../pelvis (-0.0135 -0.0557 0.0756)
      PathPoint P3: socket_parent_frame_connectee_name=../../../femur_r (-0.0023 -0.0565 0.0139)
      PathPoint P4: socket_parent_frame_connectee_name=../../../femur_r (-0.0122 -0.0636 0.0196)
      PathWrap pathwrap_0: wrap_object=IL_at_brim_r method=hybrid
    Thelen2003Muscle pect_r: max_isometric_force=177 optimal_fiber_length=0.1 tendon_slack_length=0.033
        pennation_angle_at_optimal=0
      PathPoint P1: socket_parent_frame_connectee_name=../../../pelvis (-0.0232 -0.08325 0.04529)
      PathPoint P2: socket_parent_frame_connectee_name=../../../femur_r (-0.00797 -0.08518 0.02403)
      PathWrap pathwrap_0: wrap_object=PECT_at_femshaft_r method=hybrid
    Thelen2003Muscle perbrev_r: max_isometric_force=305.9 optimal_fiber_length=0.0454 tendon_slack_length=0.1481
        pennation_angle_at_optimal=0.2000147
      PathPoint P1: socket_parent_frame_connectee_name=../../../tibia_r (-0.0243 -0.2532 0.0251)
      PathPoint P2: socket_parent_frame_connectee_name=../../../tibia_r (-0.0339 -0.3893 0.0249)
      PathPoint P3: socket_parent_frame_connectee_name=../../../tibia_r (-0.0285 -0.4004 0.0255)
      PathPoint P4: socket_parent_frame_connectee_name=../../../calcn_r (0.0471 0.027 0.0233)
      PathPoint P5: socket_parent_frame_connectee_name=../../../calcn_r (0.0677 0.0219 0.0343)
    Thelen2003Muscle perlong_r: max_isometric_force=653.3 optimal_fiber_length=0.0508 tendon_slack_length=0.333
        pennation_angle_at_optimal=0.2457424
      PathPoint P1: socket_parent_frame_connectee_name=../../../tibia_r (-0.02 -0.1373 0.0282)
      PathPoint P2: socket_parent_frame_connectee_name=../../../tibia_r (-0.0317 -0.39 0.0237)
      PathPoint P3: socket_parent_frame_connectee_name=../../../tibia_r (-0.0272 -0.4014 0.024)
      PathPoint P4: socket_parent_frame_connectee_name=../../../calcn_r (0.0438 0.023 0.0221)
      PathPoint P5: socket_parent_frame_connectee_name=../../../calcn_r (0.0681 0.0106 0.0284)
      PathPoint P6: socket_parent_frame_connectee_name=../../../calcn_r (0.0852 0.0069 0.0118)
      PathPoint P7: socket_parent_frame_connectee_name=../../../calcn_r (0.1203 0.0085 -0.0184)
    Thelen2003Muscle pertert_r: max_isometric_force=90 optimal_fiber_length=0.079 tendon_slack_length=0.1
        pennation_angle_at_optimal=0.2268928
      PathPoint P1: socket_parent_frame_connectee_name=../../../tibia_r (-0.0149 -0.2485 0.0222)
      PathPoint P2: socket_parent_frame_connectee_name=../../../tibia_r (0.0108 -0.382 0.0225)
      PathPoint P3: socket_parent_frame_connectee_name=../../../calcn_r (0.0857 0.0228 0.0299)
    Thelen2003Muscle piri_r: max_isometric_force=296 optimal_fiber_length=0.026 tendon_slack_length=0.115
        pennation_angle_at_optimal=0.1745329
      PathPoint P1: socket_parent_frame_connectee_name=../../../pelvis (-0.10181 -0.00653 0.01351)
      PathPoint P2: socket_parent_frame_connectee_name=../../../pelvis (-0.10202 -0.03066 0.06092)
      PathPoint P3: socket_parent_frame_connectee_name=../../../femur_r (-0.0148 -0.0036 0.0437)
    Thelen2003Muscle psoas_r: max_isometric_force=1916 optimal_fiber_length=0.1169 tendon_slack_length=0.097
        pennation_angle_at_optimal=0.1860521
      PathPoint P1: socket_parent_frame_connectee_name=../../../pelvis (-0.0606 0.0619 0.039)
      PathPoint P2: socket_parent_frame_connectee_name=../../../pelvis (-0.0205 -0.0654 0.0656)
      PathPoint P3: socket_parent_frame_connectee_name=../../../femur_r (-0.0132 -0.0467 0.0046)
      PathPoint P4: socket_parent_frame_connectee_name=../../../femur_r (-0.0235 -0.0524 0.0088)
      PathWrap pathwrap_0: wrap_object=PS_at_brim_r method=hybrid
    Thelen2003Muscle quadfem_r: max_isometric_force=508 optimal_fiber_length=0.054 tendon_slack_length=0.024
        pennation_angle_at_optimal=0
      PathPoint P1: socket_parent_frame_connectee_name=../../../pelvis (-0.11192 -0.11473 0.05166)
      PathPoint P2: socket_parent_frame_connectee_name=../../../femur_r (-0.03575 -0.03552 0.03612)
    Thelen2003Muscle recfem_r: max_isometric_force=848.8 optimal_fiber_length=0.0759 tendon_slack_length=0.3642
        pennation_angle_at_optimal=0.2431244 FmaxMuscleStrain=2
      PathPoint P1: socket_parent_frame_connectee_name=../../../pelvis (-0.024 -0.0388 0.0933)
      PathPoint P2: socket_parent_frame_connectee_name=../../../patella_r (-0.000102437 0.0149698 0.0011381)
      PathPoint P3: socket_parent_frame_connectee_name=../../../patella_r (0.00351873 0.0125708 0.00078874)
      PathWrap pathwrap_0: wrap_object=KnExt_at_fem_r
    Thelen2003Muscle sart_r: max_isometric_force=113.5 optimal_fiber_length=0.403 tendon_slack_length=0.11
        pennation_angle_at_optimal=0.02321288
      PathPoint P1: socket_parent_frame_connectee_name=../../../pelvis (-0.0195 -0.0156 0.1056)
      PathPoint P2: socket_parent_frame_connectee_name=../../../femur_r (-0.003 -0.3568 -0.0421)
      PathPoint P3: socket_parent_frame_connectee_name=../../../tibia_r (-0.0251 -0.0401 -0.0365)
      PathPoint P4: socket_parent_frame_connectee_name=../../../tibia_r (-0.0159 -0.0599 -0.0264)
      PathPoint P5: socket_parent_frame_connectee_name=../../../tibia_r (0.0136 -0.081 -0.0026)
    Thelen2003Muscle semimem_r: max_isometric_force=1162.7 optimal_fiber_length=0.069 tendon_slack_length=0.378
        pennation_angle_at_optimal=0.2633702
      PathPoint P1: socket_parent_frame_connectee_name=../../../pelvis (-0.0987 -0.114 0.0614)
      PathPoint P2: socket_parent_frame_connectee_name=../../../tibia_r (-0.029 -0.0417 -0.0196)
    Thelen2003Muscle semiten_r: max_isometric_force=301.9 optimal_fiber_length=0.193 tendon_slack_length=0.245
        pennation_angle_at_optimal=0.2244493
      PathPoint P1: socket_parent_frame_connectee_name=../../../pelvis (-0.1038 -0.1253 0.0515)
      PathPoint P2: socket_parent_frame_connectee_name=../../../tibia_r (-0.0312 -0.0508 -0.0229)
      PathPoint P3: socket_parent_frame_connectee_name=../../../tibia_r (0.0019 -0.0773 -0.0117)
    Thelen2003Muscle soleus_r: max_isometric_force=3585.9 optimal_fiber_length=0.044 tendon_slack_length=0.2815
        pennation_angle_at_optimal=0.4930555 FmaxMuscleStrain=2
      PathPoint P1: socket_parent_frame_connectee_name=../../../tibia_r (-0.0076 -0.0916 0.0098)
      PathPoint P2: socket_parent_frame_connectee_name=../../../calcn_r (0.0044 0.031 -0.0053)
    Thelen2003Muscle tfl_r: max_isometric_force=155 optimal_fiber_length=0.095 tendon_slack_length=0.45
        pennation_angle_at_optimal=0.05235988
      PathPoint P1: socket_parent_frame_connectee_name=../../../pelvis (-0.0311 0.0214 0.1241)
      PathPoint P2: socket_parent_frame_connectee_name=../../../femur_r (0.0294 -0.0995 0.0597)
      PathPoint P3: socket_parent_frame_connectee_name=../../../tibia_r (0.0108 -0.041 0.0346)
    Thelen2003Muscle tibant_r: max_isometric_force=673.7 optimal_fiber_length=0.0683 tendon_slack_length=0.241
        pennation_angle_at_optimal=0.1668535
      PathPoint P1: socket_parent_frame_connectee_name=../../../tibia_r (0.0154 -0.1312 0.0162)
      PathPoint P2: socket_parent_frame_connectee_name=../../../tibia_r (0.0251 -0.1906 0.0128)
      PathPoint P3: socket_parent_frame_connectee_name=../../../tibia_r (0.0233 -0.3659 -0.0132)
      PathPoint P4: socket_parent_frame_connectee_name=../../../calcn_r (0.1166 0.0178 -0.0305)
    Thelen2003Muscle tibpost_r: max_isometric_force=905.6 optimal_fiber_length=0.0378 tendon_slack_length=0.2818
        pennation_angle_at_optimal=0.2392846
      PathPoint P1: socket_parent_frame_connectee_name=../../../tibia_r (-0.0041 -0.1304 0.0103)
      PathPoint P2: socket_parent_frame_connectee_name=../../../tibia_r (-0.0164 -0.3655 -0.0175)
      PathPoint P3: socket_parent_frame_connectee_name=../../../calcn_r (0.0417 0.0334 -0.0286)
      PathPoint P4: socket_parent_frame_connectee_name=../../../calcn_r (0.0772 0.0159 -0.0281)
    Thelen2003Muscle vasint_r: max_isometric_force=1024.2 optimal_fiber_length=0.0993 tendon_slack_length=0.1216
        pennation_angle_at_optimal=0.07923795 FmaxMuscleStrain=2
      PathPoint P1: socket_parent_frame_connectee_name=../../../femur_r (0.029 -0.1924 0.031)
      PathPoint P2: socket_parent_frame_connectee_name=../../../femur_r (0.0335 -0.2084 0.0285)
      PathPoint P3: socket_parent_frame_connectee_name=../../../patella_r (-0.00380437 0.0180608 -0.00035737)
      PathWrap pathwrap_0: wrap_object=KnExt_vasint_at_fem_r
    Thelen2003Muscle vaslat_r: max_isometric_force=2255.4 optimal_fiber_length=0.0994 tendon_slack_length=0.1423
        pennation_angle_at_optimal=0.3207915 FmaxMuscleStrain=2
      PathPoint P1: socket_parent_frame_connectee_name=../../../femur_r (0.0048 -0.1854 0.0349)
      PathPoint P2: socket_parent_frame_connectee_name=../../../femur_r (0.0269 -0.2591 0.0409)
      PathPoint P3: socket_parent_frame_connectee_name=../../../patella_r (0.00165463 0.0150908 0.01185)
      PathWrap pathwrap_0: wrap_object=KnExt_at_fem_r
    Thelen2003Muscle vasmed_r: max_isometric_force=1443.7 optimal_fiber_length=0.0968 tendon_slack_length=0.1266
        pennation_angle_at_optimal=0.516792 FmaxMuscleStrain=2
      PathPoint P1: socket_parent_frame_connectee_name=../../../femur_r (0.014 -0.2099 0.0188)
      PathPoint P2: socket_parent_frame_connectee_name=../../../femur_r (0.0356 -0.2769 0.0009)
      PathPoint P3: socket_parent_frame_connectee_name=../../../patella_r (-0.000394407 0.0156828 -0.0093351)
      PathWrap pathwrap_0: wrap_object=KnExt_at_fem_r
    WISCO_Ligament [values shared by the 76 below unless stated]: ligament_transition_strain=0.06
        defining_length_parameter=reference_strain
    WISCO_Ligament MCLd1: linear_stiffness=500 reference_strain=0.04
      PathPoint P1: socket_parent_frame_connectee_name=../../../femur_distal_r (-0.0017455 -0.00045737 -0.037269)
      PathPoint P2: socket_parent_frame_connectee_name=../../../tibia_proximal_r (-0.00021515 -0.031853 -0.031379)
      PathWrap pathwrap_: wrap_object=Med_Lig_r method=hybrid
      # Options: 'slack_length','reference_strain','reference_force' property to compute slack length.NOTE: other properties will be ignored.
    WISCO_Ligament MCLd2: linear_stiffness=500 reference_strain=-0.04
      PathPoint P1: socket_parent_frame_connectee_name=../../../femur_distal_r (0.0028899 -0.0006742 -0.038035)
      PathPoint P2: socket_parent_frame_connectee_name=../../../tibia_proximal_r (0.0049463 -0.031262 -0.031379)
      PathWrap pathwrap_: wrap_object=Med_Lig_r method=hybrid
      # Options: 'slack_length','reference_strain','reference_force' property to compute slack length.NOTE: other properties will be ignored.
    WISCO_Ligament MCLd3: linear_stiffness=500 reference_strain=0
      PathPoint P1: socket_parent_frame_connectee_name=../../../femur_distal_r (0.0038775 0.0036824 -0.039033)
      PathPoint P2: socket_parent_frame_connectee_name=../../../tibia_proximal_r (0.0054198 -0.032627 -0.031467)
      PathWrap pathwrap_: wrap_object=Med_Lig_r method=hybrid
      # Options: 'slack_length','reference_strain','reference_force' property to compute slack length.NOTE: other properties will be ignored.
    WISCO_Ligament MCLd4: linear_stiffness=500 reference_strain=0.04
      PathPoint P1: socket_parent_frame_connectee_name=../../../femur_distal_r (0.00096177 0.0014429 -0.038236)
      PathPoint P2: socket_parent_frame_connectee_name=../../../tibia_proximal_r (0.0026082 -0.032414 -0.031427)
      PathWrap pathwrap_: wrap_object=Med_Lig_r method=hybrid
      # Options: 'slack_length','reference_strain','reference_force' property to compute slack length.NOTE: other properties will be ignored.
    WISCO_Ligament MCLd5: linear_stiffness=500 reference_strain=0.04
      PathPoint P1: socket_parent_frame_connectee_name=../../../femur_distal_r (-0.0010825 0.0046882 -0.038669)
      PathPoint P2: socket_parent_frame_connectee_name=../../../tibia_proximal_r (-9.2907e-5 -0.033387 -0.031424)
      PathWrap pathwrap_: wrap_object=Med_Lig_r method=hybrid
      # Options: 'slack_length','reference_strain','reference_force' property to compute slack length.NOTE: other properties will be ignored.
    WISCO_Ligament MCLs1: linear_stiffness=500 reference_strain=0.04
      PathPoint P1: socket_parent_frame_connectee_name=../../../femur_distal_r (0.0053709 0.0083394 -0.04065)
      PathPoint P2: socket_parent_frame_connectee_name=../../../tibia_proximal_r (0.014323 -0.061131 -0.015466)
      PathWrap pathwrap_: wrap_object=Med_Lig_r method=hybrid
      # Options: 'slack_length','reference_strain','reference_force' property to compute slack length.NOTE: other properties will be ignored.
    WISCO_Ligament MCLs2: linear_stiffness=500 reference_strain=0.04
      PathPoint P1: socket_parent_frame_connectee_name=../../../femur_distal_r (0.0056326 0.015275 -0.040595)
      PathPoint P2: socket_parent_frame_connectee_name=../../../tibia_proximal_r (0.019234 -0.071438 -0.010942)
      PathWrap pathwrap_: wrap_object=Med_Lig_r method=hybrid
      # Options: 'slack_length','reference_strain','reference_force' property to compute slack length.NOTE: other properties will be ignored.
    WISCO_Ligament MCLs3: linear_stiffness=500 reference_strain=0.05
      PathPoint P1: socket_parent_frame_connectee_name=../../../femur_distal_r (-0.00040512 0.016541 -0.038878)
      PathPoint P2: socket_parent_frame_connectee_name=../../../tibia_proximal_r (0.0011834 -0.05547 -0.021542)
      PathWrap pathwrap_: wrap_object=Med_Lig_r method=hybrid
      # Options: 'slack_length','reference_strain','reference_force' property to compute slack length.NOTE: other properties will be ignored.
    WISCO_Ligament MCLs4: linear_stiffness=500 reference_strain=0.05
      PathPoint P1: socket_parent_frame_connectee_name=../../../femur_distal_r (-0.0011507 0.0080931 -0.039482)
      PathPoint P2: socket_parent_frame_connectee_name=../../../tibia_proximal_r (0.0065168 -0.074829 -0.017341)
      PathWrap pathwrap_: wrap_object=Med_Lig_r method=hybrid
      # Options: 'slack_length','reference_strain','reference_force' property to compute slack length.NOTE: other properties will be ignored.
    WISCO_Ligament MCLs5: linear_stiffness=500 reference_strain=0.05
      PathPoint P1: socket_parent_frame_connectee_name=../../../femur_distal_r (0.0025007 0.011534 -0.040624)
      PathPoint P2: socket_parent_frame_connectee_name=../../../tibia_proximal_r (0.011919 -0.065762 -0.016444)
      PathWrap pathwrap_: wrap_object=Med_Lig_r method=hybrid
      # Options: 'slack_length','reference_strain','reference_force' property to compute slack length.NOTE: other properties will be ignored.
    WISCO_Ligament MCLs6: linear_stiffness=500 reference_strain=0.05
      PathPoint P1: socket_parent_frame_connectee_name=../../../femur_distal_r (0.00092052 0.013423 -0.040266)
      PathPoint P2: socket_parent_frame_connectee_name=../../../tibia_proximal_r (0.0071679 -0.06075 -0.019481)
      PathWrap pathwrap_: wrap_object=Med_Lig_r method=hybrid
      # Options: 'slack_length','reference_strain','reference_force' property to compute slack length.NOTE: other properties will be ignored.
    WISCO_Ligament ACLpl1: linear_stiffness=820 reference_strain=0.03
      PathPoint P1: socket_parent_frame_connectee_name=../../../femur_distal_r (-0.0038361 -3.0877e-5 0.0070808)
      PathPoint P2: socket_parent_frame_connectee_name=../../../tibia_proximal_r (0.010136 -0.020482 -0.00036186)
      # Options: 'slack_length','reference_strain','reference_force' property to compute slack length.NOTE: other properties will be ignored.
    WISCO_Ligament ACLpl2: linear_stiffness=820 reference_strain=0.01
      PathPoint P1: socket_parent_frame_connectee_name=../../../femur_distal_r (-0.0038641 -0.0030479 0.0072371)
      PathPoint P2: socket_parent_frame_connectee_name=../../../tibia_proximal_r (0.010071 -0.021322 0.0039158)
      # Options: 'slack_length','reference_strain','reference_force' property to compute slack length.NOTE: other properties will be ignored.
    WISCO_Ligament ACLpl3: linear_stiffness=820 reference_strain=-0.05
      PathPoint P1: socket_parent_frame_connectee_name=../../../femur_distal_r (-0.0012585 -0.00061438 0.005778)
      PathPoint P2: socket_parent_frame_connectee_name=../../../tibia_proximal_r (0.014123 -0.021793 0.0014326)
      # Options: 'slack_length','reference_strain','reference_force' property to compute slack length.NOTE: other properties will be ignored.
    WISCO_Ligament ACLpl4: linear_stiffness=820 reference_strain=-0.12
      PathPoint P1: socket_parent_frame_connectee_name=../../../femur_distal_r (-0.00049734 -0.0048442 0.0061921)
      PathPoint P2: socket_parent_frame_connectee_name=../../../tibia_proximal_r (0.014311 -0.021465 0.0048355)
      # Options: 'slack_length','reference_strain','reference_force' property to compute slack length.NOTE: other properties will be ignored.
    WISCO_Ligament ACLpl5: linear_stiffness=820 reference_strain=-0.02
      PathPoint P1: socket_parent_frame_connectee_name=../../../femur_distal_r (-0.0015255 -0.0021886 0.0062745)
      PathPoint P2: socket_parent_frame_connectee_name=../../../tibia_proximal_r (0.012201 -0.021304 0.0017124)
      # Options: 'slack_length','reference_strain','reference_force' property to compute slack length.NOTE: other properties will be ignored.
    WISCO_Ligament ACLpl6: linear_stiffness=820 reference_strain=-0.03
      PathPoint P1: socket_parent_frame_connectee_name=../../../femur_distal_r (-0.0027392 -0.0031662 0.0068024)
      PathPoint P2: socket_parent_frame_connectee_name=../../../tibia_proximal_r (0.012531 -0.021976 0.0043276)
      # Options: 'slack_length','reference_strain','reference_force' property to compute slack length.NOTE: other properties will be ignored.
    WISCO_Ligament ACLam1: linear_stiffness=820 reference_strain=-0.14
      PathPoint P1: socket_parent_frame_connectee_name=../../../femur_distal_r (0.0011685 0.0031897 0.002616)
      PathPoint P2: socket_parent_frame_connectee_name=../../../tibia_proximal_r (0.016437 -0.020666 -0.0052185)
      # Options: 'slack_length','reference_strain','reference_force' property to compute slack length.NOTE: other properties will be ignored.
    WISCO_Ligament ACLam2: linear_stiffness=820 reference_strain=-0.05
      PathPoint P1: socket_parent_frame_connectee_name=../../../femur_distal_r (-0.0011691 0.0010628 0.0052107)
      PathPoint P2: socket_parent_frame_connectee_name=../../../tibia_proximal_r (0.014972 -0.021642 -0.00057088)
      # Options: 'slack_length','reference_strain','reference_force' property to compute slack length.NOTE: other properties will be ignored.
    WISCO_Ligament ACLam3: linear_stiffness=820 reference_strain=-0.08
      PathPoint P1: socket_parent_frame_connectee_name=../../../femur_distal_r (-0.0009364 0.0036972 0.0041682)
      PathPoint P2: socket_parent_frame_connectee_name=../../../tibia_proximal_r (0.011939 -0.019622 -0.0038468)
      # Options: 'slack_length','reference_strain','reference_force' property to compute slack length.NOTE: other properties will be ignored.
    WISCO_Ligament ACLam4: linear_stiffness=820 reference_strain=-0.14
      PathPoint P1: socket_parent_frame_connectee_name=../../../femur_distal_r (0.00084902 0.0010256 0.0040526)
      PathPoint P2: socket_parent_frame_connectee_name=../../../tibia_proximal_r (0.018517 -0.022158 -0.001854)
      # Options: 'slack_length','reference_strain','reference_force' property to compute slack length.NOTE: other properties will be ignored.
    WISCO_Ligament ACLam5: linear_stiffness=820 reference_strain=-0.14
      PathPoint P1: socket_parent_frame_connectee_name=../../../femur_distal_r (0.00056465 0.0025467 0.003565)
      PathPoint P2: socket_parent_frame_connectee_name=../../../tibia_proximal_r (0.016132 -0.02093 -0.0036845)
      # Options: 'slack_length','reference_strain','reference_force' property to compute slack length.NOTE: other properties will be ignored.
    WISCO_Ligament ACLam6: linear_stiffness=820 reference_strain=-0.12
      PathPoint P1: socket_parent_frame_connectee_name=../../../femur_distal_r (-0.00057334 0.0017233 0.0046087)
      PathPoint P2: socket_parent_frame_connectee_name=../../../tibia_proximal_r (0.016387 -0.02174 -0.0013455)
      # Options: 'slack_length','reference_strain','reference_force' property to compute slack length.NOTE: other properties will be ignored.
    WISCO_Ligament PCLal1: linear_stiffness=900 reference_strain=0.03
      PathPoint P1: socket_parent_frame_connectee_name=../../../femur_distal_r (0.0010633 -0.0026457 -0.010709)
      PathPoint P2: socket_parent_frame_connectee_name=../../../tibia_proximal_r (-0.014049 -0.03139 0.0029368)
      # Options: 'slack_length','reference_strain','reference_force' property to compute slack length.NOTE: other properties will be ignored.
    WISCO_Ligament PCLal2: linear_stiffness=900 reference_strain=-0.1
      PathPoint P1: socket_parent_frame_connectee_name=../../../femur_distal_r (0.0071112 -0.00473 -0.0046475)
      PathPoint P2: socket_parent_frame_connectee_name=../../../tibia_proximal_r (-0.010099 -0.02566 0.00288)
      # Options: 'slack_length','reference_strain','reference_force' property to compute slack length.NOTE: other properties will be ignored.
    WISCO_Ligament PCLal3: linear_stiffness=900 reference_strain=0.03
      PathPoint P1: socket_parent_frame_connectee_name=../../../femur_distal_r (0.0046634 -0.00088757 -0.0070401)
      PathPoint P2: socket_parent_frame_connectee_name=../../../tibia_proximal_r (-0.012055 -0.028137 0.0030545)
      # Options: 'slack_length','reference_strain','reference_force' property to compute slack length.NOTE: other properties will be ignored.
    WISCO_Ligament PCLal4: linear_stiffness=900 reference_strain=-0.04
      PathPoint P1: socket_parent_frame_connectee_name=../../../femur_distal_r (0.0048125 -0.0045282 -0.00815)
      PathPoint P2: socket_parent_frame_connectee_name=../../../tibia_proximal_r (-0.012695 -0.030786 -0.0022615)
      # Options: 'slack_length','reference_strain','reference_force' property to compute slack length.NOTE: other properties will be ignored.
    WISCO_Ligament PCLal5: linear_stiffness=900 reference_strain=-0.02
      PathPoint P1: socket_parent_frame_connectee_name=../../../femur_distal_r (0.0050176 -0.0034313 -0.0075544)
      PathPoint P2: socket_parent_frame_connectee_name=../../../tibia_proximal_r (-0.01241 -0.029808 0.00089554)
      # Options: 'slack_length','reference_strain','reference_force' property to compute slack length.NOTE: other properties will be ignored.
    WISCO_Ligament PCLpm1: linear_stiffness=300 reference_strain=-0.05
      PathPoint P1: socket_parent_frame_connectee_name=../../../femur_distal_r (0.0045535 -0.0054955 -0.0090256)
      PathPoint P2: socket_parent_frame_connectee_name=../../../tibia_proximal_r (-0.013917 -0.031775 -0.0033347)
      # Options: 'slack_length','reference_strain','reference_force' property to compute slack length.NOTE: other properties will be ignored.
    WISCO_Ligament PCLpm2: linear_stiffness=300 reference_strain=-0.12
      PathPoint P1: socket_parent_frame_connectee_name=../../../femur_distal_r (0.0022125 -0.008266 -0.010651)
      PathPoint P2: socket_parent_frame_connectee_name=../../../tibia_proximal_r (-0.017052 -0.032778 -0.0065962)
      # Options: 'slack_length','reference_strain','reference_force' property to compute slack length.NOTE: other properties will be ignored.
    WISCO_Ligament PCLpm3: linear_stiffness=300 reference_strain=-0.08
      PathPoint P1: socket_parent_frame_connectee_name=../../../femur_distal_r (0.0018148 -0.0061646 -0.010734)
      PathPoint P2: socket_parent_frame_connectee_name=../../../tibia_proximal_r (-0.013228 -0.029616 -0.0066956)
      # Options: 'slack_length','reference_strain','reference_force' property to compute slack length.NOTE: other properties will be ignored.
    WISCO_Ligament PCLpm4: linear_stiffness=300 reference_strain=-0.12
      PathPoint P1: socket_parent_frame_connectee_name=../../../femur_distal_r (0.0065082 -0.0078452 -0.0080514)
      PathPoint P2: socket_parent_frame_connectee_name=../../../tibia_proximal_r (-0.016262 -0.033443 -0.0014326)
      # Options: 'slack_length','reference_strain','reference_force' property to compute slack length.NOTE: other properties will be ignored.
    WISCO_Ligament PCLpm5: linear_stiffness=300 reference_strain=-0.1
      PathPoint P1: socket_parent_frame_connectee_name=../../../femur_distal_r (0.0048766 -0.0078242 -0.0097349)
      PathPoint P2: socket_parent_frame_connectee_name=../../../tibia_proximal_r (-0.014784 -0.032047 -0.0047864)
      # Options: 'slack_length','reference_strain','reference_force' property to compute slack length.NOTE: other properties will be ignored.
    WISCO_Ligament LCL1: linear_stiffness=600 reference_strain=0.06
      PathPoint P1: socket_parent_frame_connectee_name=../../../femur_distal_r (-0.0021714 0.0020776 0.035465)
      PathPoint P2: socket_parent_frame_connectee_name=../../../tibia_proximal_r (-0.013217 -0.048269 0.043157)
      # Options: 'slack_length','reference_strain','reference_force' property to compute slack length.NOTE: other properties will be ignored.
    WISCO_Ligament LCL2: linear_stiffness=600 reference_strain=0.06
      PathPoint P1: socket_parent_frame_connectee_name=../../../femur_distal_r (-0.0021909 0.006045 0.035642)
      PathPoint P2: socket_parent_frame_connectee_name=../../../tibia_proximal_r (-0.014842 -0.050771 0.045564)
      # Options: 'slack_length','reference_strain','reference_force' property to compute slack length.NOTE: other properties will be ignored.
    WISCO_Ligament LCL3: linear_stiffness=600 reference_strain=0.06
      PathPoint P1: socket_parent_frame_connectee_name=../../../femur_distal_r (-0.000376 0.0039832 0.036523)
      PathPoint P2: socket_parent_frame_connectee_name=../../../tibia_proximal_r (-0.011881 -0.050605 0.045433)
      # Options: 'slack_length','reference_strain','reference_force' property to compute slack length.NOTE: other properties will be ignored.
    WISCO_Ligament LCL4: linear_stiffness=600 reference_strain=0.06
      PathPoint P1: socket_parent_frame_connectee_name=../../../femur_distal_r (-3.0505e-5 0.0065622 0.036488)
      PathPoint P2: socket_parent_frame_connectee_name=../../../tibia_proximal_r (-0.011705 -0.053176 0.0463)
      # Options: 'slack_length','reference_strain','reference_force' property to compute slack length.NOTE: other properties will be ignored.
    WISCO_Ligament PT1: linear_stiffness=3000 reference_strain=0.02
      PathPoint P1: socket_parent_frame_connectee_name=../../../patella_r (0.0023888 -0.009575232 0.01486)
      PathPoint P2: socket_parent_frame_connectee_name=../../../tibia_proximal_r (0.032815 -0.046612 0.01998)
      PathWrap pathwrap_: wrap_object=PatTen_r method=hybrid
      # Options: 'slack_length','reference_strain','reference_force' property to compute slack length.NOTE: other properties will be ignored.
    WISCO_Ligament PT2: linear_stiffness=30000 reference_strain=0.02
      PathPoint P1: socket_parent_frame_connectee_name=../../../patella_r (0.0034486 -0.01150293 -0.011925)
      PathPoint P2: socket_parent_frame_connectee_name=../../../tibia_proximal_r (0.033646 -0.049788 0.0046861)
      PathWrap pathwrap_: wrap_object=PatTen_r method=hybrid
      # Options: 'slack_length','reference_strain','reference_force' property to compute slack length.NOTE: other properties will be ignored.
    WISCO_Ligament PT3: linear_stiffness=30000 reference_strain=0
      PathPoint P1: socket_parent_frame_connectee_name=../../../patella_r (0.0061702 -0.008735332 0.0034073)
      PathPoint P2: socket_parent_frame_connectee_name=../../../tibia_proximal_r (0.037044 -0.050068 0.014577)
      PathWrap pathwrap_: wrap_object=PatTen_r method=hybrid
      # Options: 'slack_length','reference_strain','reference_force' property to compute slack length.NOTE: other properties will be ignored.
    WISCO_Ligament PT4: linear_stiffness=30000 reference_strain=0.01
      PathPoint P1: socket_parent_frame_connectee_name=../../../patella_r (0.0028259 -0.01642144 0.0032342)
      PathPoint P2: socket_parent_frame_connectee_name=../../../tibia_proximal_r (0.034705 -0.046151 0.013008)
      PathWrap pathwrap_: wrap_object=PatTen_r method=hybrid
      # Options: 'slack_length','reference_strain','reference_force' property to compute slack length.NOTE: other properties will be ignored.
    WISCO_Ligament PT5: linear_stiffness=30000 reference_strain=0
      PathPoint P1: socket_parent_frame_connectee_name=../../../patella_r (0.0032667 -0.01249393 0.010452)
      PathPoint P2: socket_parent_frame_connectee_name=../../../tibia_proximal_r (0.035086 -0.048114 0.017907)
      PathWrap pathwrap_: wrap_object=PatTen_r method=hybrid
      # Options: 'slack_length','reference_strain','reference_force' property to compute slack length.NOTE: other properties will be ignored.
    WISCO_Ligament PT6: linear_stiffness=3000 reference_strain=0.02
      PathPoint P1: socket_parent_frame_connectee_name=../../../patella_r (0.0058293 -0.01270133 -0.0037896)
      PathPoint P2: socket_parent_frame_connectee_name=../../../tibia_proximal_r (0.035954 -0.048374 0.0099597)
      PathWrap pathwrap_: wrap_object=PatTen_r method=hybrid
      # Options: 'slack_length','reference_strain','reference_force' property to compute slack length.NOTE: other properties will be ignored.
    WISCO_Ligament lPFL1: linear_stiffness=150 reference_strain=0.01
      PathPoint P1: socket_parent_frame_connectee_name=../../../femur_distal_r (0.02 0.01 0.035456)
      PathPoint P2: socket_parent_frame_connectee_name=../../../patella_r (-0.0015501 0.01082177 0.018582)
      # Options: 'slack_length','reference_strain','reference_force' property to compute slack length.NOTE: other properties will be ignored.
    WISCO_Ligament lPFL2: linear_stiffness=150 reference_strain=-0.1
      PathPoint P1: socket_parent_frame_connectee_name=../../../femur_distal_r (0.023 0.0005 0.0344)
      PathPoint P2: socket_parent_frame_connectee_name=../../../patella_r (-0.00011041 -0.008670132 0.017223)
      # Options: 'slack_length','reference_strain','reference_force' property to compute slack length.NOTE: other properties will be ignored.
    WISCO_Ligament lPFL3: linear_stiffness=150 reference_strain=0.01
      PathPoint P1: socket_parent_frame_connectee_name=../../../femur_distal_r (0.017602 0.0055075 0.036008)
      PathPoint P2: socket_parent_frame_connectee_name=../../../patella_r (-0.0030893 0.002456768 0.021373)
      # Options: 'slack_length','reference_strain','reference_force' property to compute slack length.NOTE: other properties will be ignored.
    WISCO_Ligament lPFL4: linear_stiffness=150 reference_strain=-0.12
      PathPoint P1: socket_parent_frame_connectee_name=../../../femur_distal_r (0.025 0.0070288 0.033883)
      PathPoint P2: socket_parent_frame_connectee_name=../../../patella_r (0.00092173 0.004008768 0.021066)
      # Options: 'slack_length','reference_strain','reference_force' property to compute slack length.NOTE: other properties will be ignored.
    WISCO_Ligament lPFL5: linear_stiffness=150 reference_strain=0.01
      PathPoint P1: socket_parent_frame_connectee_name=../../../femur_distal_r (0.019 0.008 0.035591)
      PathPoint P2: socket_parent_frame_connectee_name=../../../patella_r (-0.0025654 0.006071768 0.021187)
      # Options: 'slack_length','reference_strain','reference_force' property to compute slack length.NOTE: other properties will be ignored.
    WISCO_Ligament lPFL6: linear_stiffness=150 reference_strain=0.01
      PathPoint P1: socket_parent_frame_connectee_name=../../../femur_distal_r (0.019 0.003 0.035537)
      PathPoint P2: socket_parent_frame_connectee_name=../../../patella_r (-0.0024546 -0.004656232 0.020621)
      # Options: 'slack_length','reference_strain','reference_force' property to compute slack length.NOTE: other properties will be ignored.
    WISCO_Ligament lPFL7: linear_stiffness=150 reference_strain=-0.08
      PathPoint P1: socket_parent_frame_connectee_name=../../../femur_distal_r (0.023 0.0095 0.034)
      PathPoint P2: socket_parent_frame_connectee_name=../../../patella_r (-0.00087067 0.007909768 0.020645)
      # Options: 'slack_length','reference_strain','reference_force' property to compute slack length.NOTE: other properties will be ignored.
    WISCO_Ligament lPFL8: linear_stiffness=150 reference_strain=-0.08
      PathPoint P1: socket_parent_frame_connectee_name=../../../femur_distal_r (0.0235 0.0042486 0.035)
      PathPoint P2: socket_parent_frame_connectee_name=../../../patella_r (-5.8994e-5 -0.0008052324 0.021541)
      # Options: 'slack_length','reference_strain','reference_force' property to compute slack length.NOTE: other properties will be ignored.
    WISCO_Ligament mPFL1: linear_stiffness=150 reference_strain=-0.05
      PathPoint P1: socket_parent_frame_connectee_name=../../../femur_distal_r (0.01482 0.014851 -0.037847)
      PathPoint P2: socket_parent_frame_connectee_name=../../../patella_r (0.00022401 0.007770768 -0.018839)
      # Options: 'slack_length','reference_strain','reference_force' property to compute slack length.NOTE: other properties will be ignored.
    WISCO_Ligament mPFL2: linear_stiffness=150 reference_strain=0.01
      PathPoint P1: socket_parent_frame_connectee_name=../../../femur_distal_r (0.014175 0.0056463 -0.039555)
      PathPoint P2: socket_parent_frame_connectee_name=../../../patella_r (0.00109 -0.009672032 -0.016379)
      # Options: 'slack_length','reference_strain','reference_force' property to compute slack length.NOTE: other properties will be ignored.
    WISCO_Ligament mPFL3: linear_stiffness=150 reference_strain=0.01
      PathPoint P1: socket_parent_frame_connectee_name=../../../femur_distal_r (0.011384 0.010327 -0.040161)
      PathPoint P2: socket_parent_frame_connectee_name=../../../patella_r (0.00031179 -0.001101232 -0.020734)
      # Options: 'slack_length','reference_strain','reference_force' property to compute slack length.NOTE: other properties will be ignored.
    WISCO_Ligament mPFL4: linear_stiffness=150 reference_strain=-0.06
      PathPoint P1: socket_parent_frame_connectee_name=../../../femur_distal_r (0.018919 0.010476 -0.036686)
      PathPoint P2: socket_parent_frame_connectee_name=../../../patella_r (0.0032401 -5.023237e-5 -0.020656)
      # Options: 'slack_length','reference_strain','reference_force' property to compute slack length.NOTE: other properties will be ignored.
    WISCO_Ligament mPFL5: linear_stiffness=150 reference_strain=-0.03
      PathPoint P1: socket_parent_frame_connectee_name=../../../femur_distal_r (0.015379 0.012476 -0.038367)
      PathPoint P2: socket_parent_frame_connectee_name=../../../patella_r (0.00088381 0.002788768 -0.020659)
      # Options: 'slack_length','reference_strain','reference_force' property to compute slack length.NOTE: other properties will be ignored.
    WISCO_Ligament mPFL6: linear_stiffness=150 reference_strain=0.01
      PathPoint P1: socket_parent_frame_connectee_name=../../../femur_distal_r (0.014485 0.0085394 -0.039286)
      PathPoint P2: socket_parent_frame_connectee_name=../../../patella_r (0.0016164 -0.004529232 -0.02005)
      # Options: 'slack_length','reference_strain','reference_force' property to compute slack length.NOTE: other properties will be ignored.
    WISCO_Ligament MCLp1: linear_stiffness=500 reference_strain=0.05
      PathPoint P1: socket_parent_frame_connectee_name=../../../femur_distal_r (-0.0080573 -0.0071292 -0.034763)
      PathPoint P2: socket_parent_frame_connectee_name=../../../tibia_proximal_r (-0.01695 -0.034752 -0.024723)
      PathWrap pathwrap_: wrap_object=Med_LigP_r method=hybrid
      # Options: 'slack_length','reference_strain','reference_force' property to compute slack length.NOTE: other properties will be ignored.
    WISCO_Ligament MCLp2: linear_stiffness=500 reference_strain=0.05
      PathPoint P1: socket_parent_frame_connectee_name=../../../femur_distal_r (-0.0055986 -0.0063413 -0.03542)
      PathPoint P2: socket_parent_frame_connectee_name=../../../tibia_proximal_r (-0.0154 -0.034926 -0.02684)
      PathWrap pathwrap_: wrap_object=Med_LigP_r method=hybrid
      # Options: 'slack_length','reference_strain','reference_force' property to compute slack length.NOTE: other properties will be ignored.
    WISCO_Ligament MCLp3: linear_stiffness=500 reference_strain=0.02
      PathPoint P1: socket_parent_frame_connectee_name=../../../femur_distal_r (-0.0072934 -0.0097238 -0.034157)
      PathPoint P2: socket_parent_frame_connectee_name=../../../tibia_proximal_r (-0.015144 -0.037335 -0.024747)
      PathWrap pathwrap_: wrap_object=Med_LigP_r method=hybrid
      # Options: 'slack_length','reference_strain','reference_force' property to compute slack length.NOTE: other properties will be ignored.
    WISCO_Ligament MCLp4: linear_stiffness=500 reference_strain=-0.02
      PathPoint P1: socket_parent_frame_connectee_name=../../../femur_distal_r (-0.0046077 -0.0095908 -0.034789)
      PathPoint P2: socket_parent_frame_connectee_name=../../../tibia_proximal_r (-0.01293 -0.037191 -0.02677)
      PathWrap pathwrap_: wrap_object=Med_LigP_r method=hybrid
      # Options: 'slack_length','reference_strain','reference_force' property to compute slack length.NOTE: other properties will be ignored.
    WISCO_Ligament MCLp5: linear_stiffness=500 reference_strain=0.05
      PathPoint P1: socket_parent_frame_connectee_name=../../../femur_distal_r (-0.0063085 -0.0083706 -0.034788)
      PathPoint P2: socket_parent_frame_connectee_name=../../../tibia_proximal_r (-0.015199 -0.03615 -0.025692)
      PathWrap pathwrap_: wrap_object=Med_LigP_r method=hybrid
      # Options: 'slack_length','reference_strain','reference_force' property to compute slack length.NOTE: other properties will be ignored.
    WISCO_Ligament PFL1: linear_stiffness=440 reference_strain=0.01
      PathPoint P1: socket_parent_frame_connectee_name=../../../femur_distal_r (-0.0017516 -0.0011259 0.034832)
      PathPoint P2: socket_parent_frame_connectee_name=../../../tibia_proximal_r (-0.023707 -0.039486 0.036077)
      # Options: 'slack_length','reference_strain','reference_force' property to compute slack length.NOTE: other properties will be ignored.
    WISCO_Ligament PFL2: linear_stiffness=440 reference_strain=-0.12
      PathPoint P1: socket_parent_frame_connectee_name=../../../femur_distal_r (-0.0009411 -0.0064366 0.033945)
      PathPoint P2: socket_parent_frame_connectee_name=../../../tibia_proximal_r (-0.021428 -0.039528 0.034615)
      # Options: 'slack_length','reference_strain','reference_force' property to compute slack length.NOTE: other properties will be ignored.
    WISCO_Ligament PFL3: linear_stiffness=440 reference_strain=-0.03
      PathPoint P1: socket_parent_frame_connectee_name=../../../femur_distal_r (0.00435 -0.0027203 0.036774)
      PathPoint P2: socket_parent_frame_connectee_name=../../../tibia_proximal_r (-0.023292 -0.041485 0.038865)
      # Options: 'slack_length','reference_strain','reference_force' property to compute slack length.NOTE: other properties will be ignored.
    WISCO_Ligament PFL4: linear_stiffness=440 reference_strain=-0.14
      PathPoint P1: socket_parent_frame_connectee_name=../../../femur_distal_r (0.0035 -0.007151 0.034517)
      PathPoint P2: socket_parent_frame_connectee_name=../../../tibia_proximal_r (-0.021261 -0.041671 0.038733)
      # Options: 'slack_length','reference_strain','reference_force' property to compute slack length.NOTE: other properties will be ignored.
    WISCO_Ligament PFL5: linear_stiffness=440 reference_strain=-0.1
      PathPoint P1: socket_parent_frame_connectee_name=../../../femur_distal_r (0.0017 -0.0048477 0.03444)
      PathPoint P2: socket_parent_frame_connectee_name=../../../tibia_proximal_r (-0.022384 -0.039633 0.036734)
      # Options: 'slack_length','reference_strain','reference_force' property to compute slack length.NOTE: other properties will be ignored.
    WISCO_Ligament pCAP1: linear_stiffness=500 reference_strain=0.04
      PathPoint P1: socket_parent_frame_connectee_name=../../../femur_distal_r (-0.00965 0.016897 -0.024009)
      PathPoint P2: socket_parent_frame_connectee_name=../../../tibia_proximal_r (-0.019173 -0.033168 -0.017395)
      PathWrap pathwrap_: wrap_object=Capsule_r
      # Options: 'slack_length','reference_strain','reference_force' property to compute slack length.NOTE: other properties will be ignored.
    WISCO_Ligament pCAP2: linear_stiffness=500 reference_strain=0.04
      PathPoint P1: socket_parent_frame_connectee_name=../../../femur_distal_r (-0.009839 0.016583 0.024113)
      PathPoint P2: socket_parent_frame_connectee_name=../../../tibia_proximal_r (-0.017485 -0.03569 0.021412)
      PathWrap pathwrap_: wrap_object=Capsule_r
      # Options: 'slack_length','reference_strain','reference_force' property to compute slack length.NOTE: other properties will be ignored.
    WISCO_Ligament pCAP3: linear_stiffness=500 reference_strain=0.04
      PathPoint P1: socket_parent_frame_connectee_name=../../../femur_distal_r (-0.00965 0.016897 -0.023009)
      PathPoint P2: socket_parent_frame_connectee_name=../../../tibia_proximal_r (-0.017476 -0.035694 0.020413)
      PathWrap pathwrap_: wrap_object=Capsule_r
      # Options: 'slack_length','reference_strain','reference_force' property to compute slack length.NOTE: other properties will be ignored.
    WISCO_Ligament pCAP4: linear_stiffness=500 reference_strain=0.03
      PathPoint P1: socket_parent_frame_connectee_name=../../../femur_distal_r (-0.009839 0.016583 0.023113)
      PathPoint P2: socket_parent_frame_connectee_name=../../../tibia_proximal_r (-0.01918 -0.033164 -0.016395)
      PathWrap pathwrap_: wrap_object=Capsule_r
      # Options: 'slack_length','reference_strain','reference_force' property to compute slack length.NOTE: other properties will be ignored.
    WISCO_Ligament pCAP5: linear_stiffness=500 reference_strain=0.04
      PathPoint P1: socket_parent_frame_connectee_name=../../../femur_distal_r (-0.00965 0.016897 -0.020009)
      PathPoint P2: socket_parent_frame_connectee_name=../../../tibia_proximal_r (-0.019206 -0.033152 -0.013396)
      PathWrap pathwrap_: wrap_object=Capsule_r
      # Options: 'slack_length','reference_strain','reference_force' property to compute slack length.NOTE: other properties will be ignored.
    WISCO_Ligament pCAP6: linear_stiffness=500 reference_strain=0.04
      PathPoint P1: socket_parent_frame_connectee_name=../../../femur_distal_r (-0.009839 0.016583 0.020113)
      PathPoint P2: socket_parent_frame_connectee_name=../../../tibia_proximal_r (-0.017453 -0.035705 0.017413)
      PathWrap pathwrap_: wrap_object=Capsule_r
      # Options: 'slack_length','reference_strain','reference_force' property to compute slack length.NOTE: other properties will be ignored.
    WISCO_Ligament pCAP7: linear_stiffness=500 reference_strain=0.04
      PathPoint P1: socket_parent_frame_connectee_name=../../../femur_distal_r (-0.00965 0.016897 -0.016009)
      PathPoint P2: socket_parent_frame_connectee_name=../../../tibia_proximal_r (-0.019237 -0.033136 -0.0093957)
      PathWrap pathwrap_: wrap_object=Capsule_r
      # Options: 'slack_length','reference_strain','reference_force' property to compute slack length.NOTE: other properties will be ignored.
    WISCO_Ligament pCAP8: linear_stiffness=500 reference_strain=0.04
      PathPoint P1: socket_parent_frame_connectee_name=../../../femur_distal_r (-0.009839 0.016583 0.016113)
      PathPoint P2: socket_parent_frame_connectee_name=../../../tibia_proximal_r (-0.01742 -0.035721 0.013413)
      PathWrap pathwrap_: wrap_object=Capsule_r
      # Options: 'slack_length','reference_strain','reference_force' property to compute slack length.NOTE: other properties will be ignored.
    WISCO_Ligament ITB_r: linear_stiffness=10000 reference_strain=0.56
      PathPoint P1: socket_parent_frame_connectee_name=../../../pelvis (-0.07 0.05 0.1)
      PathPoint P2: socket_parent_frame_connectee_name=../../../femur_r (-0.01 -0.0047 0.06)
      PathPoint P3: socket_parent_frame_connectee_name=../../../tibia_r (0.0108 -0.031 0.0346)
      # Options: 'slack_length','reference_strain','reference_force' property to compute slack length.NOTE: other properties will be ignored.
    WISCO_ElasticFoundationForce TF_contact: socket_target_mesh_connectee_name=../femurMesh
        socket_casting_mesh_connectee_name=../tibiaMesh min_proximity=0 max_proximity=0.1 verbose=2
      ContactParameters target_mesh_contact_params: elastic_modulus=5000000 poissons_ratio=0.45 thickness=0.01
      ContactParameters casting_mesh_contact_params: elastic_modulus=5000000 poissons_ratio=0.45 thickness=0.01
    WISCO_ElasticFoundationForce PF_contact: socket_target_mesh_connectee_name=../femurMesh
        socket_casting_mesh_connectee_name=../patellaMesh min_proximity=0 max_proximity=0.1 verbose=2
      ContactParameters target_mesh_contact_params: elastic_modulus=5000000 poissons_ratio=0.45 thickness=0.01
      ContactParameters casting_mesh_contact_params: elastic_modulus=5000000 poissons_ratio=0.45 thickness=0.01
    ObjectGroup hip_add_r: members=(addbrev_r addlong_r addmagDist_r addmagIsch_r addmagMid_r addmagProx_r bflh_r grac_r pect_r semimem_r semiten_r)
    ObjectGroup hip_flex_r: members=(addbrev_r addlong_r glmin1_r grac_r iliacus_r pect_r psoas_r recfem_r sart_r tfl_r)
    ObjectGroup hip_ext_r: members=(addlong_r addmagDist_r addmagIsch_r addmagMid_r addmagProx_r bflh_r glmax1_r glmax2_r glmax3_r glmed1_r glmed2_r glmed3_r glmin3_r semimem_r semiten_r)
    ObjectGroup knee_flex_r: members=(bflh_r bfsh_r gaslat_r gasmed_r grac_r sart_r semimem_r semiten_r)
    ObjectGroup ankle_df_r: members=(edl_r ehl_r pertert_r tibant_r)
    ObjectGroup everter_r: members=(edl_r perbrev_r perlong_r pertert_r)
    ObjectGroup inverter_r: members=(ehl_r fdl_r fhl_r tibant_r tibpost_r)
    ObjectGroup ankle_pf_r: members=(fdl_r fhl_r gaslat_r gasmed_r perbrev_r perlong_r soleus_r tibpost_r)
    ObjectGroup hip_exrot_r: members=(gem_r glmin3_r piri_r quadfem_r)
    ObjectGroup hip_abd_r: members=(glmax1_r glmed1_r glmed2_r glmed3_r glmin1_r glmin2_r glmin3_r piri_r sart_r tfl_r)
    ObjectGroup hip_inrot_r: members=(glmed1_r glmed2_r glmed3_r glmin1_r iliacus_r psoas_r tfl_r)
    ObjectGroup knee_ext_r: members=(recfem_r vasint_r vaslat_r vasmed_r)
    ObjectGroup knee_abd_r
  MarkerSet:
    Marker Oglobal: socket_parent_frame_connectee_name=../ground (0 0 0)
    Marker Xglobal: socket_parent_frame_connectee_name=../ground (1 0 0)
    Marker Yglobal: socket_parent_frame_connectee_name=../ground (0 1 0)
    Marker Zglobal: socket_parent_frame_connectee_name=../ground (0 0 1)
    Marker Sacrum: socket_parent_frame_connectee_name=../pelvis (-0.18 0.01 0)
    Marker Sacral: socket_parent_frame_connectee_name=../pelvis (-0.18 0.01 0)
    Marker S2: socket_parent_frame_connectee_name=../pelvis (-0.18 0.01 0)
    Marker SACR: socket_parent_frame_connectee_name=../pelvis (-0.18 0.01 0)
    Marker VSAC: socket_parent_frame_connectee_name=../pelvis (-0.18 0.01 0)
    Marker R.ASIS: socket_parent_frame_connectee_name=../pelvis (0.02 0.01 0.128)
    Marker R.Asis: socket_parent_frame_connectee_name=../pelvis (0.02 0.01 0.128)
    Marker RASIS: socket_parent_frame_connectee_name=../pelvis (0.02 0.01 0.128)
    Marker RASI: socket_parent_frame_connectee_name=../pelvis (0.02 0.01 0.128)
    Marker R.Iliac: socket_parent_frame_connectee_name=../pelvis (-0.08 0.06 0.15)
    Marker R.PSIS: socket_parent_frame_connectee_name=../pelvis (-0.18 0.01 0.055)
    Marker R.Psis: socket_parent_frame_connectee_name=../pelvis (-0.18 0.01 0.055)
    Marker RPSIS: socket_parent_frame_connectee_name=../pelvis (-0.18 0.01 0.055)
    Marker RPSI: socket_parent_frame_connectee_name=../pelvis (-0.18 0.01 0.055)
    Marker R.Trochanter: socket_parent_frame_connectee_name=../pelvis (-0.1 -0.11 0.16)
    Marker R.GreatTroch: socket_parent_frame_connectee_name=../pelvis (-0.1 -0.11 0.16)
    Marker R.GTR: socket_parent_frame_connectee_name=../pelvis (-0.1 -0.11 0.16)
    Marker L.ASIS: socket_parent_frame_connectee_name=../pelvis (0.02 0.01 -0.128)
    Marker L.Asis: socket_parent_frame_connectee_name=../pelvis (0.02 0.01 -0.128)
    Marker LASIS: socket_parent_frame_connectee_name=../pelvis (0.02 0.01 -0.128)
    Marker LASI: socket_parent_frame_connectee_name=../pelvis (0.02 0.01 -0.128)
    Marker L.Iliac: socket_parent_frame_connectee_name=../pelvis (-0.08 0.06 -0.15)
    Marker L.PSIS: socket_parent_frame_connectee_name=../pelvis (-0.18 0.01 -0.055)
    Marker L.Psis: socket_parent_frame_connectee_name=../pelvis (-0.18 0.01 -0.055)
    Marker LPSIS: socket_parent_frame_connectee_name=../pelvis (-0.18 0.01 -0.055)
    Marker LPSI: socket_parent_frame_connectee_name=../pelvis (-0.18 0.01 -0.055)
    Marker L.Trochanter: socket_parent_frame_connectee_name=../pelvis (-0.1 -0.11 -0.16)
    Marker L.GreatTroch: socket_parent_frame_connectee_name=../pelvis (-0.1 -0.11 -0.16)
    Marker L.GTR: socket_parent_frame_connectee_name=../pelvis (-0.1 -0.11 -0.16)
    Marker Offset: socket_parent_frame_connectee_name=../torso (-0.18 0.22 0)
    Marker Sternum: socket_parent_frame_connectee_name=../torso (0.035 0.41 0)
    Marker Xiphoid: socket_parent_frame_connectee_name=../torso (0.035 0.41 0)
    Marker T10: socket_parent_frame_connectee_name=../torso (0 0 0)
    Marker CLAV: socket_parent_frame_connectee_name=../torso (0.035 0.45 0)
    Marker R.Clavicle: socket_parent_frame_connectee_name=../torso (0.035 0.45 0.025)
    Marker L.Clavicle: socket_parent_frame_connectee_name=../torso (0.035 0.45 -0.025)
    Marker STRN: socket_parent_frame_connectee_name=../torso (0.18 0.22 0)
    Marker RBAK: socket_parent_frame_connectee_name=../torso (0.18 0.22 0)
    Marker Thoracic: socket_parent_frame_connectee_name=../torso (0.18 0.22 0)
    Marker R.Scapula: socket_parent_frame_connectee_name=../torso (-0.12 -0.1 -0.08)
    Marker R.Scapula.Top: socket_parent_frame_connectee_name=../torso (0 0 0)
    Marker R.Scapula.Bottom: socket_parent_frame_connectee_name=../torso (0 0 0)
    Marker R.Angulus.Acromialis: socket_parent_frame_connectee_name=../torso (-0.085 0.435 0.184)
    Marker R.Trigonum.Spinae: socket_parent_frame_connectee_name=../torso (-0.126 0.4 0.119)
    Marker R.Angulus.Inferior: socket_parent_frame_connectee_name=../torso (-0.135 0.27 0.135)
    Marker C7.Spinous.Process: socket_parent_frame_connectee_name=../torso (-0.08 0.455 0)
    Marker Lumbar: socket_parent_frame_connectee_name=../torso (-0.08 0.455 0)
    Marker Neck: socket_parent_frame_connectee_name=../torso (-0.08 0.455 0)
    Marker L.Scapula: socket_parent_frame_connectee_name=../torso (-0.12 -0.1 0.08)
    Marker L.Scapula.Top: socket_parent_frame_connectee_name=../torso (0 0 0)
    Marker L.Scapula.Bottom: socket_parent_frame_connectee_name=../torso (0 0 0)
    Marker L.Angulus.Acromialis: socket_parent_frame_connectee_name=../torso (-0.085 0.435 -0.184)
    Marker L.Trigonum.Spinae: socket_parent_frame_connectee_name=../torso (-0.126 0.4 -0.119)
    Marker L.Angulus.Inferior: socket_parent_frame_connectee_name=../torso (-0.135 0.27 -0.135)
    Marker R.Shoulder: socket_parent_frame_connectee_name=../torso (-0.0488 0.45065 0.165)
    Marker R.ShoulderCenter: socket_parent_frame_connectee_name=../torso (-0.0488 0.44065 0.165)
    Marker R.ShoulderAnterior: socket_parent_frame_connectee_name=../torso (-0.0388 0.45065 0.165)
    Marker R.ShoulderPosterior: socket_parent_frame_connectee_name=../torso (-0.0588 0.45065 0.165)
    Marker RSHO: socket_parent_frame_connectee_name=../torso (-0.0488 0.45065 0.165)
    Marker L.Shoulder: socket_parent_frame_connectee_name=../torso (-0.0488 0.45065 -0.165)
    Marker L.ShoulderAnterior: socket_parent_frame_connectee_name=../torso (-0.0388 0.45065 -0.165)
    Marker L.ShoulderCenter: socket_parent_frame_connectee_name=../torso (-0.0488 0.45065 -0.165)
    Marker L.ShoulderPosterior: socket_parent_frame_connectee_name=../torso (-0.0588 0.45065 -0.165)
    Marker LSHO: socket_parent_frame_connectee_name=../torso (-0.0588 0.47065 -0.165)
    Marker Rear.Head: socket_parent_frame_connectee_name=../neckhead (-0.07166 0.2359 0)
    Marker Head.Rear: socket_parent_frame_connectee_name=../neckhead (-0.07166 0.2359 0)
    Marker RearHead: socket_parent_frame_connectee_name=../neckhead (-0.07166 0.2359 0)
    Marker HeadRear: socket_parent_frame_connectee_name=../neckhead (-0.07166 0.2359 0)
    Marker Front.Head: socket_parent_frame_connectee_name=../neckhead (0.1183 0.2359 0)
    Marker Head.Front: socket_parent_frame_connectee_name=../neckhead (0.1183 0.2359 0)
    Marker FrontHead: socket_parent_frame_connectee_name=../neckhead (0.1183 0.2359 0)
    Marker HeadFront: socket_parent_frame_connectee_name=../neckhead (0.1183 0.2359 0)
    Marker Top.Head: socket_parent_frame_connectee_name=../neckhead (0.0233 0.2959 0)
    Marker Head.Top: socket_parent_frame_connectee_name=../neckhead (0.0233 0.2959 0)
    Marker TopHead: socket_parent_frame_connectee_name=../neckhead (0.0233 0.2959 0)
    Marker HeadTop: socket_parent_frame_connectee_name=../neckhead (0.0233 0.2959 0)
    Marker R.Ear: socket_parent_frame_connectee_name=../neckhead (-0.07166 0.2359 0)
    Marker L.Ear: socket_parent_frame_connectee_name=../neckhead (-0.07166 0.2359 0)
    Marker RBHD: socket_parent_frame_connectee_name=../neckhead (-0.07166 0.2359 0)
    Marker RFHD: socket_parent_frame_connectee_name=../neckhead (-0.07166 0.2359 0)
    Marker LBHD: socket_parent_frame_connectee_name=../neckhead (-0.07166 0.2359 0)
    Marker LFHD: socket_parent_frame_connectee_name=../neckhead (-0.07166 0.2359 0)
    Marker HEDO: socket_parent_frame_connectee_name=../neckhead (-0.07166 0.2359 0)
    Marker HEDP: socket_parent_frame_connectee_name=../neckhead (-0.07166 0.2359 0)
    Marker HEDA: socket_parent_frame_connectee_name=../neckhead (-0.07166 0.2359 0)
    Marker HEDL: socket_parent_frame_connectee_name=../neckhead (-0.07166 0.2359 0)
    Marker C7: socket_parent_frame_connectee_name=../neckhead (0 0 0)
    Marker C7.Spinous.Process: socket_parent_frame_connectee_name=../neckhead (0 0 0)
    Marker R.Bicep: socket_parent_frame_connectee_name=../humerus_r (0.04 -0.15 0)
    Marker R.Biceps: socket_parent_frame_connectee_name=../humerus_r (0.04 -0.15 0)
    Marker R.Tricep: socket_parent_frame_connectee_name=../humerus_r (-0.04 -0.15 0)
    Marker R.Biceps.Lateral: socket_parent_frame_connectee_name=../humerus_r (0.03 -0.15 0.02)
    Marker R.Humerus: socket_parent_frame_connectee_name=../humerus_r (0 0 0)
    Marker R.ElbowCenter: socket_parent_frame_connectee_name=../humerus_r (-0.01 -0.281 0)
    Marker R.Elbow: socket_parent_frame_connectee_name=../humerus_r (-0.01 -0.281 0.04)
    Marker R.Elbow.Lateral: socket_parent_frame_connectee_name=../humerus_r (-0.01 -0.281 0.04)
    Marker R.Elbow.Lat: socket_parent_frame_connectee_name=../humerus_r (-0.01 -0.281 0.04)
    Marker RELB: socket_parent_frame_connectee_name=../humerus_r (-0.01 -0.281 0.04)
    Marker R.Elbow.Medial: socket_parent_frame_connectee_name=../humerus_r (0 -0.281 -0.04)
    Marker R.ElbowMedial: socket_parent_frame_connectee_name=../humerus_r (0 -0.281 -0.04)
    Marker R.Elbow.Med: socket_parent_frame_connectee_name=../humerus_r (0 -0.281 -0.04)
    Marker R.MElbow: socket_parent_frame_connectee_name=../humerus_r (0 -0.281 -0.04)
    Marker R.Melb: socket_parent_frame_connectee_name=../humerus_r (0 -0.281 -0.04)
    Marker R.Forearm: socket_parent_frame_connectee_name=../ulna_r (0 -0.15 0)
    Marker R.Wrist: socket_parent_frame_connectee_name=../radius_r (-0.025 -0.245 0.006)
    Marker R.WristCenter: socket_parent_frame_connectee_name=../radius_r (-0.025 -0.245 0.006)
    Marker R.Wrist.Lateral: socket_parent_frame_connectee_name=../radius_r (-0.025 -0.245 0.006)
    Marker R.Wrist.Lat: socket_parent_frame_connectee_name=../radius_r (-0.025 -0.245 0.006)
    Marker R.Wrist.Medial: socket_parent_frame_connectee_name=../radius_r (0.035 -0.245 0)
    Marker R.Wrist.Med: socket_parent_frame_connectee_name=../radius_r (0.035 -0.245 0)
    Marker R.Ulna: socket_parent_frame_connectee_name=../radius_r (0 -0.245 -0.03)
    Marker R.Radius: socket_parent_frame_connectee_name=../radius_r (0 -0.245 0.04)
    Marker RWRI: socket_parent_frame_connectee_name=../radius_r (-0.025 -0.245 0.006)
    Marker RWRA: socket_parent_frame_connectee_name=../radius_r (-0.025 -0.245 0.006)
    Marker RWRB: socket_parent_frame_connectee_name=../radius_r (0.035 -0.245 0)
    Marker R.Hand: socket_parent_frame_connectee_name=../hand_r (-0.03 -0.05 0)
    Marker L.Bicep: socket_parent_frame_connectee_name=../humerus_l (0.04 -0.15 0)
    Marker L.Biceps: socket_parent_frame_connectee_name=../humerus_l (0.04 -0.15 0)
    Marker L.Tricep: socket_parent_frame_connectee_name=../humerus_l (-0.04 -0.15 0)
    Marker L.Biceps.Lateral: socket_parent_frame_connectee_name=../humerus_l (0.03 -0.15 -0.02)
    Marker L.Humerus: socket_parent_frame_connectee_name=../humerus_l (0 0 0)
    Marker L.ElbowCenter: socket_parent_frame_connectee_name=../humerus_l (0.01 -0.281 0)
    Marker L.Elbow: socket_parent_frame_connectee_name=../humerus_l (0.01 -0.281 -0.04)
    Marker L.Elbow.Lateral: socket_parent_frame_connectee_name=../humerus_l (0.01 -0.281 -0.04)
    Marker L.ElbowLateral: socket_parent_frame_connectee_name=../humerus_l (0.01 -0.281 -0.04)
    Marker L.Elbow.Lat: socket_parent_frame_connectee_name=../humerus_l (0.01 -0.281 -0.04)
    Marker LELB: socket_parent_frame_connectee_name=../humerus_l (0.01 -0.281 -0.04)
    Marker L.Elbow.Medial: socket_parent_frame_connectee_name=../humerus_l (-0.02 -0.281 0.04)
    Marker L.ElbowMedial: socket_parent_frame_connectee_name=../humerus_l (-0.02 -0.281 0.04)
    Marker L.Elbow.Med: socket_parent_frame_connectee_name=../humerus_l (-0.02 -0.281 0.04)
    Marker L.MElbow: socket_parent_frame_connectee_name=../humerus_l (-0.02 -0.281 0.04)
    Marker L.Melb: socket_parent_frame_connectee_name=../humerus_l (-0.02 -0.281 0.04)
    Marker L.Forearm: socket_parent_frame_connectee_name=../ulna_l (0 -0.15 0)
    Marker L.Wrist: socket_parent_frame_connectee_name=../radius_l (-0.025 -0.245 -0.006)
    Marker L.WristCenter: socket_parent_frame_connectee_name=../radius_l (-0.025 -0.245 -0.006)
    Marker L.Wrist.Lateral: socket_parent_frame_connectee_name=../radius_l (-0.025 -0.245 -0.006)
    Marker L.Wrist.Lat: socket_parent_frame_connectee_name=../radius_l (-0.025 -0.245 -0.006)
    Marker L.Wrist.Medial: socket_parent_frame_connectee_name=../radius_l (0.035 -0.245 0)
    Marker L.Wrist.Med: socket_parent_frame_connectee_name=../radius_l (0.035 -0.245 0)
    Marker L.Ulna: socket_parent_frame_connectee_name=../radius_l (0 -0.245 0.03)
    Marker L.Radius: socket_parent_frame_connectee_name=../radius_l (0 -0.245 -0.04)
    Marker LWRI: socket_parent_frame_connectee_name=../radius_l (-0.025 -0.245 -0.006)
    Marker LWRA: socket_parent_frame_connectee_name=../radius_l (-0.025 -0.245 -0.006)
    Marker LWRB: socket_parent_frame_connectee_name=../radius_l (0.025 -0.245 0)
    Marker L.Hand: socket_parent_frame_connectee_name=../hand_l (-0.03 -0.05 0)
    Marker RKneeCenter: socket_parent_frame_connectee_name=../femur_r (0 -0.404 0)
    Marker R.Knee: socket_parent_frame_connectee_name=../femur_r (0 -0.404 0.05)
    Marker R.Knee.Lateral: socket_parent_frame_connectee_name=../femur_r (0 -0.404 0.05)
    Marker R.Knee.Lat: socket_parent_frame_connectee_name=../femur_r (0 -0.404 0.05)
    Marker RKNE: socket_parent_frame_connectee_name=../femur_r (0 -0.404 0.05)
    Marker R.Knee.Medial: socket_parent_frame_connectee_name=../femur_r (0 -0.404 -0.05)
    Marker R.Knee.Med: socket_parent_frame_connectee_name=../femur_r (0 -0.404 -0.05)
    Marker R.MKnee: socket_parent_frame_connectee_name=../femur_r (0 -0.404 -0.05)
    Marker R.Mkn: socket_parent_frame_connectee_name=../femur_r (0 -0.404 -0.05)
    Marker R.Thigh: socket_parent_frame_connectee_name=../femur_r (0.0179 -0.224 0.1147)
    Marker R.Thigh.Superior: socket_parent_frame_connectee_name=../femur_r (0.0179 -0.224 0.1147)
    Marker R.Thigh.Inferior: socket_parent_frame_connectee_name=../femur_r (0.0179 -0.224 0.1147)
    Marker R.Thigh.Lateral: socket_parent_frame_connectee_name=../femur_r (0.0179 -0.224 0.1147)
    Marker R.Thigh.Lateral.Superior: socket_parent_frame_connectee_name=../femur_r (0.0179 -0.224 0.1147)
    Marker R.Thigh.Upper: socket_parent_frame_connectee_name=../femur_r (0.0179 -0.264 0.0647)
    Marker R.Thigh.Lateral.Inferior: socket_parent_frame_connectee_name=../femur_r (0.0179 -0.264 0.0647)
    Marker R.Thigh.Front: socket_parent_frame_connectee_name=../femur_r (0.08 -0.324 0.0047)
    Marker R.Thigh.Medial.Inferior: socket_parent_frame_connectee_name=../femur_r (0.08 -0.324 0.0047)
    Marker R.Thigh.Rear: socket_parent_frame_connectee_name=../femur_r (-0.0479 -0.324 0.0047)
    Marker R.Thigh.Medial.Superior: socket_parent_frame_connectee_name=../femur_r (0.0179 -0.224 0.1147)
    Marker R.TH1: socket_parent_frame_connectee_name=../femur_r (0.0179 -0.224 0.1147)
    Marker R.TH2: socket_parent_frame_connectee_name=../femur_r (0.0179 -0.264 0.0647)
    Marker R.TH3: socket_parent_frame_connectee_name=../femur_r (0.0179 -0.264 0.0647)
    Marker R.TH4: socket_parent_frame_connectee_name=../femur_r (0.08 -0.324 0.0047)
    Marker RHJC: socket_parent_frame_connectee_name=../femur_r (0 0 0)
    Marker R_HJC: socket_parent_frame_connectee_name=../femur_r (0 0 0)
    Marker R.AnkleCenter: socket_parent_frame_connectee_name=../tibia_r (-0.005 -0.385 0)
    Marker RAnkleCenter: socket_parent_frame_connectee_name=../tibia_r (-0.005 -0.385 0)
    Marker R.Ankle: socket_parent_frame_connectee_name=../tibia_r (-0.005 -0.385 0.053)
    Marker R.Ankle.Lateral: socket_parent_frame_connectee_name=../tibia_r (-0.005 -0.385 0.053)
    Marker R.Ankle.Lat: socket_parent_frame_connectee_name=../tibia_r (-0.005 -0.385 0.053)
    Marker RANK: socket_parent_frame_connectee_name=../tibia_r (-0.005 -0.41 0.053)
    Marker R.Ankle.Medial: socket_parent_frame_connectee_name=../tibia_r (0.006 -0.385 -0.038)
    Marker R.AnkleMedial: socket_parent_frame_connectee_name=../tibia_r (0.006 -0.385 -0.038)
    Marker RankleMedial: socket_parent_frame_connectee_name=../tibia_r (0.006 -0.385 -0.038)
    Marker R.MAnkle: socket_parent_frame_connectee_name=../tibia_r (0.006 -0.385 -0.038)
    Marker R.Man: socket_parent_frame_connectee_name=../tibia_r (0.006 -0.385 -0.038)
    Marker R.Ankle.Med: socket_parent_frame_connectee_name=../tibia_r (0.006 -0.385 -0.038)
    Marker R.TibTub: socket_parent_frame_connectee_name=../tibia_r (0.05 -0.06 0.01)
    Marker R.Shank: socket_parent_frame_connectee_name=../tibia_r (0.0104 -0.2322 0.0748)
    Marker R.Leg.Lateral.Inferior: socket_parent_frame_connectee_name=../tibia_r (0.0125 -0.3196 0.06)
    Marker R.Shank.Superior: socket_parent_frame_connectee_name=../tibia_r (0.0125 -0.3196 0.06)
    Marker R.Shank.Inferior: socket_parent_frame_connectee_name=../tibia_r (0.0125 -0.3196 0.06)
    Marker R.Shank.Lateral: socket_parent_frame_connectee_name=../tibia_r (0.0125 -0.3196 0.06)
    Marker R.Shank.Upper: socket_parent_frame_connectee_name=../tibia_r (0.0125 -0.3196 0.06)
    Marker R.Leg.Medial.Inferior: socket_parent_frame_connectee_name=../tibia_r (0.0125 -0.3196 0.06)
    Marker R.Shank.Front: socket_parent_frame_connectee_name=../tibia_r (0.0425 -0.3596 0)
    Marker R.Leg.Superior: socket_parent_frame_connectee_name=../tibia_r (0.0425 -0.3596 0)
    Marker R.Shank.Rear: socket_parent_frame_connectee_name=../tibia_r (-0.0325 -0.3596 0)
    Marker RTIB: socket_parent_frame_connectee_name=../tibia_r (0.0125 -0.3196 0.06)
    Marker R.SH1: socket_parent_frame_connectee_name=../tibia_r (0.0104 -0.2322 0.0748)
    Marker R.SH2: socket_parent_frame_connectee_name=../tibia_r (0.0125 -0.3196 0.06)
    Marker R.SH3: socket_parent_frame_connectee_name=../tibia_r (0.0125 -0.3196 0.06)
    Marker R.SH4: socket_parent_frame_connectee_name=../tibia_r (0.0125 -0.3196 0.06)
    Marker RTIB: socket_parent_frame_connectee_name=../tibia_r (0.0125 -0.3196 0.06)
    Marker R.Patella: socket_parent_frame_connectee_name=../patella_r (0.02 0.002610768 0)
    Marker R.Toe: socket_parent_frame_connectee_name=../calcn_r (0.19 0.018 0)
    Marker R.ToeMedial: socket_parent_frame_connectee_name=../calcn_r (0.19 0.018 0)
    Marker R.ToeLateral: socket_parent_frame_connectee_name=../calcn_r (0.19 0.018 0)
    Marker RTOE: socket_parent_frame_connectee_name=../calcn_r (0.19 0.018 0)
    Marker R.MedFoot: socket_parent_frame_connectee_name=../calcn_r (0.11 0.018 -0.04)
    Marker R.Midfoot.Medial: socket_parent_frame_connectee_name=../calcn_r (0.11 0.018 -0.04)
    Marker R.Midfoot.Lateral: socket_parent_frame_connectee_name=../calcn_r (0.11 0.018 0.04)
    Marker R.Midfoot.Superior: socket_parent_frame_connectee_name=../calcn_r (0.11 0.018 0.04)
    Marker R.Methead1: socket_parent_frame_connectee_name=../calcn_r (0.2 0.005 -0.045)
    Marker R.MT1: socket_parent_frame_connectee_name=../calcn_r (0.2 0.005 -0.045)
    Marker R.MT0: socket_parent_frame_connectee_name=../calcn_r (0.2 0.005 -0.045)
    Marker R.Latfoot: socket_parent_frame_connectee_name=../calcn_r (0.11 0.018 0.04)
    Marker R.MT5: socket_parent_frame_connectee_name=../calcn_r (0.15 0.005 0.055)
    Marker R.Methead5: socket_parent_frame_connectee_name=../calcn_r (0.15 0.005 0.055)
    Marker R.Heel: socket_parent_frame_connectee_name=../calcn_r (-0.03 0.018 -0.01)
    Marker R.Hindfoot: socket_parent_frame_connectee_name=../calcn_r (-0.03 0.018 -0.01)
    Marker RHEE: socket_parent_frame_connectee_name=../calcn_r (-0.03 0.018 -0.01)
    Marker LKneeCenter: socket_parent_frame_connectee_name=../femur_l (0 -0.404 0)
    Marker L.Knee: socket_parent_frame_connectee_name=../femur_l (0 -0.404 -0.05)
    Marker L.Knee.Lateral: socket_parent_frame_connectee_name=../femur_l (0 -0.404 -0.05)
    Marker L.Knee.Lat: socket_parent_frame_connectee_name=../femur_l (0 -0.404 -0.05)
    Marker LKNE: socket_parent_frame_connectee_name=../femur_l (0 -0.404 -0.05)
    Marker L.Knee.Medial: socket_parent_frame_connectee_name=../femur_l (0 -0.404 0.05)
    Marker L.Knee.Med: socket_parent_frame_connectee_name=../femur_l (0 -0.404 0.05)
    Marker L.MKnee: socket_parent_frame_connectee_name=../femur_l (0 -0.404 0.05)
    Marker L.Mkn: socket_parent_frame_connectee_name=../femur_l (0 -0.404 0.05)
    Marker L.Thigh: socket_parent_frame_connectee_name=../femur_l (0.0179 -0.224 -0.1147)
    Marker L.Thigh.Superior: socket_parent_frame_connectee_name=../femur_l (0.0179 -0.224 -0.1147)
    Marker L.Thigh.Inferior: socket_parent_frame_connectee_name=../femur_l (0.0179 -0.224 -0.1147)
    Marker L.Thigh.Lateral: socket_parent_frame_connectee_name=../femur_l (0.0179 -0.224 -0.1147)
    Marker L.Thigh.Upper: socket_parent_frame_connectee_name=../femur_l (0.0179 -0.264 -0.0647)
    Marker L.Thigh.Front: socket_parent_frame_connectee_name=../femur_l (0.08 -0.324 -0.0047)
    Marker L.Thigh.Medial.Inferior: socket_parent_frame_connectee_name=../femur_l (0.08 -0.324 -0.0047)
    Marker L.Thigh.Rear: socket_parent_frame_connectee_name=../femur_l (-0.0479 -0.324 -0.0047)
    Marker L.Thigh.Lateral.Inferior: socket_parent_frame_connectee_name=../femur_l (0.0179 -0.264 -0.0647)
    Marker LTHI: socket_parent_frame_connectee_name=../femur_l (0.0179 -0.264 -0.0647)
    Marker L.TH1: socket_parent_frame_connectee_name=../femur_l (0.0179 -0.224 -0.1147)
    Marker L.TH2: socket_parent_frame_connectee_name=../femur_l (0.0179 -0.224 -0.1147)
    Marker L.TH3: socket_parent_frame_connectee_name=../femur_l (0.0179 -0.264 -0.0647)
    Marker L.TH4: socket_parent_frame_connectee_name=../femur_l (0.08 -0.324 -0.0047)
    Marker LHJC: socket_parent_frame_connectee_name=../femur_l (0 0 0)
    Marker L_HJC: socket_parent_frame_connectee_name=../femur_l (0 0 0)
    Marker LAnkleCenter: socket_parent_frame_connectee_name=../tibia_l (-0.005 -0.385 0)
    Marker L.Ankle: socket_parent_frame_connectee_name=../tibia_l (-0.005 -0.385 -0.053)
    Marker L.Ankle.Lateral: socket_parent_frame_connectee_name=../tibia_l (-0.005 -0.385 -0.053)
    Marker L.Ankle.Lat: socket_parent_frame_connectee_name=../tibia_l (-0.005 -0.385 -0.053)
    Marker LANK: socket_parent_frame_connectee_name=../tibia_l (-0.005 -0.385 -0.053)
    Marker L.Ankle.Medial: socket_parent_frame_connectee_name=../tibia_l (0.006 -0.385 0.038)
    Marker L.Ankle.Med: socket_parent_frame_connectee_name=../tibia_l (0.006 -0.385 0.038)
    Marker L.Shank: socket_parent_frame_connectee_name=../tibia_l (0.0104 -0.2322 -0.0748)
    Marker L.Leg.Superior: socket_parent_frame_connectee_name=../tibia_l (0.0425 -0.3596 0)
    Marker L.Shank.Upper: socket_parent_frame_connectee_name=../tibia_l (0.0125 -0.3196 -0.06)
    Marker L.Shank.Superior: socket_parent_frame_connectee_name=../tibia_l (0.0125 -0.3196 -0.06)
    Marker L.Shank.Inferior: socket_parent_frame_connectee_name=../tibia_l (0.0125 -0.3196 -0.06)
    Marker L.Shank.Lateral: socket_parent_frame_connectee_name=../tibia_l (0.0125 -0.3196 -0.06)
    Marker L.Leg.Lateral.Inferior: socket_parent_frame_connectee_name=../tibia_l (0.0125 -0.3196 -0.06)
    Marker L.TibTub: socket_parent_frame_connectee_name=../tibia_l (0.05 -0.06 -0.01)
    Marker L.Shank.Front: socket_parent_frame_connectee_name=../tibia_l (0.0425 -0.3596 0)
    Marker L.Shank.Rear: socket_parent_frame_connectee_name=../tibia_l (-0.0325 -0.3596 0)
    Marker L.Leg.Medial.Inferior: socket_parent_frame_connectee_name=../tibia_l (0.0125 -0.3196 -0.06)
    Marker LTIB: socket_parent_frame_connectee_name=../tibia_l (0.0125 -0.3196 -0.06)
    Marker L.MAnkle: socket_parent_frame_connectee_name=../tibia_l (0.006 -0.3888 0.038)
    Marker L.Man: socket_parent_frame_connectee_name=../tibia_l (0.006 -0.3888 0.038)
    Marker L.SH1: socket_parent_frame_connectee_name=../tibia_l (0.0104 -0.2322 -0.0748)
    Marker L.SH2: socket_parent_frame_connectee_name=../tibia_l (0.0425 -0.3596 0)
    Marker L.SH3: socket_parent_frame_connectee_name=../tibia_l (0.0125 -0.3196 -0.06)
    Marker L.SH4: socket_parent_frame_connectee_name=../tibia_l (0.0125 -0.3196 -0.06)
    Marker L.Patella: socket_parent_frame_connectee_name=../patella_l (0.02 0.02 0)
    Marker L.Toe: socket_parent_frame_connectee_name=../calcn_l (0.19 0.018 0)
    Marker L.ToeMedial: socket_parent_frame_connectee_name=../calcn_l (0.19 0.018 0)
    Marker L.ToeLateral: socket_parent_frame_connectee_name=../calcn_l (0.19 0.018 0)
    Marker LTOE: socket_parent_frame_connectee_name=../calcn_l (0.19 0.018 0)
    Marker L.Midfoot.Medial: socket_parent_frame_connectee_name=../calcn_l (0.11 0.018 0.04)
    Marker L.Midfoot.Lateral: socket_parent_frame_connectee_name=../calcn_l (0.11 0.018 -0.04)
    Marker L.Midfoot.Superior: socket_parent_frame_connectee_name=../calcn_l (0.11 0.018 0)
    Marker L.MedFoot: socket_parent_frame_connectee_name=../calcn_l (0.11 0.018 0.04)
    Marker L.Methead1: socket_parent_frame_connectee_name=../calcn_l (0.2 0.005 0.045)
    Marker L.LatFoot: socket_parent_frame_connectee_name=../calcn_l (0.11 0.018 0.04)
    Marker L.Methead5: socket_parent_frame_connectee_name=../calcn_l (0.15 0.005 -0.055)
    Marker L.Heel: socket_parent_frame_connectee_name=../calcn_l (-0.03 0.018 0.01)
    Marker L.Hindfoot: socket_parent_frame_connectee_name=../calcn_l (-0.03 0.018 0.01)
    Marker LHEE: socket_parent_frame_connectee_name=../calcn_l (-0.03 0.018 0.01)
    Marker L.MT1: socket_parent_frame_connectee_name=../calcn_l (0.2 0.005 0.045)
    Marker L.MTO: socket_parent_frame_connectee_name=../calcn_l (0.2 0.005 0.045)
    Marker L.MT0: socket_parent_frame_connectee_name=../calcn_l (0.2 0.005 0.045)
    Marker L.MT5: socket_parent_frame_connectee_name=../calcn_l (0.15 0.005 -0.055)
