# OpenSim document version 30000
Model fbKnee_3segMenisci:
  length_units: m
  force_units: N
  gravity: 0 -9.80665 0
  defaults: Thelen2003Muscle default: optimal_fiber_length=0 pennation_angle_at_optimal=0 [radians]
      max_contraction_velocity=10 activation_time_constant=0.01 deactivation_time_constant=0.03 FmaxTendonStrain=0.05
      FmaxMuscleStrain=1 KshapeActive=0.35 KshapePassive=4 Af=0.3 Flen=1.5
  BodySet:
    Body ground: mass=0 mass_center=(0 0 0) inertia_xx=0 inertia_yy=0 inertia_zz=0
    Body pelvis: mass=8.3775 mass_center=(-0.0893 -0.025796 0) inertia_xx=0.053993 inertia_yy=0.061279
        inertia_zz=0.067263 meshes=(r_pelvis.vtp l_pelvis.vtp sacrum.vtp)
      CustomJoint gnd_pelvis: parent_body=ground location_in_parent=(0 0 0) location=(0 0 0)
        Coordinate pelvis_tilt: motion_type=rotational default_value=0 range=(-4.712389 4.712389) clamped=false
        Coordinate pelvis_list: motion_type=rotational default_value=0 range=(-4.712389 4.712389) clamped=false
        Coordinate pelvis_rot: motion_type=rotational default_value=0 range=(-4.712389 4.712389) clamped=false
        Coordinate pelvis_tx: motion_type=translational default_value=0 range=(-10 10) clamped=false
        Coordinate pelvis_ty: motion_type=translational default_value=0.969 range=(-10 10) clamped=false
        Coordinate pelvis_tz: motion_type=translational default_value=0 range=(-10 10) clamped=false
        SpatialTransform:
          TransformAxis rotation1: coordinates=pelvis_tilt axis=(0 0 1) LinearFunction(coefficients=1 0)
          TransformAxis rotation2: coordinates=pelvis_list axis=(1 0 0) LinearFunction(coefficients=1 0)
          TransformAxis rotation3: coordinates=pelvis_rot axis=(0 1 0) LinearFunction(coefficients=1 0)
          TransformAxis translation1: coordinates=pelvis_tx axis=(1 0 0) LinearFunction(coefficients=1 0)
          TransformAxis translation2: coordinates=pelvis_ty axis=(0 1 0) LinearFunction(coefficients=1 0)
          TransformAxis translation3: coordinates=pelvis_tz axis=(0 0 1) LinearFunction(coefficients=1 0)
      WrapEllipsoid PS_at_brim_r: translation=(-0.0798 -0.0654 0.0656) quadrant=all dimensions=(0.052 0.0492 0.071)
      WrapEllipsoid IL_at_brim_r: translation=(-0.0685 -0.0557 0.0756) dimensions=(0.0549 0.0665 0.071)
      WrapEllipsoid Gmax_at_pelvis_r: xyz_body_rotation=(-0.637045 0.383623 -0.684867)
          translation=(-0.0795 -0.0825 0.0665) dimensions=(0.04 0.04 0.06)
      WrapEllipsoid PS_at_brim_l: translation=(-0.0798 -0.0654 -0.0656) dimensions=(0.052 0.0492 0.071)
      WrapEllipsoid IL_at_brim_l: translation=(-0.0685 -0.0557 -0.0756) dimensions=(0.0549 0.0665 0.071)
      WrapEllipsoid Gmax_at_pelvis_l: xyz_body_rotation=(0.637045 -0.383623 -0.684867)
          translation=(-0.0795 -0.0825 -0.0665) dimensions=(0.04 0.04 0.06)
    Body torso: mass=24.2175 mass_center=(0 0.256438 0) inertia_xx=0.440821 inertia_yy=0.276872 inertia_zz=0.596511
        meshes=(lumbar1sm.vtp lumbar2sm.vtp lumbar3sm.vtp lumbar4sm.vtp lumbar5.vtp ribcage_s.vtp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)
      CustomJoint pelvis_torso: parent_body=pelvis location_in_parent=(-0.1 0.055 0) location=(0 0 0)
        Coordinate lumbar_ext: motion_type=rotational default_value=0 range=(-1.047198 1.047198) clamped=true
        Coordinate lumbar_latbend: motion_type=rotational default_value=0 range=(-1.047198 1.047198) clamped=true
        Coordinate lumbar_rot: motion_type=rotational default_value=0 range=(-1.047198 1.047198) clamped=true
        SpatialTransform: axes_held_at_zero=(translation1 translation2 translation3)
          TransformAxis rotation1: coordinates=lumbar_ext axis=(0 0 1) LinearFunction(coefficients=1 0)
          TransformAxis rotation2: coordinates=lumbar_latbend axis=(1 0 0) LinearFunction(coefficients=1 0)
          TransformAxis rotation3: coordinates=lumbar_rot axis=(0 1 0) LinearFunction(coefficients=1 0)
    Body neckhead: mass=5.205 mass_center=(0.0288 0.161501 0) inertia_xx=0.030471 inertia_yy=0.02092
        inertia_zz=0.028195 meshes=(cerv1sm.vtp cerv2sm.vtp cerv3sm.vtp cerv4sm.vtp cerv5sm.vtp cerv6sm.vtp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)
      CustomJoint torso_neckhead: parent_body=torso location_in_parent=(-0.0253 0.44895 0) location=(0 0 0)
        Coordinate neck_ext: motion_type=rotational default_value=3.1831e-10 range=(-0.8726646 1.256637) clamped=true
        Coordinate neck_latbend: motion_type=rotational default_value=0 range=(-0.6981317 0.6981317) clamped=true
        Coordinate neck_rot: motion_type=rotational default_value=0 range=(-1.151917 1.151917) clamped=true
        SpatialTransform: axes_held_at_zero=(translation1 translation2 translation3)
          TransformAxis rotation1: coordinates=neck_ext axis=(0 0 1) LinearFunction(coefficients=1 0)
          TransformAxis rotation2: coordinates=neck_latbend axis=(1 0 0) LinearFunction(coefficients=1 0)
          TransformAxis rotation3: coordinates=neck_rot axis=(0 1 0) LinearFunction(coefficients=1 0)
    Body humerus_r: mass=2.0325 mass_center=(0 -0.164502 0) inertia_xx=0.011946 inertia_yy=0.004121 inertia_zz=0.013409
        meshes=humerus_rv.vtp
      CustomJoint acromial_r: parent_body=torso location_in_parent=(-0.0281 0.41645 0.199) location=(0 0 0)
        Coordinate arm_add_r: motion_type=rotational default_value=-1.446864e-10 range=(-2.094395 1.570796)
            clamped=true
        Coordinate arm_flex_r: motion_type=rotational default_value=0 range=(-1.570796 1.570796) clamped=true
        Coordinate arm_rot_r: motion_type=rotational default_value=0 range=(-1.570796 1.570796) clamped=true
        SpatialTransform: axes_held_at_zero=(translation1 translation2 translation3)
          TransformAxis rotation1: coordinates=arm_add_r axis=(1 0 0) LinearFunction(coefficients=1 0)
          TransformAxis rotation2: coordinates=arm_flex_r axis=(0 0 1) LinearFunction(coefficients=1 0)
          TransformAxis rotation3: coordinates=arm_rot_r axis=(0 1 0) LinearFunction(coefficients=1 0)
    Body ulna_r: mass=0.6075 mass_center=(0 -0.120525 0) inertia_xx=0.002962 inertia_yy=0.000618 inertia_zz=0.003213
        meshes=ulna_rv.vtp
      CustomJoint elbow_r: parent_body=humerus_r location_in_parent=(0.013144 -0.286273 -0.009595) location=(0 0 0)
        Coordinate elbow_flex_r: motion_type=rotational default_value=5.784944e-5 range=(0 2.792527) clamped=true
        SpatialTransform: axes_held_at_zero=(rotation2 rotation3 translation1 translation2 translation3)
          TransformAxis rotation1: coordinates=elbow_flex_r axis=(0.226047 0.022269 0.9738618)
              LinearFunction(coefficients=1 0)
    Body radius_r: mass=0.6075 mass_center=(0 -0.120525 0) inertia_xx=0.002962 inertia_yy=0.000618 inertia_zz=0.003213
        meshes=radius_rv.vtp
      CustomJoint radioulnar_r: parent_body=ulna_r location_in_parent=(-0.006727 -0.013007 0.026083) location=(0 0 0)
        Coordinate pro_sup_r: motion_type=rotational default_value=1.047198 range=(0 1.570796) clamped=true
        SpatialTransform: axes_held_at_zero=(rotation1 rotation3 translation1 translation2 translation3)
          TransformAxis rotation2: coordinates=pro_sup_r axis=(0.05639803 0.9984065 0.001952001)
              LinearFunction(coefficients=1 0)
    Body hand_r: mass=0.4575 mass_center=(0 -0.068095 0) inertia_xx=0.000892 inertia_yy=0.000547 inertia_zz=0.00134
        meshes=(pisiform_rvs.vtp lunate_rvs.vtp scaphoid_rvs.vtp triquetrum_rvs.vtp hamate_rvs.vtp capitate_rvs.vtp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)
      CustomJoint radius_hand_r: parent_body=radius_r location_in_parent=(-0.008797 -0.235841 0.01361) location=(0 0 0)
        Coordinate wrist_flex_r: motion_type=rotational default_value=0 range=(-1.22173 1.22173) clamped=true
        SpatialTransform: axes_held_at_zero=(rotation2 rotation3 translation1 translation2 translation3)
          TransformAxis rotation1: coordinates=wrist_flex_r axis=(0 0 1) LinearFunction(coefficients=1 0)
    Body humerus_l: mass=2.0325 mass_center=(0 -0.164502 0) inertia_xx=0.011946 inertia_yy=0.004121 inertia_zz=0.013409
        meshes=humerus_lv.vtp
      CustomJoint acromial_l: parent_body=torso location_in_parent=(-0.0281 0.41645 -0.199) location=(0 0 0)
        Coordinate arm_add_l: motion_type=rotational default_value=-1.446864e-10 range=(-2.094395 1.570796)
            clamped=true
        Coordinate arm_flex_l: motion_type=rotational default_value=0 range=(-1.570796 1.570796) clamped=true
        Coordinate arm_rot_l: motion_type=rotational default_value=0 range=(-1.570796 1.570796) clamped=true
        SpatialTransform: axes_held_at_zero=(translation1 translation2 translation3)
          TransformAxis rotation1: coordinates=arm_add_l axis=(-1 0 0) LinearFunction(coefficients=1 0)
          TransformAxis rotation2: coordinates=arm_flex_l axis=(0 0 1) LinearFunction(coefficients=1 0)
          TransformAxis rotation3: coordinates=arm_rot_l axis=(0 -1 0) LinearFunction(coefficients=1 0)
    Body ulna_l: mass=0.6075 mass_center=(0 -0.120525 0) inertia_xx=0.002962 inertia_yy=0.000618 inertia_zz=0.003213
        meshes=ulna_lv.vtp
      CustomJoint elbow_l: parent_body=humerus_l location_in_parent=(0.013144 -0.286273 0.009595) location=(0 0 0)
        Coordinate elbow_flex_l: motion_type=rotational default_value=5.784944e-5 range=(0 2.792527) clamped=true
        SpatialTransform: axes_held_at_zero=(rotation2 rotation3 translation1 translation2 translation3)
          TransformAxis rotation1: coordinates=elbow_flex_l axis=(-0.226047 -0.022269 0.9738618)
              LinearFunction(coefficients=1 0)
    Body radius_l: mass=0.6075 mass_center=(0 -0.120525 0) inertia_xx=0.002962 inertia_yy=0.000618 inertia_zz=0.003213
        meshes=radius_lv.vtp
      CustomJoint radioulnar_l: parent_body=ulna_l location_in_parent=(-0.006727 -0.013007 -0.026083) location=(0 0 0)
        Coordinate pro_sup_l: motion_type=rotational default_value=1.047198 range=(0 1.570796) clamped=true
        SpatialTransform: axes_held_at_zero=(rotation1 rotation3 translation1 translation2 translation3)
          TransformAxis rotation2: coordinates=pro_sup_l axis=(-0.05639803 -0.9984065 0.001952001)
              LinearFunction(coefficients=1 0)
    Body hand_l: mass=0.4575 mass_center=(0 -0.068095 0) inertia_xx=0.000892 inertia_yy=0.000547 inertia_zz=0.00134
        meshes=(pisiform_lvs.vtp lunate_lvs.vtp scaphoid_lvs.vtp triquetrum_lvs.vtp hamate_lvs.vtp capitate_lvs.vtp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)
      CustomJoint radius_hand_l: parent_body=radius_l location_in_parent=(-0.008797 -0.235841 -0.01361)
          location=(0 0 0)
        Coordinate wrist_flex_l: motion_type=rotational default_value=0 range=(-1.22173 1.22173) clamped=true
        SpatialTransform: axes_held_at_zero=(rotation2 rotation3 translation1 translation2 translation3)
          TransformAxis rotation1: coordinates=wrist_flex_l axis=(0 0 1) LinearFunction(coefficients=1 0)
    Body femur_r: mass=10.1325 mass_center=(0 -0.162162 0) inertia_xx=0.171988 inertia_yy=0.035276 inertia_zz=0.171988
        meshes=r_femur.vtp
      CustomJoint hip_r: parent_body=pelvis location_in_parent=(-0.056276 -0.07849 0.07726) location=(0 0 0)
        Coordinate hip_flex_r: motion_type=rotational default_value=5.20871e-10 range=(-1.047198 2.617994) clamped=true
        Coordinate hip_add_r: motion_type=rotational default_value=0 range=(-1.047198 1.047198) clamped=true
        Coordinate hip_rot_r: motion_type=rotational default_value=0 range=(-1.047198 1.047198) clamped=true
        SpatialTransform: axes_held_at_zero=(translation1 translation2 translation3)
          TransformAxis rotation1: coordinates=hip_flex_r axis=(0 0 1) LinearFunction(coefficients=1 0)
          TransformAxis rotation2: coordinates=hip_add_r axis=(1 0 0) LinearFunction(coefficients=1 0)
          TransformAxis rotation3: coordinates=hip_rot_r axis=(0 1 0) LinearFunction(coefficients=1 0)
      WrapEllipsoid AB_at_femshaft_r: xyz_body_rotation=(0.111701 0 0.176278)
          translation=(0.0146011 -0.117162 0.025469) dimensions=(0.0165 0.07 0.021)
      WrapEllipsoid AL_at_femshaft_r: xyz_body_rotation=(0.111701 0 0.0541052)
          translation=(0.0308673 -0.23799 0.0119159) dimensions=(0.0201 0.1 0.018)
      WrapEllipsoid AMprox_at_femshaft_r: xyz_body_rotation=(0.111701 0 0.211185)
          translation=(0.00603642 -0.0775977 0.0299068) dimensions=(0.0211 0.07 0.032)
      WrapEllipsoid AMmid_at_femshaft_r: xyz_body_rotation=(0.111701 0 0.123918)
          translation=(0.0230125 -0.160711 0.0205842) dimensions=(0.0214 0.12 0.031)
      WrapEllipsoid AMdist_at_femshaft_r: xyz_body_rotation=(0.111701 0 0.176278)
          translation=(0.0307071 -0.260769 0.00936092) dimensions=(0.0218 0.2 0.0215)
      WrapEllipsoid AMisch_at_condyles_r: xyz_body_rotation=(0.111701 0 -0.434587)
          translation=(-0.0286471 -0.376993 -0.00367576) dimensions=(0.05 0.24 0.0402)
      WrapEllipsoid PECT_at_femshaft_r: xyz_body_rotation=(0.111701 0 0.211185)
          translation=(0.00762137 -0.0852965 0.0290433) dimensions=(0.0166 0.05 0.0131)
      WrapCylinder KnExt_at_fem_r: translation=(0.01 -0.397 0) quadrant=x radius=0.028 length=0.2
      WrapCylinder KnExt_vasint_at_fem_r: translation=(0.01 -0.397 0) quadrant=x radius=0.026 length=0.2
      WrapEllipsoid Gastroc_at_Condyles_r: xyz_body_rotation=(0.0589921 -0.0872665 0.0232129)
          translation=(0.01 -0.4075 0.0003) dimensions=(0.03 0.025 0.15)
    Body femur_distal_r: mass=0.01 mass_center=(0 0 0) inertia_xx=0.001 inertia_yy=0.001 inertia_zz=0.001
        meshes=(ACLC01-R-femur-cart-060914.vtp ACLC01-R-femur-060914.vtp)
      WeldJoint femur_femur: parent_body=femur_r location_in_parent=(-0.006000048 -0.4044252 -0.00126524)
          location=(0 0 0)
      WrapCylinder Capsule_r: xyz_body_rotation=(-0.0299066 0.02 0.331613) translation=(-0.004 -0.003 0) radius=0.018
          length=0.5
    Body tibia_proximal_r: mass=0.01 mass_center=(0 0 0) inertia_xx=0.001 inertia_yy=0.001 inertia_zz=0.001
        meshes=(ACLC01-R-tibia-cart-111214.vtp ACLC01-R-tibia-111214.vtp ACLC01-R-fibula-111214.vtp)
      CustomJoint knee_r: parent_body=femur_distal_r location_in_parent=(0 0 0) location=(0 0 0)
        Coordinate knee_flex_r: motion_type=rotational default_value=0 range=(-0.1745329 2.792527) clamped=false
        Coordinate knee_add_r: motion_type=rotational default_value=0 range=(-0.8726646 0.8726646) clamped=false
        Coordinate knee_rot_r: motion_type=rotational default_value=0 range=(-0.8726646 0.8726646) clamped=false
        Coordinate knee_tx_r: motion_type=translational default_value=0 range=(-0.2 0.2) clamped=false
        Coordinate knee_ty_r: motion_type=translational default_value=0 range=(-0.5 1.2) clamped=false
        Coordinate knee_tz_r: motion_type=translational default_value=0 range=(-0.2 0.2) clamped=false
        SpatialTransform:
          TransformAxis rotation1: coordinates=knee_flex_r axis=(0 0 1)
            SimmSpline: x=(-6.28319 6.28319) y=(6.28319 -6.28319)
          TransformAxis rotation2: coordinates=knee_add_r axis=(1 0 0) LinearFunction(coefficients=1 0)
          TransformAxis rotation3: coordinates=knee_rot_r axis=(0 1 0) LinearFunction(coefficients=1 0)
          TransformAxis translation1: coordinates=knee_tx_r axis=(1 0 0) LinearFunction(coefficients=1 0)
          TransformAxis translation2: coordinates=knee_ty_r axis=(0 1 0) LinearFunction(coefficients=1 0)
          TransformAxis translation3: coordinates=knee_tz_r axis=(0 0 1) LinearFunction(coefficients=1 0)
      WrapEllipsoid Med_Lig_r: xyz_body_rotation=(-0.104907 -0.0349066 0.181613) translation=(0.001 -0.0346 -0.0187)
          dimensions=(0.03 0.018 0.012)
      WrapEllipsoid Med_LigP_r: xyz_body_rotation=(-0.139813 0.349066 0.181613) translation=(-0.0104 -0.0314 -0.0227)
          dimensions=(0.025 0.0054 0.0053)
    Body patella_com_r: mass=1e-6 mass_center=(0 0 0) inertia_xx=1e-7 inertia_yy=1e-7 inertia_zz=1e-7
      CustomJoint pf_r: parent_body=femur_distal_r location_in_parent=(0 0 0) location=(0 0 0)
        Coordinate pf_flex_r: motion_type=rotational default_value=0 range=(-1.570796 1.570796) clamped=false
        Coordinate pf_rot_r: motion_type=rotational default_value=0 range=(-1.570796 1.570796) clamped=false
        Coordinate pf_tilt_r: motion_type=rotational default_value=0 range=(-0.8726646 0.8726646) clamped=false
        Coordinate pf_tx_r: motion_type=translational default_value=0.053 range=(-0.2 0.2) clamped=false
        Coordinate pf_ty_r: motion_type=translational default_value=0.005 range=(-0.2 0.2) clamped=false
        Coordinate pf_tz_r: motion_type=translational default_value=0.004 range=(-0.2 0.2) clamped=false
        SpatialTransform:
          TransformAxis rotation1: coordinates=pf_flex_r axis=(0 0 1) LinearFunction(coefficients=-1 0)
          TransformAxis rotation2: coordinates=pf_rot_r axis=(1 0 0) LinearFunction(coefficients=1 0)
          TransformAxis rotation3: coordinates=pf_tilt_r axis=(0 1 0) LinearFunction(coefficients=1 0)
          TransformAxis translation1: coordinates=pf_tx_r axis=(1 0 0) LinearFunction(coefficients=1 0)
          TransformAxis translation2: coordinates=pf_ty_r axis=(0 1 0) LinearFunction(coefficients=1 0)
          TransformAxis translation3: coordinates=pf_tz_r axis=(0 0 1) LinearFunction(coefficients=1 0)
    Body patella_r: mass=0.4875 mass_center=(0.0018 0.0264 0) inertia_xx=1.6e-5 inertia_yy=7.4e-5 inertia_zz=7.4e-5
        meshes=(ACLC01-R-patella-cart-060914.vtp ACLC01-R-patella-060914.vtp)
      WeldJoint patella_com_patella_r: parent_body=patella_com_r location_in_parent=(9.573314e-5 -0.01738923 0)
          location=(0 0 0)
      WrapEllipsoid PatTen_r: xyz_body_rotation=(0 0 0.01) translation=(0.0005 0.008 0.00048233)
          dimensions=(0.005 0.008 0.012)
    Body femur_l: mass=10.1325 mass_center=(0 -0.162162 0) inertia_xx=0.171988 inertia_yy=0.035276 inertia_zz=0.171988
        meshes=l_femur.vtp
      CustomJoint hip_l: parent_body=pelvis location_in_parent=(-0.056276 -0.07849 -0.07726) location=(0 0 0)
        Coordinate hip_flex_l: motion_type=rotational default_value=5.20871e-10 range=(-1.047198 2.617994) clamped=true
        Coordinate hip_add_l: motion_type=rotational default_value=-1.736236e-9 range=(-1.047198 0.3490659)
            clamped=true
        Coordinate hip_rot_l: motion_type=rotational default_value=0 range=(-1.047198 1.047198) clamped=true
        SpatialTransform: axes_held_at_zero=(translation1 translation2 translation3)
          TransformAxis rotation1: coordinates=hip_flex_l axis=(0 0 1) LinearFunction(coefficients=1 0)
          TransformAxis rotation2: coordinates=hip_add_l axis=(1 0 0) LinearFunction(coefficients=1 0)
          TransformAxis rotation3: coordinates=hip_rot_l axis=(0 1 0) LinearFunction(coefficients=1 0)
      WrapEllipsoid AB_at_femshaft_l: xyz_body_rotation=(-0.111701 0 0.176278)
          translation=(0.0146011 -0.117162 -0.025469) dimensions=(0.0165 0.07 0.021)
      WrapEllipsoid AL_at_femshaft_l: xyz_body_rotation=(-0.111701 0 0.0541052)
          translation=(0.0308673 -0.23799 -0.0119159) dimensions=(0.0201 0.1 0.018)
      WrapEllipsoid AMprox_at_femshaft_l: xyz_body_rotation=(-0.111701 0 0.211185)
          translation=(0.00603642 -0.0775977 -0.0299068) dimensions=(0.0211 0.07 0.032)
      WrapEllipsoid AMmid_at_femshaft_l: xyz_body_rotation=(-0.111701 0 0.123918)
          translation=(0.0230125 -0.160711 -0.0205842) dimensions=(0.0214 0.12 0.031)
      WrapEllipsoid AMdist_at_femshaft_l: xyz_body_rotation=(-0.111701 0 0.176278)
          translation=(0.0307071 -0.260769 -0.00936092) dimensions=(0.0218 0.2 0.0215)
      WrapEllipsoid AMisch_at_condyles_l: xyz_body_rotation=(-0.111701 0 -0.434587)
          translation=(-0.0286471 -0.376993 0.00367576) dimensions=(0.05 0.24 0.0402)
      WrapEllipsoid PECT_at_femshaft_l: xyz_body_rotation=(-0.111701 0 0.211185)
          translation=(0.00762137 -0.0852965 -0.0290433) dimensions=(0.0166 0.05 0.0131)
      WrapCylinder KnExt_at_fem_l: xyz_body_rotation=(0.0623371 -0.0507601 -0.892533)
          translation=(0.00358828 -0.402732 -0.00209111) radius=0.025 length=0.1
      WrapEllipsoid Gastroc_at_Condyles_l: xyz_body_rotation=(-0.0589921 0.0937242 0.0232129)
          translation=(0.0048 -0.4075 -0.0003) dimensions=(0.03 0.025 0.05)
    Body tibia_l: mass=3.2475 mass_center=(0 -0.171713 0) inertia_xx=0.029999 inertia_yy=0.005157 inertia_zz=0.031231
        meshes=(l_tibialoan.vtp l_fibula.vtp)
      CustomJoint knee_l: parent_body=femur_l location_in_parent=(0 0 0) location=(0 0 0)
        Coordinate knee_flex_l: motion_type=rotational default_value=4.859727e-9 range=(-0.1745329 2.792527)
            clamped=true
        SpatialTransform:
          TransformAxis rotation1: coordinates=knee_flex_l axis=(0 0 1)
            SimmSpline: x=(-6.28319 6.28319) y=(6.28319 -6.28319)
          TransformAxis rotation2: coordinates=knee_flex_l axis=(1 0 0)
            SimmSpline: x=(-0.174533 0 0.174533 0.349066 0.523599 0.698132 0.872665 1.0472 1.22173 1.39626 1.5708 1.74533 1.91986 2.0944)
                y=(0.00498946 0 -0.00605681 -0.0127056 -0.0193932 -0.025694 -0.0313393 -0.0362355 -0.0404783 -0.044365 -0.0484046 -0.0533308 -0.0601155 -0.0699935)
          TransformAxis rotation3: coordinates=knee_flex_l axis=(0 1 0)
            SimmSpline: x=(-0.174533 0 0.174533 0.349066 0.523599 0.698132 0.872665 1.0472 1.22173 1.39626 1.5708 1.74533 1.91986 2.0944)
                y=(0.0568237 0 -0.0473143 -0.0858667 -0.116487 -0.140093 -0.157672 -0.170252 -0.178879 -0.184595 -0.18842 -0.191344 -0.194325 -0.198293)
          TransformAxis translation1: coordinates=knee_flex_l axis=(1 0 0)
            SimmSpline: x=(-0.174533 0 0.174533 0.349066 0.523599 0.698132 0.872665 1.0472 1.22173 1.39626 1.5708 1.74533 1.91986 2.0944)
                y=(-0.00164957 -4.8e-7 0.00153765 0.00280273 0.00366246 0.00401894 0.00381314 0.00302974 0.00169348 -0.00013342 -0.00235575 -0.00485457 -0.00749805 -0.0101522)
          TransformAxis translation2: coordinates=knee_flex_l axis=(0 1 0)
            SimmSpline: x=(-0.174533 0 0.174533 0.349066 0.523599 0.698132 0.872665 1.0472 1.22173 1.39626 1.5708 1.74533 1.91986 2.0944)
                y=(-0.403959 -0.404425 -0.40548 -0.407056 -0.40905 -0.411333 -0.413758 -0.416171 -0.418425 -0.420384 -0.42194 -0.423017 -0.423578 -0.423625)
          TransformAxis translation3: coordinates=knee_flex_l axis=(0 0 1)
            SimmSpline: x=(-0.174533 0 0.174533 0.349066 0.523599 0.698132 0.872665 1.0472 1.22173 1.39626 1.5708 1.74533 1.91986 2.0944)
                y=(0.00082532 0.00126524 0.00170877 0.0021306 0.00251419 0.00284969 0.00313273 0.00336333 0.00354482 0.00368239 0.00378263 0.00385241 0.00389806 0.00392316)
      WrapEllipsoid GR_at_condyles_l: xyz_body_rotation=(0 0 -0.18326) translation=(0 0 0)
          dimensions=(0.036 0.0635 0.0533)
      WrapEllipsoid SM_at_condyles_l: xyz_body_rotation=(0 0 -0.296706) translation=(0 0 0)
          dimensions=(0.0352 0.0602 0.0489)
      WrapEllipsoid ST_at_condyles_l: xyz_body_rotation=(0 0 -0.270526) translation=(0 0 0)
          dimensions=(0.0425 0.069 0.0572)
      WrapCylinder BFLH_at_gastroc_l: translation=(-0.0316 -0.0443 0) quadrant=y radius=0.01 length=0.1
      WrapCylinder Gastroc_at_Shank_l: xyz_body_rotation=(-2.96723 -0.0289725 -1.47812)
          translation=(-0.0074 -0.074 0.0033) quadrant=-y radius=0.055 length=0.1
    Body patella_l: mass=0.4875 mass_center=(0.0018 0.0264 0) inertia_xx=1.6e-5 inertia_yy=7.4e-5 inertia_zz=7.4e-5
        meshes=patella_l.vtp
      CustomJoint pf_l: parent_body=femur_l location_in_parent=(0 0 0) location=(0 0 0)
        Coordinate pf_l_r3: motion_type=rotational default_value=0.001136855 range=(-99999.9 99999.9) clamped=false
        Coordinate pf_l_tx: motion_type=translational default_value=0.04435 range=(-99999.9 99999.9) clamped=false
        Coordinate pf_l_ty: motion_type=translational default_value=-0.418712 range=(-99999.9 99999.9) clamped=false
        SpatialTransform: axes_held_at_zero=(rotation2 rotation3 translation3)
          TransformAxis rotation1: coordinates=pf_l_r3 axis=(0 0 1) LinearFunction(coefficients=1 0)
          TransformAxis translation1: coordinates=pf_l_tx axis=(1 0 0) LinearFunction(coefficients=1 0)
          TransformAxis translation2: coordinates=pf_l_ty axis=(0 1 0) LinearFunction(coefficients=1 0)
    Body talus_l: mass=0.045 mass_center=(0.0055 0.0023 0) inertia_xx=3e-6 inertia_yy=1e-6 inertia_zz=3e-6
        meshes=talus_lv.vtp
      CustomJoint ankle_l: parent_body=tibia_l location_in_parent=(-0.01 -0.4 0) location=(0 0 0)
        Coordinate ankle_flex_l: motion_type=rotational default_value=0 range=(-1.570796 1.570796) clamped=true
        SpatialTransform: axes_held_at_zero=(rotation2 rotation3 translation1 translation2 translation3)
          TransformAxis rotation1: coordinates=ankle_flex_l axis=(-0.105014 -0.1740221 -0.9791263)
            SimmSpline: x=(-6.28319 6.28319) y=(6.28319 -6.28319)
    Body calcn_l: mass=1.235 mass_center=(0.101865 0.0156 0) inertia_xx=0.001269 inertia_yy=0.003229
        inertia_zz=0.003744
        meshes=(calcaneous_lv.vtp navicular_lv.vtp cuboid_lv.vtp first_cuneiform_lv.vtp second_cuneiform_lv.vtp third_cuneiform_lv.vtp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)
      CustomJoint subtalar_l: parent_body=talus_l location_in_parent=(-0.04877 -0.04195 -0.00792) location=(0 0 0)
        Coordinate subt_angle_l: motion_type=rotational default_value=0 range=(-0.6981317 0.6981317) clamped=true
        SpatialTransform: axes_held_at_zero=(rotation2 rotation3 translation1 translation2 translation3)
          TransformAxis rotation1: coordinates=subt_angle_l axis=(0.78718 0.604747 0.120949)
            SimmSpline: x=(-6.28319 6.28319) y=(6.28319 -6.28319)
    Body toes_l: mass=0.1975 mass_center=(0.0307 -0.0026 -0.0105) inertia_xx=0.000202 inertia_yy=0.000517
        inertia_zz=0.000595
        meshes=(prox_phalanx1_lvs.vtp prox_phalanx2_lvs.vtp prox_phalanx3_lvs.vtp prox_phalanx4_lvs.vtp prox_phalanx5_lvs.vtp mid_phalanx2_lvs.vtp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)
      CustomJoint mtp_l: parent_body=calcn_l location_in_parent=(0.1788 -0.002 -0.00108) location=(0 0 0)
        Coordinate mtp_angle_l: motion_type=rotational default_value=0 range=(-1.047198 1.047198) clamped=true
        SpatialTransform: axes_held_at_zero=(rotation2 rotation3 translation1 translation2 translation3)
          TransformAxis rotation1: coordinates=mtp_angle_l axis=(0.5809542 0 0.8139363)
            SimmSpline: x=(-6.28319 6.28319) y=(6.28319 -6.28319)
    Body tibia_r: mass=3.2475 mass_center=(0 -0.171713 0) inertia_xx=0.029999 inertia_yy=0.005157 inertia_zz=0.031231
        meshes=(r_tibialoan.vtp r_fibula.vtp)
      WeldJoint tibia_tibia: parent_body=tibia_proximal_r location_in_parent=(0.006 0 0) location=(0 0 0)
      WrapEllipsoid GR_at_condyles_r: xyz_body_rotation=(0 0 -0.18326) translation=(0 0 0)
          dimensions=(0.036 0.0635 0.0533)
      WrapEllipsoid SM_at_condyles_r: xyz_body_rotation=(0 0 -0.296706) translation=(0 0 0)
          dimensions=(0.0352 0.0602 0.0489)
      WrapEllipsoid ST_at_condyles_r: xyz_body_rotation=(0 0 -0.270526) translation=(0 0 0)
          dimensions=(0.0425 0.069 0.0572)
      WrapCylinder BFLH_at_gastroc_r: translation=(-0.0316 -0.0443 0) quadrant=y radius=0.01 length=0.1
      WrapCylinder Gastroc_at_Shank_r: xyz_body_rotation=(2.96723 0.0289725 -1.47812)
          translation=(-0.0074 -0.074 -0.0033) quadrant=-y radius=0.055 length=0.1
    Body talus_r: mass=0.045 mass_center=(0.0055 0.0023 0) inertia_xx=3e-6 inertia_yy=1e-6 inertia_zz=3e-6
        meshes=talus_rv.vtp
      CustomJoint ankle_r: parent_body=tibia_r location_in_parent=(-0.01 -0.4 0) location=(0 0 0)
        Coordinate ankle_flex_r: motion_type=rotational default_value=0 range=(-1.570796 1.570796) clamped=true
        SpatialTransform: axes_held_at_zero=(rotation2 rotation3 translation1 translation2 translation3)
          TransformAxis rotation1: coordinates=ankle_flex_r axis=(-0.105014 -0.1740221 0.9791263)
              LinearFunction(coefficients=1 0)
    Body calcn_r: mass=1.235 mass_center=(0.101865 0.0156 0) inertia_xx=0.001269 inertia_yy=0.003229
        inertia_zz=0.003744
        meshes=(calcaneous_rv.vtp navicular_rv.vtp cuboid_rv.vtp first_cuneiform_rv.vtp second_cuneiform_rv.vtp third_cuneiform_rv.vtp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)
      CustomJoint subtalar_r: parent_body=talus_r location_in_parent=(-0.04877 -0.04195 0.00792) location=(0 0 0)
        Coordinate subt_angle_r: motion_type=rotational default_value=0 range=(-1.047198 1.047198) clamped=true
        SpatialTransform: axes_held_at_zero=(rotation2 rotation3 translation1 translation2 translation3)
          TransformAxis rotation1: coordinates=subt_angle_r axis=(0.78718 0.604747 -0.120949)
              LinearFunction(coefficients=1 0)
    Body toes_r: mass=0.1975 mass_center=(0.0307 -0.0026 0.0105) inertia_xx=0.000202 inertia_yy=0.000517
        inertia_zz=0.000595
        meshes=(prox_phalanx1_rvs.vtp prox_phalanx2_rvs.vtp prox_phalanx3_rvs.vtp prox_phalanx4_rvs.vtp prox_phalanx5_rvs.vtp mid_phalanx2_rvs.vtp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)
      CustomJoint mtp_r: parent_body=calcn_r location_in_parent=(0.1788 -0.002 0.00108) location=(0 0 0)
        Coordinate mtp_angle_r: motion_type=rotational default_value=0 range=(-1.047198 1.047198) clamped=true
        SpatialTransform: axes_held_at_zero=(rotation2 rotation3 translation1 translation2 translation3)
          TransformAxis rotation1: coordinates=mtp_angle_r axis=(0.5809542 0 -0.8139363)
              LinearFunction(coefficients=1 0)
    Body latMeniscus_r_seg1of3: mass=1e-6 mass_center=(0 0 0) inertia_xx=1e-6 inertia_yy=1e-6 inertia_zz=1e-6
        meshes=latMeniscus_r_seg1of3.stl
      FreeJoint latMeniscus_r_seg1_to_tibia_proximal_r: parent_body=tibia_proximal_r
          location_in_parent=(-0.00892067 -0.01982033 0.01684507) location=(0 0 0)
        Coordinate latMen_r_s1_rx: motion_type=rotational default_value=0 range=(-0.785 0.785)
        Coordinate latMen_r_s1_ry: motion_type=rotational default_value=0 range=(-0.785 0.785)
        Coordinate latMen_r_s1_rz: motion_type=rotational default_value=0 range=(-0.785 0.785)
        Coordinate latMen_r_s1_tx: motion_type=translational default_value=0 range=(-0.1 0.1)
        Coordinate latMen_r_s1_ty: motion_type=translational default_value=0 range=(-0.1 0.1)
        Coordinate latMen_r_s1_tz: motion_type=translational default_value=0 range=(-0.1 0.1)
    Body latMeniscus_r_seg2of3: mass=1e-6 mass_center=(0 0 0) inertia_xx=1e-6 inertia_yy=1e-6 inertia_zz=1e-6
        meshes=latMeniscus_r_seg2of3.stl
      FreeJoint latMeniscus_r_seg2_to_seg1: parent_body=latMeniscus_r_seg1of3
          location_in_parent=(0.001000207 -0.002061922 0.01027622) orientation_in_parent=(0 5.142904 0)
          location=(-0.007112385 -0.000626544 -0.007561509) orientation=(0 5.142904 0)
        Coordinate latMen_r_s2_rx: motion_type=rotational default_value=0 range=(-0.785 0.785)
        Coordinate latMen_r_s2_ry: motion_type=rotational default_value=0 range=(-0.785 0.785)
        Coordinate latMen_r_s2_rz: motion_type=rotational default_value=0 range=(-0.785 0.785)
        Coordinate latMen_r_s2_tx: motion_type=translational default_value=0 range=(-0.1 0.1)
        Coordinate latMen_r_s2_ty: motion_type=translational default_value=0 range=(-0.1 0.1)
        Coordinate latMen_r_s2_tz: motion_type=translational default_value=0 range=(-0.1 0.1)
    Body latMeniscus_r_seg3of3: mass=1e-6 mass_center=(0 0 0) inertia_xx=1e-6 inertia_yy=1e-6 inertia_zz=1e-6
        meshes=latMeniscus_r_seg3of3.stl
      FreeJoint latMeniscus_r_seg3_to_seg2: parent_body=latMeniscus_r_seg2of3
          location_in_parent=(0.0107421 0.001503062 -0.001573959) orientation_in_parent=(0 6.864962 0)
          location=(-0.005664416 3.747576e-6 0.009244735) orientation=(0 6.864962 0)
        Coordinate latMen_r_s3_rx: motion_type=rotational default_value=0 range=(-0.785 0.785)
        Coordinate latMen_r_s3_ry: motion_type=rotational default_value=0 range=(-0.785 0.785)
        Coordinate latMen_r_s3_rz: motion_type=rotational default_value=0 range=(-0.785 0.785)
        Coordinate latMen_r_s3_tx: motion_type=translational default_value=0 range=(-0.1 0.1)
        Coordinate latMen_r_s3_ty: motion_type=translational default_value=0 range=(-0.1 0.1)
        Coordinate latMen_r_s3_tz: motion_type=translational default_value=0 range=(-0.1 0.1)
    Body medMeniscus_r_seg1of3: mass=1e-6 mass_center=(0 0 0) inertia_xx=1e-6 inertia_yy=1e-6 inertia_zz=1e-6
        meshes=medMeniscus_r_seg1of3.stl
      FreeJoint medMeniscus_r_seg1_to_tibia_proximal_r: parent_body=tibia_proximal_r
          location_in_parent=(0.01722197 -0.0196259 -0.01828723) location=(0 0 0)
        Coordinate medMen_r_s1_rx: motion_type=rotational default_value=0 range=(-0.785 0.785)
        Coordinate medMen_r_s1_ry: motion_type=rotational default_value=0 range=(-0.785 0.785)
        Coordinate medMen_r_s1_rz: motion_type=rotational default_value=0 range=(-0.785 0.785)
        Coordinate medMen_r_s1_tx: motion_type=translational default_value=0 range=(-0.1 0.1)
        Coordinate medMen_r_s1_ty: motion_type=translational default_value=0 range=(-0.1 0.1)
        Coordinate medMen_r_s1_tz: motion_type=translational default_value=0 range=(-0.1 0.1)
    Body medMeniscus_r_seg2of3: mass=1e-6 mass_center=(0 0 0) inertia_xx=1e-6 inertia_yy=1e-6 inertia_zz=1e-6
        meshes=medMeniscus_r_seg2of3.stl
      FreeJoint medMeniscus_r_seg2_to_seg1: parent_body=medMeniscus_r_seg1of3
          location_in_parent=(-0.008054907 -0.001312132 -0.006772901) orientation_in_parent=(0 2.629629 0)
          location=(0.009802457 0.001973625 0.002476659) orientation=(0 2.629629 0)
        Coordinate medMen_r_s2_rx: motion_type=rotational default_value=0 range=(-0.785 0.785)
        Coordinate medMen_r_s2_ry: motion_type=rotational default_value=0 range=(-0.785 0.785)
        Coordinate medMen_r_s2_rz: motion_type=rotational default_value=0 range=(-0.785 0.785)
        Coordinate medMen_r_s2_tx: motion_type=translational default_value=0 range=(-0.1 0.1)
        Coordinate medMen_r_s2_ty: motion_type=translational default_value=0 range=(-0.1 0.1)
        Coordinate medMen_r_s2_tz: motion_type=translational default_value=0 range=(-0.1 0.1)
    Body medMeniscus_r_seg3of3: mass=1e-6 mass_center=(0 0 0) inertia_xx=1e-6 inertia_yy=1e-6 inertia_zz=1e-6
        meshes=medMeniscus_r_seg3of3.stl
      FreeJoint medMeniscus_r_seg3_to_seg2: parent_body=medMeniscus_r_seg2of3
          location_in_parent=(-0.009218653 -0.0007169099 0.005121979) orientation_in_parent=(0 4.037528 0)
          location=(0.003443111 -0.0007291143 -0.01013103) orientation=(0 4.037528 0)
        Coordinate medMen_r_s3_rx: motion_type=rotational default_value=0 range=(-0.785 0.785)
        Coordinate medMen_r_s3_ry: motion_type=rotational default_value=0 range=(-0.785 0.785)
        Coordinate medMen_r_s3_rz: motion_type=rotational default_value=0 range=(-0.785 0.785)
        Coordinate medMen_r_s3_tx: motion_type=translational default_value=0 range=(-0.1 0.1)
        Coordinate medMen_r_s3_ty: motion_type=translational default_value=0 range=(-0.1 0.1)
        Coordinate medMen_r_s3_tz: motion_type=translational default_value=0 range=(-0.1 0.1)
  ConstraintSet:
    CoordinateCouplerConstraint pf_l_r3_con: independent_coordinate_names=knee_flex_l dependent_coordinate_name=pf_l_r3
      coupled_coordinates_function: SimmSpline: x=(0 0.174533 0.349066 0.523599 0.698132 0.872665 1.0472 1.22173 1.39626 1.5708 1.74533 1.91986 2.0944)
          y=(0.00113686 -0.00629212 -0.105582 -0.253683 -0.414245 -0.579047 -0.747244 -0.91799 -1.09044 -1.26379 -1.43763 -1.61186 -1.78634)
    CoordinateCouplerConstraint pf_l_tx_con: independent_coordinate_names=knee_flex_l dependent_coordinate_name=pf_l_tx
      coupled_coordinates_function: SimmSpline: x=(0 0.174533 0.349066 0.523599 0.698132 0.872665 1.0472 1.22173 1.39626 1.5708 1.74533 1.91986 2.0944)
          y=(0.04435 0.040692 0.035581 0.029012 0.021473 0.013523 0.005483 -0.002412 -0.009959 -0.016903 -0.022926 -0.027739 -0.030815)
    CoordinateCouplerConstraint pf_l_ty_con: independent_coordinate_names=knee_flex_l dependent_coordinate_name=pf_l_ty
      coupled_coordinates_function: SimmSpline: x=(0 0.174533 0.349066 0.523599 0.698132 0.872665 1.0472 1.22173 1.39626 1.5708 1.74533 1.91986 2.0944)
          y=(-0.418712 -0.426965 -0.43422 -0.440152 -0.444617 -0.447495 -0.448724 -0.448337 -0.446353 -0.442826 -0.438035 -0.432448 -0.426632)
  ForceSet:
    Thelen2003Muscle addbrev_r: max_isometric_force=303.7 optimal_fiber_length=0.1031 tendon_slack_length=0.036
        pennation_angle_at_optimal=0.1064651
      PathPoint P1: pelvis (-0.0191 -0.094 0.0154)
      PathPoint P2: femur_r (-0.002 -0.118 0.0249)
    Thelen2003Muscle addlong_r: max_isometric_force=399.5 optimal_fiber_length=0.1082 tendon_slack_length=0.13
        pennation_angle_at_optimal=0.1235693
      PathPoint P1: pelvis (-0.00758 -0.0889 0.01888)
      PathPoint P2: femur_r (0.01126 -0.23937 0.01583)
    Thelen2003Muscle addmagProx_r: max_isometric_force=324.2 optimal_fiber_length=0.1056 tendon_slack_length=0.043
        pennation_angle_at_optimal=0.3872886
      PathPoint P1: pelvis (-0.03098 -0.10755 0.01365)
      PathPoint P2: femur_r (-0.01527 -0.07886 0.03202)
    Thelen2003Muscle addmagMid_r: max_isometric_force=324.2 optimal_fiber_length=0.1377 tendon_slack_length=0.048
        pennation_angle_at_optimal=0.2567379
      PathPoint P1: pelvis (-0.05266 -0.12075 0.02854)
      PathPoint P2: femur_r (0.00242 -0.1624 0.02922)
    Thelen2003Muscle addmagDist_r: max_isometric_force=324.2 optimal_fiber_length=0.1772 tendon_slack_length=0.09
        pennation_angle_at_optimal=0.2412045
      PathPoint P1: pelvis (-0.07404 -0.12767 0.03982)
      PathPoint P2: femur_r (0.01125 -0.2625 0.0193)
    Thelen2003Muscle addmagIsch_r: max_isometric_force=324.2 optimal_fiber_length=0.1562 tendon_slack_length=0.221
        pennation_angle_at_optimal=0.2073451
      PathPoint P1: pelvis (-0.08962 -0.12976 0.04171)
      PathPoint P2: femur_r (0.00481 -0.38797 -0.03273)
    Thelen2003Muscle bflh_r: max_isometric_force=705.2 optimal_fiber_length=0.0976 tendon_slack_length=0.322
        pennation_angle_at_optimal=0.2021091
      PathPoint P1: pelvis (-0.104 -0.1191 0.0586)
      PathPoint P2: tibia_r (-0.0317 -0.0425 0.0333)
    Thelen2003Muscle bfsh_r: max_isometric_force=631.6 optimal_fiber_length=0.1103 tendon_slack_length=0.104
        pennation_angle_at_optimal=0.2151991
      PathPoint P1: femur_r (0.005 -0.2111 0.0234)
      PathPoint P2: tibia_r (-0.0301 -0.0419 0.0318)
    Thelen2003Muscle edl_r: max_isometric_force=345.4 optimal_fiber_length=0.0693 tendon_slack_length=0.3673
        pennation_angle_at_optimal=0.1890192
      PathPoint P1: tibia_r (-0.016 -0.1157 0.0205)
      PathPoint P2: tibia_r (0.0164 -0.376 0.0112)
      PathPoint P3: calcn_r (0.0919 0.036 0.0008)
      PathPoint P4: calcn_r (0.1616 0.0055 0.013)
      PathPoint P5: toes_r (0.0003 0.0047 0.0153)
      PathPoint P6: toes_r (0.0443 -0.0004 0.025)
    Thelen2003Muscle ehl_r: max_isometric_force=165 optimal_fiber_length=0.0748 tendon_slack_length=0.3315
        pennation_angle_at_optimal=0.1647591
      PathPoint P1: tibia_r (-0.014 -0.155 0.0189)
      PathPoint P2: tibia_r (0.007 -0.2909 0.0164)
      PathPoint P3: tibia_r (0.02 -0.3693 -0.0028)
      PathPoint P4: calcn_r (0.097 0.0389 -0.0211)
      PathPoint P5: calcn_r (0.1293 0.0309 -0.0257)
      PathPoint P6: calcn_r (0.1734 0.0139 -0.028)
      PathPoint P7: toes_r (0.0298 0.0041 -0.0245)
      PathPoint P8: toes_r (0.0563 0.0034 -0.0186)
    Thelen2003Muscle fdl_r: max_isometric_force=274.4 optimal_fiber_length=0.0446 tendon_slack_length=0.3777
        pennation_angle_at_optimal=0.2380629
      PathPoint P1: tibia_r (-0.0023 -0.1832 -0.0018)
      PathPoint P2: tibia_r (-0.0176 -0.3645 -0.0124)
      PathPoint P3: calcn_r (0.0436 0.0315 -0.028)
      PathPoint P4: calcn_r (0.0708 0.0176 -0.0263)
      PathPoint P5: calcn_r (0.1658 -0.0081 0.0116)
      PathPoint P6: toes_r (-0.0019 -0.0078 0.0147)
      PathPoint P7: toes_r (0.0285 -0.0071 0.0215)
      PathPoint P8: toes_r (0.0441 -0.006 0.0242)
    Thelen2003Muscle fhl_r: max_isometric_force=436.8 optimal_fiber_length=0.0527 tendon_slack_length=0.356
        pennation_angle_at_optimal=0.2947861
      PathPoint P1: tibia_r (-0.031 -0.2163 0.02)
      PathPoint P2: tibia_r (-0.0242 -0.3671 -0.0076)
      PathPoint P3: calcn_r (0.0374 0.0276 -0.0241)
      PathPoint P4: calcn_r (0.1038 0.0068 -0.0256)
      PathPoint P5: calcn_r (0.1726 -0.0053 -0.0269)
      PathPoint P6: toes_r (0.0155 -0.0064 -0.0265)
      PathPoint P7: toes_r (0.0562 -0.0102 -0.0181)
    Thelen2003Muscle gaslat_r: max_isometric_force=606.4 optimal_fiber_length=0.0588 tendon_slack_length=0.369
        pennation_angle_at_optimal=0.2101376 FmaxMuscleStrain=2
      PathPoint P1: femur_r (-0.003 -0.3814 0.0277)
      PathPoint P2: calcn_r (0.0044 0.031 -0.0053)
      PathWrap: wrap_object=Gastroc_at_Condyles_r method=hybrid
    Thelen2003Muscle gasmed_r: max_isometric_force=1308 optimal_fiber_length=0.051 tendon_slack_length=0.389
        pennation_angle_at_optimal=0.1724385 FmaxMuscleStrain=2
      PathPoint P1: femur_r (0.008 -0.3788 -0.0208)
      PathPoint P2: calcn_r (0.0044 0.031 -0.0053)
      PathWrap: wrap_object=Gastroc_at_Condyles_r method=hybrid
    Thelen2003Muscle gem_r: max_isometric_force=218 optimal_fiber_length=0.024 tendon_slack_length=0.039
        pennation_angle_at_optimal=0
      PathPoint P1: pelvis (-0.10357 -0.0764 0.06707)
      PathPoint P2: femur_r (-0.0142 -0.0033 0.0443)
    Thelen2003Muscle glmax1_r: max_isometric_force=1092.2 optimal_fiber_length=0.1473 tendon_slack_length=0.05
        pennation_angle_at_optimal=0.3829252
      PathPoint P1: pelvis (-0.1231 0.0345 0.0563)
      PathPoint P2: pelvis (-0.1257 -0.0242 0.0779)
      PathPoint P3: femur_r (-0.0444 -0.0326 0.0302)
      PathPoint P4: femur_r (-0.0277 -0.0566 0.047)
      PathWrap: wrap_object=Gmax_at_pelvis_r method=hybrid
    Thelen2003Muscle glmax2_r: max_isometric_force=1561 optimal_fiber_length=0.1569 tendon_slack_length=0.0733
        pennation_angle_at_optimal=0.3829252
      PathPoint P1: pelvis (-0.1317 0.0087 0.0462)
      PathPoint P2: pelvis (-0.1344 -0.0609 0.0813)
      PathPoint P3: femur_r (-0.045 -0.0584 0.0252)
      PathPoint P4: femur_r (-0.0156 -0.1016 0.0419)
      PathWrap: wrap_object=Gmax_at_pelvis_r method=hybrid
    Thelen2003Muscle glmax3_r: max_isometric_force=1058.2 optimal_fiber_length=0.1665 tendon_slack_length=0.0702
        pennation_angle_at_optimal=0.3829252
      PathPoint P1: pelvis (-0.13 -0.0525 0.009)
      PathPoint P2: pelvis (-0.1273 -0.1263 0.0435)
      PathPoint P3: femur_r (-0.0281 -0.1125 0.0094)
      PathPoint P4: femur_r (-0.006 -0.1419 0.0411)
      PathWrap: wrap_object=Gmax_at_pelvis_r method=hybrid
    Thelen2003Muscle glmed1_r: max_isometric_force=1762.2 optimal_fiber_length=0.0733 tendon_slack_length=0.0565
        pennation_angle_at_optimal=0.3572689
      PathPoint P1: pelvis (-0.0445 0.0245 0.1172)
      PathPoint P2: femur_r (-0.0218 -0.0117 0.0555)
    Thelen2003Muscle glmed2_r: max_isometric_force=1033 optimal_fiber_length=0.0733 tendon_slack_length=0.066
        pennation_angle_at_optimal=0.3572689
      PathPoint P1: pelvis (-0.085 0.0316 0.0675)
      PathPoint P2: femur_r (-0.0258 -0.0058 0.0527)
    Thelen2003Muscle glmed3_r: max_isometric_force=1404 optimal_fiber_length=0.0733 tendon_slack_length=0.046
        pennation_angle_at_optimal=0.3572689
      PathPoint P1: pelvis (-0.1152 -0.0073 0.0526)
      PathPoint P2: femur_r (-0.0309 -0.0047 0.0518)
    Thelen2003Muscle glmin1_r: max_isometric_force=720 optimal_fiber_length=0.068 tendon_slack_length=0.016
        pennation_angle_at_optimal=0.1745329
      PathPoint P1: pelvis (-0.0464 -0.0149 0.1042)
      PathPoint P2: femur_r (-0.0072 -0.0104 0.056)
    Thelen2003Muscle glmin2_r: max_isometric_force=760 optimal_fiber_length=0.056 tendon_slack_length=0.026
        pennation_angle_at_optimal=0
      PathPoint P1: pelvis (-0.0616 -0.0142 0.0971)
      PathPoint P2: femur_r (-0.0096 -0.0104 0.056)
    Thelen2003Muscle glmin3_r: max_isometric_force=860 optimal_fiber_length=0.038 tendon_slack_length=0.051
        pennation_angle_at_optimal=0.01745329
      PathPoint P1: pelvis (-0.0789 -0.0155 0.0798)
      PathPoint P2: femur_r (-0.0135 -0.0083 0.055)
    Thelen2003Muscle grac_r: max_isometric_force=137.3 optimal_fiber_length=0.2278 tendon_slack_length=0.169
        pennation_angle_at_optimal=0.1424189
      PathPoint P1: pelvis (-0.04736 -0.12932 0.02456)
      PathPoint P2: tibia_r (-0.01842 -0.04755 -0.02961)
      PathPoint P3: tibia_r (0.00178 -0.06962 -0.01573)
      PathWrap: wrap_object=GR_at_condyles_r method=midpoint
    Thelen2003Muscle iliacus_r: max_isometric_force=2487.6 optimal_fiber_length=0.1066 tendon_slack_length=0.094
        pennation_angle_at_optimal=0.2494076
      PathPoint P1: pelvis (-0.0605 0.0309 0.0843)
      PathPoint P2: pelvis (-0.0135 -0.0557 0.0756)
      PathPoint P3: femur_r (-0.0023 -0.0565 0.0139)
      PathPoint P4: femur_r (-0.0122 -0.0636 0.0196)
      PathWrap: wrap_object=IL_at_brim_r method=hybrid
    Thelen2003Muscle pect_r: max_isometric_force=177 optimal_fiber_length=0.1 tendon_slack_length=0.033
        pennation_angle_at_optimal=0
      PathPoint P1: pelvis (-0.0232 -0.08325 0.04529)
      PathPoint P2: femur_r (-0.00797 -0.08518 0.02403)
      PathWrap: wrap_object=PECT_at_femshaft_r method=hybrid
    Thelen2003Muscle perbrev_r: max_isometric_force=305.9 optimal_fiber_length=0.0454 tendon_slack_length=0.1481
        pennation_angle_at_optimal=0.2000147
      PathPoint P1: tibia_r (-0.0243 -0.2532 0.0251)
      PathPoint P2: tibia_r (-0.0339 -0.3893 0.0249)
      PathPoint P3: tibia_r (-0.0285 -0.4004 0.0255)
      PathPoint P4: calcn_r (0.0471 0.027 0.0233)
      PathPoint P5: calcn_r (0.0677 0.0219 0.0343)
    Thelen2003Muscle perlong_r: max_isometric_force=653.3 optimal_fiber_length=0.0508 tendon_slack_length=0.333
        pennation_angle_at_optimal=0.2457424
      PathPoint P1: tibia_r (-0.02 -0.1373 0.0282)
      PathPoint P2: tibia_r (-0.0317 -0.39 0.0237)
      PathPoint P3: tibia_r (-0.0272 -0.4014 0.024)
      PathPoint P4: calcn_r (0.0438 0.023 0.0221)
      PathPoint P5: calcn_r (0.0681 0.0106 0.0284)
      PathPoint P6: calcn_r (0.0852 0.0069 0.0118)
      PathPoint P7: calcn_r (0.1203 0.0085 -0.0184)
    Thelen2003Muscle pertert_r: max_isometric_force=90 optimal_fiber_length=0.079 tendon_slack_length=0.1
        pennation_angle_at_optimal=0.2268928
      PathPoint P1: tibia_r (-0.0149 -0.2485 0.0222)
      PathPoint P2: tibia_r (0.0108 -0.382 0.0225)
      PathPoint P3: calcn_r (0.0857 0.0228 0.0299)
    Thelen2003Muscle piri_r: max_isometric_force=296 optimal_fiber_length=0.026 tendon_slack_length=0.115
        pennation_angle_at_optimal=0.1745329
      PathPoint P1: pelvis (-0.10181 -0.00653 0.01351)
      PathPoint P2: pelvis (-0.10202 -0.03066 0.06092)
      PathPoint P3: femur_r (-0.0148 -0.0036 0.0437)
    Thelen2003Muscle psoas_r: max_isometric_force=1916 optimal_fiber_length=0.1169 tendon_slack_length=0.097
        pennation_angle_at_optimal=0.1860521
      PathPoint P1: pelvis (-0.0606 0.0619 0.039)
      PathPoint P2: pelvis (-0.0205 -0.0654 0.0656)
      PathPoint P3: femur_r (-0.0132 -0.0467 0.0046)
      PathPoint P4: femur_r (-0.0235 -0.0524 0.0088)
      PathWrap: wrap_object=PS_at_brim_r method=hybrid
    Thelen2003Muscle quadfem_r: max_isometric_force=508 optimal_fiber_length=0.054 tendon_slack_length=0.024
        pennation_angle_at_optimal=0
      PathPoint P1: pelvis (-0.11192 -0.11473 0.05166)
      PathPoint P2: femur_r (-0.03575 -0.03552 0.03612)
    Thelen2003Muscle recfem_r: max_isometric_force=848.8 optimal_fiber_length=0.0759 tendon_slack_length=0.3642
        pennation_angle_at_optimal=0.2431244 FmaxMuscleStrain=2
      PathPoint P1: pelvis (-0.024 -0.0388 0.0933)
      PathPoint P2: patella_r (-0.00019817 0.032359 0.0011381)
      PathPoint P3: patella_r (0.003423 0.02996 0.00078874)
      PathWrap: wrap_object=KnExt_at_fem_r
    Thelen2003Muscle sart_r: max_isometric_force=113.5 optimal_fiber_length=0.403 tendon_slack_length=0.11
        pennation_angle_at_optimal=0.02321288
      PathPoint P1: pelvis (-0.0195 -0.0156 0.1056)
      PathPoint P2: femur_r (-0.003 -0.3568 -0.0421)
      PathPoint P3: tibia_r (-0.0251 -0.0401 -0.0365)
      PathPoint P4: tibia_r (-0.0159 -0.0599 -0.0264)
      PathPoint P5: tibia_r (0.0136 -0.081 -0.0026)
    Thelen2003Muscle semimem_r: max_isometric_force=1162.7 optimal_fiber_length=0.069 tendon_slack_length=0.378
        pennation_angle_at_optimal=0.2633702
      PathPoint P1: pelvis (-0.0987 -0.114 0.0614)
      PathPoint P2: tibia_r (-0.029 -0.0417 -0.0196)
    Thelen2003Muscle semiten_r: max_isometric_force=301.9 optimal_fiber_length=0.193 tendon_slack_length=0.245
        pennation_angle_at_optimal=0.2244493
      PathPoint P1: pelvis (-0.1038 -0.1253 0.0515)
      PathPoint P2: tibia_r (-0.0312 -0.0508 -0.0229)
      PathPoint P3: tibia_r (0.0019 -0.0773 -0.0117)
    Thelen2003Muscle soleus_r: max_isometric_force=3585.9 optimal_fiber_length=0.044 tendon_slack_length=0.2815
        pennation_angle_at_optimal=0.4930555 FmaxMuscleStrain=2
      PathPoint P1: tibia_r (-0.0076 -0.0916 0.0098)
      PathPoint P2: calcn_r (0.0044 0.031 -0.0053)
    Thelen2003Muscle tfl_r: max_isometric_force=155 optimal_fiber_length=0.095 tendon_slack_length=0.45
        pennation_angle_at_optimal=0.05235988
      PathPoint P1: pelvis (-0.0311 0.0214 0.1241)
      PathPoint P2: femur_r (0.0294 -0.0995 0.0597)
      PathPoint P3: tibia_r (0.0108 -0.041 0.0346)
    Thelen2003Muscle tibant_r: max_isometric_force=673.7 optimal_fiber_length=0.0683 tendon_slack_length=0.241
        pennation_angle_at_optimal=0.1668535
      PathPoint P1: tibia_r (0.0154 -0.1312 0.0162)
      PathPoint P2: tibia_r (0.0251 -0.1906 0.0128)
      PathPoint P3: tibia_r (0.0233 -0.3659 -0.0132)
      PathPoint P4: calcn_r (0.1166 0.0178 -0.0305)
    Thelen2003Muscle tibpost_r: max_isometric_force=905.6 optimal_fiber_length=0.0378 tendon_slack_length=0.2818
        pennation_angle_at_optimal=0.2392846
      PathPoint P1: tibia_r (-0.0041 -0.1304 0.0103)
      PathPoint P2: tibia_r (-0.0164 -0.3655 -0.0175)
      PathPoint P3: calcn_r (0.0417 0.0334 -0.0286)
      PathPoint P4: calcn_r (0.0772 0.0159 -0.0281)
    Thelen2003Muscle vasint_r: max_isometric_force=1024.2 optimal_fiber_length=0.0993 tendon_slack_length=0.1216
        pennation_angle_at_optimal=0.07923795 FmaxMuscleStrain=2
      PathPoint P1: femur_r (0.029 -0.1924 0.031)
      PathPoint P2: femur_r (0.0335 -0.2084 0.0285)
      PathPoint P3: patella_r (-0.0039001 0.03545 -0.00035737)
      PathWrap: wrap_object=KnExt_vasint_at_fem_r
    Thelen2003Muscle vaslat_r: max_isometric_force=2255.4 optimal_fiber_length=0.0994 tendon_slack_length=0.1423
        pennation_angle_at_optimal=0.3207915 FmaxMuscleStrain=2
      PathPoint P1: femur_r (0.0048 -0.1854 0.0349)
      PathPoint P2: femur_r (0.0269 -0.2591 0.0409)
      PathPoint P3: patella_r (0.0015589 0.03248 0.01185)
      PathWrap: wrap_object=KnExt_at_fem_r
    Thelen2003Muscle vasmed_r: max_isometric_force=1443.7 optimal_fiber_length=0.0968 tendon_slack_length=0.1266
        pennation_angle_at_optimal=0.516792 FmaxMuscleStrain=2
      PathPoint P1: femur_r (0.014 -0.2099 0.0188)
      PathPoint P2: femur_r (0.0356 -0.2769 0.0009)
      PathPoint P3: patella_r (-0.00049014 0.033072 -0.0093351)
      PathWrap: wrap_object=KnExt_at_fem_r
    UWLigament [values shared by the 91 below unless stated]: ligament_transition_strain=0.03
    UWLigament MCLd1: linear_stiffness=500 ligament_transition_strain=0.06 reference_strain=0.04 reference_length=0.032
      PathPoint P1: femur_distal_r (-0.0017455 -0.00045737 -0.037269)
      PathPoint P2: tibia_proximal_r (-0.00021515 -0.031853 -0.031379)
      PathWrap: wrap_object=Med_Lig_r method=hybrid
    UWLigament MCLd2: linear_stiffness=500 reference_strain=-0.04 reference_length=0.0314
      PathPoint P1: femur_distal_r (0.0028899 -0.0006742 -0.038035)
      PathPoint P2: tibia_proximal_r (0.0049463 -0.031262 -0.031379)
      PathWrap: wrap_object=Med_Lig_r method=hybrid
    UWLigament MCLd3: linear_stiffness=500 reference_strain=0 reference_length=0.0371
      PathPoint P1: femur_distal_r (0.0038775 0.0036824 -0.039033)
      PathPoint P2: tibia_proximal_r (0.0054198 -0.032627 -0.031467)
      PathWrap: wrap_object=Med_Lig_r method=hybrid
    UWLigament MCLd4: linear_stiffness=500 reference_strain=0.04 reference_length=0.0346
      PathPoint P1: femur_distal_r (0.00096177 0.0014429 -0.038236)
      PathPoint P2: tibia_proximal_r (0.0026082 -0.032414 -0.031427)
      PathWrap: wrap_object=Med_Lig_r method=hybrid
    UWLigament MCLd5: linear_stiffness=500 reference_strain=0.04 reference_length=0.0388
      PathPoint P1: femur_distal_r (-0.0010825 0.0046882 -0.038669)
      PathPoint P2: tibia_proximal_r (-9.2907e-5 -0.033387 -0.031424)
      PathWrap: wrap_object=Med_Lig_r method=hybrid
    UWLigament MCLs1: linear_stiffness=500 reference_strain=0.04 reference_length=0.0752
      PathPoint P1: femur_distal_r (0.0053709 0.0083394 -0.04065)
      PathPoint P2: tibia_proximal_r (0.014323 -0.061131 -0.015466)
      PathWrap: wrap_object=Med_Lig_r method=hybrid
    UWLigament MCLs2: linear_stiffness=500 reference_strain=0.04 reference_length=0.0934
      PathPoint P1: femur_distal_r (0.0056326 0.015275 -0.040595)
      PathPoint P2: tibia_proximal_r (0.019234 -0.071438 -0.010942)
      PathWrap: wrap_object=Med_Lig_r method=hybrid
    UWLigament MCLs3: linear_stiffness=500 reference_strain=0.05 reference_length=0.0749
      PathPoint P1: femur_distal_r (-0.00040512 0.016541 -0.038878)
      PathPoint P2: tibia_proximal_r (0.0011834 -0.05547 -0.021542)
      PathWrap: wrap_object=Med_Lig_r method=hybrid
    UWLigament MCLs4: linear_stiffness=500 reference_strain=0.05 reference_length=0.0864
      PathPoint P1: femur_distal_r (-0.0011507 0.0080931 -0.039482)
      PathPoint P2: tibia_proximal_r (0.0065168 -0.074829 -0.017341)
      PathWrap: wrap_object=Med_Lig_r method=hybrid
    UWLigament MCLs5: linear_stiffness=500 reference_strain=0.05 reference_length=0.082
      PathPoint P1: femur_distal_r (0.0025007 0.011534 -0.040624)
      PathPoint P2: tibia_proximal_r (0.011919 -0.065762 -0.016444)
      PathWrap: wrap_object=Med_Lig_r method=hybrid
    UWLigament MCLs6: linear_stiffness=500 reference_strain=0.05 reference_length=0.0778
      PathPoint P1: femur_distal_r (0.00092052 0.013423 -0.040266)
      PathPoint P2: tibia_proximal_r (0.0071679 -0.06075 -0.019481)
      PathWrap: wrap_object=Med_Lig_r method=hybrid
    UWLigament ACLpl1: linear_stiffness=820 reference_strain=0.03 reference_length=0.0259
      PathPoint P1: femur_distal_r (-0.0038361 -3.0877e-5 0.0070808)
      PathPoint P2: tibia_proximal_r (0.010136 -0.020482 -0.00036186)
    UWLigament ACLpl2: linear_stiffness=820 reference_strain=0.01 reference_length=0.0232
      PathPoint P1: femur_distal_r (-0.0038641 -0.0030479 0.0072371)
      PathPoint P2: tibia_proximal_r (0.010071 -0.021322 0.0039158)
    UWLigament ACLpl3: linear_stiffness=820 reference_strain=-0.05 reference_length=0.0265
      PathPoint P1: femur_distal_r (-0.0012585 -0.00061438 0.005778)
      PathPoint P2: tibia_proximal_r (0.014123 -0.021793 0.0014326)
    UWLigament ACLpl4: linear_stiffness=820 reference_strain=-0.12 reference_length=0.0223
      PathPoint P1: femur_distal_r (-0.00049734 -0.0048442 0.0061921)
      PathPoint P2: tibia_proximal_r (0.014311 -0.021465 0.0048355)
    UWLigament ACLpl5: linear_stiffness=820 reference_strain=-0.02 reference_length=0.024
      PathPoint P1: femur_distal_r (-0.0015255 -0.0021886 0.0062745)
      PathPoint P2: tibia_proximal_r (0.012201 -0.021304 0.0017124)
    UWLigament ACLpl6: linear_stiffness=820 reference_strain=-0.03 reference_length=0.0244
      PathPoint P1: femur_distal_r (-0.0027392 -0.0031662 0.0068024)
      PathPoint P2: tibia_proximal_r (0.012531 -0.021976 0.0043276)
    UWLigament ACLam1: linear_stiffness=820 reference_strain=-0.14 reference_length=0.0294
      PathPoint P1: femur_distal_r (0.0011685 0.0031897 0.002616)
      PathPoint P2: tibia_proximal_r (0.016437 -0.020666 -0.0052185)
    UWLigament ACLam2: linear_stiffness=820 reference_strain=-0.05 reference_length=0.0285
      PathPoint P1: femur_distal_r (-0.0011691 0.0010628 0.0052107)
      PathPoint P2: tibia_proximal_r (0.014972 -0.021642 -0.00057088)
    UWLigament ACLam3: linear_stiffness=820 reference_strain=-0.08 reference_length=0.0278
      PathPoint P1: femur_distal_r (-0.0009364 0.0036972 0.0041682)
      PathPoint P2: tibia_proximal_r (0.011939 -0.019622 -0.0038468)
    UWLigament ACLam4: linear_stiffness=820 reference_strain=-0.14 reference_length=0.0297
      PathPoint P1: femur_distal_r (0.00084902 0.0010256 0.0040526)
      PathPoint P2: tibia_proximal_r (0.018517 -0.022158 -0.001854)
    UWLigament ACLam5: linear_stiffness=820 reference_strain=-0.14 reference_length=0.0291
      PathPoint P1: femur_distal_r (0.00056465 0.0025467 0.003565)
      PathPoint P2: tibia_proximal_r (0.016132 -0.02093 -0.0036845)
    UWLigament ACLam6: linear_stiffness=820 reference_strain=-0.12 reference_length=0.0296
      PathPoint P1: femur_distal_r (-0.00057334 0.0017233 0.0046087)
      PathPoint P2: tibia_proximal_r (0.016387 -0.02174 -0.0013455)
    UWLigament PCLal1: linear_stiffness=900 reference_strain=0.03 reference_length=0.0352
      PathPoint P1: femur_distal_r (0.0010633 -0.0026457 -0.010709)
      PathPoint P2: tibia_proximal_r (-0.014049 -0.03139 0.0029368)
    UWLigament PCLal2: linear_stiffness=900 reference_strain=-0.1 reference_length=0.0281
      PathPoint P1: femur_distal_r (0.0071112 -0.00473 -0.0046475)
      PathPoint P2: tibia_proximal_r (-0.010099 -0.02566 0.00288)
    UWLigament PCLal3: linear_stiffness=900 reference_strain=0.03 reference_length=0.0335
      PathPoint P1: femur_distal_r (0.0046634 -0.00088757 -0.0070401)
      PathPoint P2: tibia_proximal_r (-0.012055 -0.028137 0.0030545)
    UWLigament PCLal4: linear_stiffness=900 reference_strain=-0.04 reference_length=0.0321
      PathPoint P1: femur_distal_r (0.0048125 -0.0045282 -0.00815)
      PathPoint P2: tibia_proximal_r (-0.012695 -0.030786 -0.0022615)
    UWLigament PCLal5: linear_stiffness=900 reference_strain=-0.02 reference_length=0.0327
      PathPoint P1: femur_distal_r (0.0050176 -0.0034313 -0.0075544)
      PathPoint P2: tibia_proximal_r (-0.01241 -0.029808 0.00089554)
    UWLigament PCLpm1: linear_stiffness=300 reference_strain=-0.05 reference_length=0.0326
      PathPoint P1: femur_distal_r (0.0045535 -0.0054955 -0.0090256)
      PathPoint P2: tibia_proximal_r (-0.013917 -0.031775 -0.0033347)
    UWLigament PCLpm2: linear_stiffness=300 reference_strain=-0.12 reference_length=0.0314
      PathPoint P1: femur_distal_r (0.0022125 -0.008266 -0.010651)
      PathPoint P2: tibia_proximal_r (-0.017052 -0.032778 -0.0065962)
    UWLigament PCLpm3: linear_stiffness=300 reference_strain=-0.08 reference_length=0.0282
      PathPoint P1: femur_distal_r (0.0018148 -0.0061646 -0.010734)
      PathPoint P2: tibia_proximal_r (-0.013228 -0.029616 -0.0066956)
    UWLigament PCLpm4: linear_stiffness=300 reference_strain=-0.12 reference_length=0.0349
      PathPoint P1: femur_distal_r (0.0065082 -0.0078452 -0.0080514)
      PathPoint P2: tibia_proximal_r (-0.016262 -0.033443 -0.0014326)
    UWLigament PCLpm5: linear_stiffness=300 reference_strain=-0.1 reference_length=0.0316
      PathPoint P1: femur_distal_r (0.0048766 -0.0078242 -0.0097349)
      PathPoint P2: tibia_proximal_r (-0.014784 -0.032047 -0.0047864)
    UWLigament LCL1: linear_stiffness=600 reference_strain=0.06 reference_length=0.0521
      PathPoint P1: femur_distal_r (-0.0021714 0.0020776 0.035465)
      PathPoint P2: tibia_proximal_r (-0.013217 -0.048269 0.043157)
    UWLigament LCL2: linear_stiffness=600 reference_strain=0.06 reference_length=0.059
      PathPoint P1: femur_distal_r (-0.0021909 0.006045 0.035642)
      PathPoint P2: tibia_proximal_r (-0.014842 -0.050771 0.045564)
    UWLigament LCL3: linear_stiffness=600 reference_strain=0.06 reference_length=0.0565
      PathPoint P1: femur_distal_r (-0.000376 0.0039832 0.036523)
      PathPoint P2: tibia_proximal_r (-0.011881 -0.050605 0.045433)
    UWLigament LCL4: linear_stiffness=600 reference_strain=0.06 reference_length=0.0617
      PathPoint P1: femur_distal_r (-3.0505e-5 0.0065622 0.036488)
      PathPoint P2: tibia_proximal_r (-0.011705 -0.053176 0.0463)
    UWLigament PT1: linear_stiffness=3000 reference_strain=0.02 reference_length=0.0478
      PathPoint P1: patella_r (0.0023888 0.007814 0.01486)
      PathPoint P2: tibia_proximal_r (0.032815 -0.046612 0.01998)
      PathWrap: wrap_object=PatTen_r method=hybrid
    UWLigament PT2: linear_stiffness=30000 reference_strain=0.02 reference_length=0.0506
      PathPoint P1: patella_r (0.0034486 0.0058863 -0.011925)
      PathPoint P2: tibia_proximal_r (0.033646 -0.049788 0.0046861)
      PathWrap: wrap_object=PatTen_r method=hybrid
    UWLigament PT3: linear_stiffness=30000 reference_strain=0 reference_length=0.0519
      PathPoint P1: patella_r (0.0061702 0.0086539 0.0034073)
      PathPoint P2: tibia_proximal_r (0.037044 -0.050068 0.014577)
      PathWrap: wrap_object=PatTen_r method=hybrid
    UWLigament PT4: linear_stiffness=30000 reference_strain=0.01 reference_length=0.0411
      PathPoint P1: patella_r (0.0028259 0.00096779 0.0032342)
      PathPoint P2: tibia_proximal_r (0.034705 -0.046151 0.013008)
      PathWrap: wrap_object=PatTen_r method=hybrid
    UWLigament PT5: linear_stiffness=30000 reference_strain=0 reference_length=0.046
      PathPoint P1: patella_r (0.0032667 0.0048953 0.010452)
      PathPoint P2: tibia_proximal_r (0.035086 -0.048114 0.017907)
      PathWrap: wrap_object=PatTen_r method=hybrid
    UWLigament PT6: linear_stiffness=3000 reference_strain=0.02 reference_length=0.0477
      PathPoint P1: patella_r (0.0058293 0.0046879 -0.0037896)
      PathPoint P2: tibia_proximal_r (0.035954 -0.048374 0.0099597)
      PathWrap: wrap_object=PatTen_r method=hybrid
    UWLigament lPFL1: linear_stiffness=150 reference_strain=0.01 reference_length=0.0346
      PathPoint P1: femur_distal_r (0.02 0.01 0.035456)
      PathPoint P2: patella_r (-0.0015501 0.028211 0.018582)
    UWLigament lPFL2: linear_stiffness=150 reference_strain=-0.1 reference_length=0.033
      PathPoint P1: femur_distal_r (0.023 0.0005 0.0344)
      PathPoint P2: patella_r (-0.00011041 0.0087191 0.017223)
    UWLigament lPFL3: linear_stiffness=150 reference_strain=0.01 reference_length=0.0342
      PathPoint P1: femur_distal_r (0.017602 0.0055075 0.036008)
      PathPoint P2: patella_r (-0.0030893 0.019846 0.021373)
    UWLigament lPFL4: linear_stiffness=150 reference_strain=-0.12 reference_length=0.0304
      PathPoint P1: femur_distal_r (0.025 0.0070288 0.033883)
      PathPoint P2: patella_r (0.00092173 0.021398 0.021066)
    UWLigament lPFL5: linear_stiffness=150 reference_strain=0.01 reference_length=0.0333
      PathPoint P1: femur_distal_r (0.019 0.008 0.035591)
      PathPoint P2: patella_r (-0.0025654 0.023461 0.021187)
    UWLigament lPFL6: linear_stiffness=150 reference_strain=0.01 reference_length=0.0336
      PathPoint P1: femur_distal_r (0.019 0.003 0.035537)
      PathPoint P2: patella_r (-0.0024546 0.012733 0.020621)
    UWLigament lPFL7: linear_stiffness=150 reference_strain=-0.08 reference_length=0.0309
      PathPoint P1: femur_distal_r (0.023 0.0095 0.034)
      PathPoint P2: patella_r (-0.00087067 0.025299 0.020645)
    UWLigament lPFL8: linear_stiffness=150 reference_strain=-0.08 reference_length=0.031
      PathPoint P1: femur_distal_r (0.0235 0.0042486 0.035)
      PathPoint P2: patella_r (-5.8994e-5 0.016584 0.021541)
    UWLigament mPFL1: linear_stiffness=150 reference_strain=-0.05 reference_length=0.0449
      PathPoint P1: femur_distal_r (0.01482 0.014851 -0.037847)
      PathPoint P2: patella_r (0.00022401 0.02516 -0.018839)
    UWLigament mPFL2: linear_stiffness=150 reference_strain=0.01 reference_length=0.0495
      PathPoint P1: femur_distal_r (0.014175 0.0056463 -0.039555)
      PathPoint P2: patella_r (0.00109 0.0077172 -0.016379)
    UWLigament mPFL3: linear_stiffness=150 reference_strain=0.01 reference_length=0.0485
      PathPoint P1: femur_distal_r (0.011384 0.010327 -0.040161)
      PathPoint P2: patella_r (0.00031179 0.016288 -0.020734)
    UWLigament mPFL4: linear_stiffness=150 reference_strain=-0.06 reference_length=0.0428
      PathPoint P1: femur_distal_r (0.018919 0.010476 -0.036686)
      PathPoint P2: patella_r (0.0032401 0.017339 -0.020656)
    UWLigament mPFL5: linear_stiffness=150 reference_strain=-0.03 reference_length=0.0445
      PathPoint P1: femur_distal_r (0.015379 0.012476 -0.038367)
      PathPoint P2: patella_r (0.00088381 0.020178 -0.020659)
    UWLigament mPFL6: linear_stiffness=150 reference_strain=0.01 reference_length=0.0472
      PathPoint P1: femur_distal_r (0.014485 0.0085394 -0.039286)
      PathPoint P2: patella_r (0.0016164 0.01286 -0.02005)
    UWLigament MCLp1: linear_stiffness=500 reference_strain=0.05 reference_length=0.0307
      PathPoint P1: femur_distal_r (-0.0080573 -0.0071292 -0.034763)
      PathPoint P2: tibia_proximal_r (-0.01695 -0.034752 -0.024723)
      PathWrap: wrap_object=Med_LigP_r method=hybrid
    UWLigament MCLp2: linear_stiffness=500 reference_strain=0.05 reference_length=0.0314
      PathPoint P1: femur_distal_r (-0.0055986 -0.0063413 -0.03542)
      PathPoint P2: tibia_proximal_r (-0.0154 -0.034926 -0.02684)
      PathWrap: wrap_object=Med_LigP_r method=hybrid
    UWLigament MCLp3: linear_stiffness=500 reference_strain=0.02 reference_length=0.0302
      PathPoint P1: femur_distal_r (-0.0072934 -0.0097238 -0.034157)
      PathPoint P2: tibia_proximal_r (-0.015144 -0.037335 -0.024747)
      PathWrap: wrap_object=Med_LigP_r method=hybrid
    UWLigament MCLp4: linear_stiffness=500 reference_strain=-0.02 reference_length=0.0299
      PathPoint P1: femur_distal_r (-0.0046077 -0.0095908 -0.034789)
      PathPoint P2: tibia_proximal_r (-0.01293 -0.037191 -0.02677)
      PathWrap: wrap_object=Med_LigP_r method=hybrid
    UWLigament MCLp5: linear_stiffness=500 reference_strain=0.05 reference_length=0.0306
      PathPoint P1: femur_distal_r (-0.0063085 -0.0083706 -0.034788)
      PathPoint P2: tibia_proximal_r (-0.015199 -0.03615 -0.025692)
      PathWrap: wrap_object=Med_LigP_r method=hybrid
    UWLigament PFL1: linear_stiffness=440 reference_strain=0.01 reference_length=0.0442
      PathPoint P1: femur_distal_r (-0.0017516 -0.0011259 0.034832)
      PathPoint P2: tibia_proximal_r (-0.023707 -0.039486 0.036077)
    UWLigament PFL2: linear_stiffness=440 reference_strain=-0.12 reference_length=0.0389
      PathPoint P1: femur_distal_r (-0.0009411 -0.0064366 0.033945)
      PathPoint P2: tibia_proximal_r (-0.021428 -0.039528 0.034615)
    UWLigament PFL3: linear_stiffness=440 reference_strain=-0.03 reference_length=0.0477
      PathPoint P1: femur_distal_r (0.00435 -0.0027203 0.036774)
      PathPoint P2: tibia_proximal_r (-0.023292 -0.041485 0.038865)
    UWLigament PFL4: linear_stiffness=440 reference_strain=-0.14 reference_length=0.0427
      PathPoint P1: femur_distal_r (0.0035 -0.007151 0.034517)
      PathPoint P2: tibia_proximal_r (-0.021261 -0.041671 0.038733)
    UWLigament PFL5: linear_stiffness=440 reference_strain=-0.1 reference_length=0.0424
      PathPoint P1: femur_distal_r (0.0017 -0.0048477 0.03444)
      PathPoint P2: tibia_proximal_r (-0.022384 -0.039633 0.036734)
    UWLigament pCAP1: linear_stiffness=500 reference_strain=0.04 reference_length=0.0551
      PathPoint P1: femur_distal_r (-0.00965 0.016897 -0.024009)
      PathPoint P2: tibia_proximal_r (-0.019173 -0.033168 -0.017395)
      PathWrap: wrap_object=Capsule_r
    UWLigament pCAP2: linear_stiffness=500 reference_strain=0.04 reference_length=0.0567
      PathPoint P1: femur_distal_r (-0.009839 0.016583 0.024113)
      PathPoint P2: tibia_proximal_r (-0.017485 -0.03569 0.021412)
      PathWrap: wrap_object=Capsule_r
    UWLigament pCAP3: linear_stiffness=500 reference_strain=0.04 reference_length=0.0719
      PathPoint P1: femur_distal_r (-0.00965 0.016897 -0.023009)
      PathPoint P2: tibia_proximal_r (-0.017476 -0.035694 0.020413)
      PathWrap: wrap_object=Capsule_r
    UWLigament pCAP4: linear_stiffness=500 reference_strain=0.03 reference_length=0.067
      PathPoint P1: femur_distal_r (-0.009839 0.016583 0.023113)
      PathPoint P2: tibia_proximal_r (-0.01918 -0.033164 -0.016395)
      PathWrap: wrap_object=Capsule_r
    UWLigament pCAP5: linear_stiffness=500 reference_strain=0.04 reference_length=0.055
      PathPoint P1: femur_distal_r (-0.00965 0.016897 -0.020009)
      PathPoint P2: tibia_proximal_r (-0.019206 -0.033152 -0.013396)
      PathWrap: wrap_object=Capsule_r
    UWLigament pCAP6: linear_stiffness=500 reference_strain=0.04 reference_length=0.0568
      PathPoint P1: femur_distal_r (-0.009839 0.016583 0.020113)
      PathPoint P2: tibia_proximal_r (-0.017453 -0.035705 0.017413)
      PathWrap: wrap_object=Capsule_r
    UWLigament pCAP7: linear_stiffness=500 reference_strain=0.04 reference_length=0.055
      PathPoint P1: femur_distal_r (-0.00965 0.016897 -0.016009)
      PathPoint P2: tibia_proximal_r (-0.019237 -0.033136 -0.0093957)
      PathWrap: wrap_object=Capsule_r
    UWLigament pCAP8: linear_stiffness=500 reference_strain=0.04 reference_length=0.0568
      PathPoint P1: femur_distal_r (-0.009839 0.016583 0.016113)
      PathPoint P2: tibia_proximal_r (-0.01742 -0.035721 0.013413)
      PathWrap: wrap_object=Capsule_r
    UWLigament ITB_r: linear_stiffness=10000 reference_strain=0.56 reference_length=0.5704
      PathPoint P1: pelvis (-0.07 0.05 0.1)
      PathPoint P2: femur_r (-0.01 -0.0047 0.06)
      PathPoint P3: tibia_r (0.0108 -0.031 0.0346)
    UWLigament latMenCoronary_r_1: linear_stiffness=25 reference_strain=0.1 reference_length=0.002866
      PathPoint P1: tibia_proximal_r (-0.011181 -0.022686 0.015807)
      PathPoint P2: latMeniscus_r_seg1of3 (-0.00226 0 -0.001038)
    UWLigament latMenCoronary_r_2: linear_stiffness=25 reference_strain=0.1 reference_length=0.003241
      PathPoint P1: tibia_proximal_r (-0.001618 -0.024497 0.037506)
      PathPoint P2: latMeniscus_r_seg2of3 (-0.00081 0 0.002824)
    UWLigament latMenCoronary_r_3: linear_stiffness=25 reference_strain=0.1 reference_length=0.002076
      PathPoint P1: tibia_proximal_r (0.018002 -0.021832 0.024173)
      PathPoint P2: latMeniscus_r_seg3of3 (0.002403 0 0.000309)
    UWLigament medMenCoronary_r_1: linear_stiffness=25 reference_strain=0.1 reference_length=0.002442
      PathPoint P1: tibia_proximal_r (0.020182 -0.022068 -0.019384)
      PathPoint P2: medMeniscus_r_seg1of3 (0.00296 0 -0.001097)
    UWLigament medMenCoronary_r_2: linear_stiffness=25 reference_strain=0.1 reference_length=0.002667
      PathPoint P1: tibia_proximal_r (-0.001043 -0.025578 -0.029636)
      PathPoint P2: medMeniscus_r_seg2of3 (-0.000408 0 -0.002099)
    UWLigament medMenCoronary_r_3: linear_stiffness=25 reference_strain=0.1 reference_length=0.002526
      PathPoint P1: tibia_proximal_r (-0.016946 -0.025425 -0.012178)
      PathPoint P2: medMeniscus_r_seg3of3 (-0.003649 0 0.000106)
    UWLigament MHornAnt1_r: linear_stiffness=400 reference_strain=0.01 reference_length=0.007119
      PathPoint P1: tibia_proximal_r (0.02256 -0.02213 -0.00318)
      PathPoint P2: medMeniscus_r_seg1of3 (0.004328 0.001126 0.009067)
    UWLigament MHornAnt2_r: linear_stiffness=400 reference_strain=0.01 reference_length=0.005891
      PathPoint P1: tibia_proximal_r (0.02049 -0.02071 -0.00328)
      PathPoint P2: medMeniscus_r_seg1of3 (0.002528 0.001126 0.009597)
    UWLigament MHornPost1_r: linear_stiffness=400 reference_strain=0.01 reference_length=0.006641
      PathPoint P1: tibia_proximal_r (-0.005 -0.019 -0.001)
      PathPoint P2: medMeniscus_r_seg3of3 (0.003797 0.002899 0.006504)
    UWLigament MHornPost2_r: linear_stiffness=400 reference_strain=0.01 reference_length=0.007276
      PathPoint P1: tibia_proximal_r (-0.007 -0.021 0)
      PathPoint P2: medMeniscus_r_seg3of3 (0.001297 0.002899 0.007094)
    UWLigament LHornAnt1_r: linear_stiffness=400 reference_strain=0.01 reference_length=0.008355
      PathPoint P1: tibia_proximal_r (0.01138 -0.021 0.00548)
      PathPoint P2: latMeniscus_r_seg3of3 (-9.8e-5 0.000356 -0.011294)
    UWLigament LHornAnt2_r: linear_stiffness=400 reference_strain=0.01 reference_length=0.011824
      PathPoint P1: tibia_proximal_r (0.00891 -0.021 0.00642)
      PathPoint P2: latMeniscus_r_seg3of3 (-0.001598 0.000156 -0.006864)
    UWLigament LHornPost1_r: linear_stiffness=400 reference_strain=0.01 reference_length=0.006124
      PathPoint P1: tibia_proximal_r (-0.004 -0.018 0.00326)
      PathPoint P2: latMeniscus_r_seg1of3 (0.003921 0.00432 -0.008085)
    UWLigament LHornPost2_r: linear_stiffness=400 reference_strain=0.01 reference_length=0.016224
      PathPoint P1: tibia_proximal_r (-0.006 -0.0019 0.00254)
      PathPoint P2: latMeniscus_r_seg1of3 (0.001921 0.00282 -0.008455)
    UWLigament TransvLig_r: linear_stiffness=400 reference_strain=0.01 reference_length=0.027313
      PathPoint P1: latMeniscus_r_seg3of3 (0.000402 0.000256 -0.005864)
      PathPoint P2: medMeniscus_r_seg1of3 (0.002778 0.001126 0.009287)
    BushingForce Bush_medMeniscus_r_seg2_to_seg1: body_1=medMeniscus_r_seg1of3 body_2=medMeniscus_r_seg2of3
        location_body_1=(-0.008054907 -0.001312132 -0.006772901) orientation_body_1=(0 2.629629 0)
        location_body_2=(0.009802457 0.001973625 0.002476659) orientation_body_2=(0 2.629629 0)
        rotational_stiffness=(0.05 0.05 0.05) [Nm/rad] translational_stiffness=(300000 300000 300000) [N/m]
        rotational_damping=(0 0 0) [Nm/(rad/s)] translational_damping=(0 0 0) [N/(m/s)]
    BushingForce Bush_medMeniscus_r_seg3_to_seg2: body_1=medMeniscus_r_seg2of3 body_2=medMeniscus_r_seg3of3
        location_body_1=(-0.009218653 -0.0007169099 0.005121979) orientation_body_1=(0 4.037528 0)
        location_body_2=(0.003443111 -0.0007291143 -0.01013103) orientation_body_2=(0 4.037528 0)
        rotational_stiffness=(0.05 0.05 0.05) translational_stiffness=(300000 300000 300000) rotational_damping=(0 0 0)
        translational_damping=(0 0 0)
    ObjectGroup hip_add_r: members=(addbrev_r addlong_r addmagDist_r addmagIsch_r addmagMid_r addmagProx_r bflh_r grac_r pect_r semimem_r semiten_r)
    ObjectGroup hip_flex_r: members=(addbrev_r addlong_r glmin1_r grac_r iliacus_r pect_r psoas_r recfem_r sart_r tfl_r)
    ObjectGroup hip_ext_r: members=(addlong_r addmagDist_r addmagIsch_r addmagMid_r addmagProx_r bflh_r glmax1_r glmax2_r glmax3_r glmed1_r glmed2_r glmed3_r glmin3_r semimem_r semiten_r)
    ObjectGroup knee_flex_r: members=(bflh_r bfsh_r gaslat_r gasmed_r grac_r sart_r semimem_r semiten_r)
    ObjectGroup ankle_df_r: members=(edl_r ehl_r pertert_r tibant_r)
    ObjectGroup everter_r: members=(edl_r perbrev_r perlong_r pertert_r)
    ObjectGroup inverter_r: members=(ehl_r fdl_r fhl_r tibant_r tibpost_r)
    ObjectGroup ankle_pf_r: members=(fdl_r fhl_r gaslat_r gasmed_r perbrev_r perlong_r soleus_r tibpost_r)
    ObjectGroup hip_exrot_r: members=(gem_r glmin3_r piri_r quadfem_r)
    ObjectGroup hip_abd_r: members=(ITB_r glmax1_r glmed1_r glmed2_r glmed3_r glmin1_r glmin2_r glmin3_r piri_r sart_r tfl_r)
    ObjectGroup hip_inrot_r: members=(glmed1_r glmed2_r glmed3_r glmin1_r iliacus_r psoas_r tfl_r)
    ObjectGroup knee_ext_r: members=(recfem_r vasint_r vaslat_r vasmed_r)
    ObjectGroup knee_abd_r: members=ITB_r
