# OpenSim document version 30516
Model fbKnee_3segMenisci:
  gravity: 0 -9.80665 0
  length_units: m
  force_units: N
  defaults: Thelen2003Muscle default: optimal_fiber_length=0 pennation_angle_at_optimal=0 [radians]
      max_contraction_velocity=10 FmaxTendonStrain=0.05 FmaxMuscleStrain=1 KshapeActive=0.35 KshapePassive=4 Af=0.3
      Flen=1.5 activation_time_constant=0.01 [seconds] deactivation_time_constant=0.03 [seconds]
  Ground
  BodySet:
    Body pelvis: mass=8.3775 [kg] mass_center=(-0.0893 -0.025796 0) inertia=(0.053993 0.061279 0.067263 0 0 0)
        meshes=(r_pelvis.vtp l_pelvis.vtp sacrum.vtp)
      WrapEllipsoid PS_at_brim_r: translation=(-0.0798 -0.0654 0.0656) quadrant=all dimensions=(0.052 0.0492 0.071)
      WrapEllipsoid IL_at_brim_r: translation=(-0.0685 -0.0557 0.0756) quadrant=all dimensions=(0.0549 0.0665 0.071)
      WrapEllipsoid Gmax_at_pelvis_r: xyz_body_rotation=(-0.637045 0.383623 -0.684867)
          translation=(-0.0795 -0.0825 0.0665) quadrant=all dimensions=(0.04 0.04 0.06)
      WrapEllipsoid PS_at_brim_l: translation=(-0.0798 -0.0654 -0.0656) quadrant=all dimensions=(0.052 0.0492 0.071)
      WrapEllipsoid IL_at_brim_l: translation=(-0.0685 -0.0557 -0.0756) quadrant=all dimensions=(0.0549 0.0665 0.071)
      WrapEllipsoid Gmax_at_pelvis_l: xyz_body_rotation=(0.637045 -0.383623 -0.684867)
          translation=(-0.0795 -0.0825 -0.0665) quadrant=all dimensions=(0.04 0.04 0.06)
    Body torso: mass=24.2175 mass_center=(0 0.256438 0) inertia=(0.440821 0.276872 0.596511 0 0 0)
        meshes=(lumbar1sm.vtp lumbar2sm.vtp lumbar3sm.vtp lumbar4sm.vtp lumbar5.vtp ribcage_s.vtp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)
    Body neckhead: mass=5.205 mass_center=(0.0288 0.161501 0) inertia=(0.030471 0.02092 0.028195 0 0 0)
        meshes=(cerv1sm.vtp cerv2sm.vtp cerv3sm.vtp cerv4sm.vtp cerv5sm.vtp cerv6sm.vtp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)
    Body humerus_r: mass=2.0325 mass_center=(0 -0.164502 0) inertia=(0.011946 0.004121 0.013409 0 0 0)
        meshes=humerus_rv.vtp
    Body ulna_r: mass=0.6075 mass_center=(0 -0.120525 0) inertia=(0.002962 0.000618 0.003213 0 0 0) meshes=ulna_rv.vtp
    Body radius_r: mass=0.6075 mass_center=(0 -0.120525 0) inertia=(0.002962 0.000618 0.003213 0 0 0)
        meshes=radius_rv.vtp
    Body hand_r: mass=0.4575 mass_center=(0 -0.068095 0) inertia=(0.000892 0.000547 0.00134 0 0 0)
        meshes=(pisiform_rvs.vtp lunate_rvs.vtp scaphoid_rvs.vtp triquetrum_rvs.vtp hamate_rvs.vtp capitate_rvs.vtp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)
    Body humerus_l: mass=2.0325 mass_center=(0 -0.164502 0) inertia=(0.011946 0.004121 0.013409 0 0 0)
        meshes=humerus_lv.vtp
    Body ulna_l: mass=0.6075 mass_center=(0 -0.120525 0) inertia=(0.002962 0.000618 0.003213 0 0 0) meshes=ulna_lv.vtp
    Body radius_l: mass=0.6075 mass_center=(0 -0.120525 0) inertia=(0.002962 0.000618 0.003213 0 0 0)
        meshes=radius_lv.vtp
    Body hand_l: mass=0.4575 mass_center=(0 -0.068095 0) inertia=(0.000892 0.000547 0.00134 0 0 0)
        meshes=(pisiform_lvs.vtp lunate_lvs.vtp scaphoid_lvs.vtp triquetrum_lvs.vtp hamate_lvs.vtp capitate_lvs.vtp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)
    Body femur_r: mass=10.1325 mass_center=(0 -0.162162 0) inertia=(0.171988 0.035276 0.171988 0 0 0)
        meshes=r_femur.vtp
      WrapEllipsoid AB_at_femshaft_r: xyz_body_rotation=(0.111701 0 0.176278)
          translation=(0.0146011 -0.117162 0.025469) quadrant=all dimensions=(0.0165 0.07 0.021)
      WrapEllipsoid AL_at_femshaft_r: xyz_body_rotation=(0.111701 0 0.0541052)
          translation=(0.0308673 -0.23799 0.0119159) quadrant=all dimensions=(0.0201 0.1 0.018)
      WrapEllipsoid AMprox_at_femshaft_r: xyz_body_rotation=(0.111701 0 0.211185)
          translation=(0.00603642 -0.0775977 0.0299068) quadrant=all dimensions=(0.0211 0.07 0.032)
      WrapEllipsoid AMmid_at_femshaft_r: xyz_body_rotation=(0.111701 0 0.123918)
          translation=(0.0230125 -0.160711 0.0205842) quadrant=all dimensions=(0.0214 0.12 0.031)
      WrapEllipsoid AMdist_at_femshaft_r: xyz_body_rotation=(0.111701 0 0.176278)
          translation=(0.0307071 -0.260769 0.00936092) quadrant=all dimensions=(0.0218 0.2 0.0215)
      WrapEllipsoid AMisch_at_condyles_r: xyz_body_rotation=(0.111701 0 -0.434587)
          translation=(-0.0286471 -0.376993 -0.00367576) quadrant=all dimensions=(0.05 0.24 0.0402)
      WrapEllipsoid PECT_at_femshaft_r: xyz_body_rotation=(0.111701 0 0.211185)
          translation=(0.00762137 -0.0852965 0.0290433) quadrant=all dimensions=(0.0166 0.05 0.0131)
      WrapCylinder KnExt_at_fem_r: translation=(0.01 -0.397 0) quadrant=x radius=0.028 length=0.2
      WrapCylinder KnExt_vasint_at_fem_r: translation=(0.01 -0.397 0) quadrant=x radius=0.026 length=0.2
      WrapEllipsoid Gastroc_at_Condyles_r: xyz_body_rotation=(0.0589921 -0.0872665 0.0232129)
          translation=(0.01 -0.4075 0.0003) quadrant=all dimensions=(0.03 0.025 0.15)
    Body femur_distal_r: mass=0.01 mass_center=(0 0 0) inertia=(0.001 0.001 0.001 0 0 0)
        meshes=(ACLC01-R-femur-cart-060914.vtp ACLC01-R-femur-060914.vtp)
      WrapCylinder Capsule_r: xyz_body_rotation=(-0.0299066 0.02 0.331613) translation=(-0.004 -0.003 0) quadrant=all
          radius=0.018 length=0.5
    Body tibia_proximal_r: mass=0.01 mass_center=(0 0 0) inertia=(0.001 0.001 0.001 0 0 0)
        meshes=(ACLC01-R-tibia-cart-111214.vtp ACLC01-R-tibia-111214.vtp ACLC01-R-fibula-111214.vtp)
      WrapEllipsoid Med_Lig_r: xyz_body_rotation=(-0.104907 -0.0349066 0.181613) translation=(0.001 -0.0346 -0.0187)
          quadrant=all dimensions=(0.03 0.018 0.012)
      WrapEllipsoid Med_LigP_r: xyz_body_rotation=(-0.139813 0.349066 0.181613) translation=(-0.0104 -0.0314 -0.0227)
          quadrant=all dimensions=(0.025 0.0054 0.0053)
    Body patella_com_r: mass=1e-6 mass_center=(0 0 0) inertia=(1e-7 1e-7 1e-7 0 0 0)
    Body patella_r: mass=0.4875 mass_center=(0.0018 0.0264 0) inertia=(1.6e-5 7.4e-5 7.4e-5 0 0 0)
        meshes=(ACLC01-R-patella-cart-060914.vtp ACLC01-R-patella-060914.vtp)
      WrapEllipsoid PatTen_r: xyz_body_rotation=(0 0 0.01) translation=(0.0005 0.008 0.00048233) quadrant=all
          dimensions=(0.005 0.008 0.012)
    Body femur_l: mass=10.1325 mass_center=(0 -0.162162 0) inertia=(0.171988 0.035276 0.171988 0 0 0)
        meshes=l_femur.vtp
      WrapEllipsoid AB_at_femshaft_l: xyz_body_rotation=(-0.111701 0 0.176278)
          translation=(0.0146011 -0.117162 -0.025469) quadrant=all dimensions=(0.0165 0.07 0.021)
      WrapEllipsoid AL_at_femshaft_l: xyz_body_rotation=(-0.111701 0 0.0541052)
          translation=(0.0308673 -0.23799 -0.0119159) quadrant=all dimensions=(0.0201 0.1 0.018)
      WrapEllipsoid AMprox_at_femshaft_l: xyz_body_rotation=(-0.111701 0 0.211185)
          translation=(0.00603642 -0.0775977 -0.0299068) quadrant=all dimensions=(0.0211 0.07 0.032)
      WrapEllipsoid AMmid_at_femshaft_l: xyz_body_rotation=(-0.111701 0 0.123918)
          translation=(0.0230125 -0.160711 -0.0205842) quadrant=all dimensions=(0.0214 0.12 0.031)
      WrapEllipsoid AMdist_at_femshaft_l: xyz_body_rotation=(-0.111701 0 0.176278)
          translation=(0.0307071 -0.260769 -0.00936092) quadrant=all dimensions=(0.0218 0.2 0.0215)
      WrapEllipsoid AMisch_at_condyles_l: xyz_body_rotation=(-0.111701 0 -0.434587)
          translation=(-0.0286471 -0.376993 0.00367576) quadrant=all dimensions=(0.05 0.24 0.0402)
      WrapEllipsoid PECT_at_femshaft_l: xyz_body_rotation=(-0.111701 0 0.211185)
          translation=(0.00762137 -0.0852965 -0.0290433) quadrant=all dimensions=(0.0166 0.05 0.0131)
      WrapCylinder KnExt_at_fem_l: xyz_body_rotation=(0.0623371 -0.0507601 -0.892533)
          translation=(0.00358828 -0.402732 -0.00209111) quadrant=all radius=0.025 length=0.1
      WrapEllipsoid Gastroc_at_Condyles_l: xyz_body_rotation=(-0.0589921 0.0937242 0.0232129)
          translation=(0.0048 -0.4075 -0.0003) quadrant=all dimensions=(0.03 0.025 0.05)
    Body tibia_l: mass=3.2475 mass_center=(0 -0.171713 0) inertia=(0.029999 0.005157 0.031231 0 0 0)
        meshes=(l_tibialoan.vtp l_fibula.vtp)
      WrapEllipsoid GR_at_condyles_l: xyz_body_rotation=(0 0 -0.18326) translation=(0 0 0) quadrant=all
          dimensions=(0.036 0.0635 0.0533)
      WrapEllipsoid SM_at_condyles_l: xyz_body_rotation=(0 0 -0.296706) translation=(0 0 0) quadrant=all
          dimensions=(0.0352 0.0602 0.0489)
      WrapEllipsoid ST_at_condyles_l: xyz_body_rotation=(0 0 -0.270526) translation=(0 0 0) quadrant=all
          dimensions=(0.0425 0.069 0.0572)
      WrapCylinder BFLH_at_gastroc_l: translation=(-0.0316 -0.0443 0) quadrant=y radius=0.01 length=0.1
      WrapCylinder Gastroc_at_Shank_l: xyz_body_rotation=(-2.96723 -0.0289725 -1.47812)
          translation=(-0.0074 -0.074 0.0033) quadrant=-y radius=0.055 length=0.1
    Body patella_l: mass=0.4875 mass_center=(0.0018 0.0264 0) inertia=(1.6e-5 7.4e-5 7.4e-5 0 0 0) meshes=patella_l.vtp
    Body talus_l: mass=0.045 mass_center=(0.0055 0.0023 0) inertia=(3e-6 1e-6 3e-6 0 0 0) meshes=talus_lv.vtp
    Body calcn_l: mass=1.235 mass_center=(0.101865 0.0156 0) inertia=(0.001269 0.003229 0.003744 0 0 0)
        meshes=(calcaneous_lv.vtp navicular_lv.vtp cuboid_lv.vtp first_cuneiform_lv.vtp second_cuneiform_lv.vtp third_cuneiform_lv.vtp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)
    Body toes_l: mass=0.1975 mass_center=(0.0307 -0.0026 -0.0105) inertia=(0.000202 0.000517 0.000595 0 0 0)
        meshes=(prox_phalanx1_lvs.vtp prox_phalanx2_lvs.vtp prox_phalanx3_lvs.vtp prox_phalanx4_lvs.vtp prox_phalanx5_lvs.vtp mid_phalanx2_lvs.vtp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)
    Body tibia_r: mass=3.2475 mass_center=(0 -0.171713 0) inertia=(0.029999 0.005157 0.031231 0 0 0)
        meshes=(r_tibialoan.vtp r_fibula.vtp)
      WrapEllipsoid GR_at_condyles_r: xyz_body_rotation=(0 0 -0.18326) translation=(0 0 0) quadrant=all
          dimensions=(0.036 0.0635 0.0533)
      WrapEllipsoid SM_at_condyles_r: xyz_body_rotation=(0 0 -0.296706) translation=(0 0 0) quadrant=all
          dimensions=(0.0352 0.0602 0.0489)
      WrapEllipsoid ST_at_condyles_r: xyz_body_rotation=(0 0 -0.270526) translation=(0 0 0) quadrant=all
          dimensions=(0.0425 0.069 0.0572)
      WrapCylinder BFLH_at_gastroc_r: translation=(-0.0316 -0.0443 0) quadrant=y radius=0.01 length=0.1
      WrapCylinder Gastroc_at_Shank_r: xyz_body_rotation=(2.96723 0.0289725 -1.47812)
          translation=(-0.0074 -0.074 -0.0033) quadrant=-y radius=0.055 length=0.1
    Body talus_r: mass=0.045 mass_center=(0.0055 0.0023 0) inertia=(3e-6 1e-6 3e-6 0 0 0) meshes=talus_rv.vtp
    Body calcn_r: mass=1.235 mass_center=(0.101865 0.0156 0) inertia=(0.001269 0.003229 0.003744 0 0 0)
        meshes=(calcaneous_rv.vtp navicular_rv.vtp cuboid_rv.vtp first_cuneiform_rv.vtp second_cuneiform_rv.vtp third_cuneiform_rv.vtp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)
    Body toes_r: mass=0.1975 mass_center=(0.0307 -0.0026 0.0105) inertia=(0.000202 0.000517 0.000595 0 0 0)
        meshes=(prox_phalanx1_rvs.vtp prox_phalanx2_rvs.vtp prox_phalanx3_rvs.vtp prox_phalanx4_rvs.vtp prox_phalanx5_rvs.vtp mid_phalanx2_rvs.vtp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)
    Body latMeniscus_r_seg1of3: mass=1e-6 mass_center=(0 0 0) inertia=(1e-6 1e-6 1e-6 0 0 0)
        meshes=latMeniscus_r_seg1of3.stl
    Body latMeniscus_r_seg2of3: mass=1e-6 mass_center=(0 0 0) inertia=(1e-6 1e-6 1e-6 0 0 0)
        meshes=latMeniscus_r_seg2of3.stl
    Body latMeniscus_r_seg3of3: mass=1e-6 mass_center=(0 0 0) inertia=(1e-6 1e-6 1e-6 0 0 0)
        meshes=latMeniscus_r_seg3of3.stl
    Body medMeniscus_r_seg1of3: mass=1e-6 mass_center=(0 0 0) inertia=(1e-6 1e-6 1e-6 0 0 0)
        meshes=medMeniscus_r_seg1of3.stl
    Body medMeniscus_r_seg2of3: mass=1e-6 mass_center=(0 0 0) inertia=(1e-6 1e-6 1e-6 0 0 0)
        meshes=medMeniscus_r_seg2of3.stl
    Body medMeniscus_r_seg3of3: mass=1e-6 mass_center=(0 0 0) inertia=(1e-6 1e-6 1e-6 0 0 0)
        meshes=medMeniscus_r_seg3of3.stl
  JointSet:
    CustomJoint gnd_pelvis: socket_parent_frame_connectee_name=../ground socket_child_frame_connectee_name=../pelvis
      Coordinate pelvis_tilt: default_value=0 range=(-4.712389 4.712389) clamped=false
      Coordinate pelvis_list: default_value=0 range=(-4.712389 4.712389) clamped=false
      Coordinate pelvis_rot: default_value=0 range=(-4.712389 4.712389) clamped=false
      Coordinate pelvis_tx: default_value=0 range=(-10 10) clamped=false
      Coordinate pelvis_ty: default_value=0.969 range=(-10 10) clamped=false
      Coordinate pelvis_tz: default_value=0 range=(-10 10) clamped=false
      SpatialTransform:
        TransformAxis rotation1: coordinates=pelvis_tilt axis=(0 0 1) LinearFunction(coefficients=1 0)
        TransformAxis rotation2: coordinates=pelvis_list axis=(1 0 0) LinearFunction(coefficients=1 0)
        TransformAxis rotation3: coordinates=pelvis_rot axis=(0 1 0) LinearFunction(coefficients=1 0)
        TransformAxis translation1: coordinates=pelvis_tx axis=(1 0 0) LinearFunction(coefficients=1 0)
        TransformAxis translation2: coordinates=pelvis_ty axis=(0 1 0) LinearFunction(coefficients=1 0)
        TransformAxis translation3: coordinates=pelvis_tz axis=(0 0 1) LinearFunction(coefficients=1 0)
    CustomJoint pelvis_torso: socket_parent_frame_connectee_name=pelvis_offset
        socket_child_frame_connectee_name=../torso
      Coordinate lumbar_ext: default_value=0 range=(-1.047198 1.047198) clamped=true
      Coordinate lumbar_latbend: default_value=0 range=(-1.047198 1.047198) clamped=true
      Coordinate lumbar_rot: default_value=0 range=(-1.047198 1.047198) clamped=true
      PhysicalOffsetFrame pelvis_offset: socket_parent_connectee_name=../../pelvis translation=(-0.1 0.055 0)
      SpatialTransform: axes_held_at_zero=(translation1 translation2 translation3)
        TransformAxis rotation1: coordinates=lumbar_ext axis=(0 0 1) LinearFunction(coefficients=1 0)
        TransformAxis rotation2: coordinates=lumbar_latbend axis=(1 0 0) LinearFunction(coefficients=1 0)
        TransformAxis rotation3: coordinates=lumbar_rot axis=(0 1 0) LinearFunction(coefficients=1 0)
    CustomJoint torso_neckhead: socket_parent_frame_connectee_name=torso_offset
        socket_child_frame_connectee_name=../neckhead
      Coordinate neck_ext: default_value=3.1831e-10 range=(-0.8726646 1.256637) clamped=true
      Coordinate neck_latbend: default_value=0 range=(-0.6981317 0.6981317) clamped=true
      Coordinate neck_rot: default_value=0 range=(-1.151917 1.151917) clamped=true
      PhysicalOffsetFrame torso_offset: socket_parent_connectee_name=../../torso translation=(-0.0253 0.44895 0)
      SpatialTransform: axes_held_at_zero=(translation1 translation2 translation3)
        TransformAxis rotation1: coordinates=neck_ext axis=(0 0 1) LinearFunction(coefficients=1 0)
        TransformAxis rotation2: coordinates=neck_latbend axis=(1 0 0) LinearFunction(coefficients=1 0)
        TransformAxis rotation3: coordinates=neck_rot axis=(0 1 0) LinearFunction(coefficients=1 0)
    CustomJoint acromial_r: socket_parent_frame_connectee_name=torso_offset
        socket_child_frame_connectee_name=../humerus_r
      Coordinate arm_add_r: default_value=-1.446864e-10 range=(-2.094395 1.570796) clamped=true
      Coordinate arm_flex_r: default_value=0 range=(-1.570796 1.570796) clamped=true
      Coordinate arm_rot_r: default_value=0 range=(-1.570796 1.570796) clamped=true
      PhysicalOffsetFrame torso_offset: socket_parent_connectee_name=../../torso translation=(-0.0281 0.41645 0.199)
      SpatialTransform: axes_held_at_zero=(translation1 translation2 translation3)
        TransformAxis rotation1: coordinates=arm_add_r axis=(1 0 0) LinearFunction(coefficients=1 0)
        TransformAxis rotation2: coordinates=arm_flex_r axis=(0 0 1) LinearFunction(coefficients=1 0)
        TransformAxis rotation3: coordinates=arm_rot_r axis=(0 1 0) LinearFunction(coefficients=1 0)
    CustomJoint elbow_r: socket_parent_frame_connectee_name=humerus_r_offset
        socket_child_frame_connectee_name=../ulna_r
      Coordinate elbow_flex_r: default_value=5.784944e-5 range=(0 2.792527) clamped=true
      PhysicalOffsetFrame humerus_r_offset: socket_parent_connectee_name=../../humerus_r
          translation=(0.013144 -0.286273 -0.009595)
      SpatialTransform: axes_held_at_zero=(rotation2 rotation3 translation1 translation2 translation3)
        TransformAxis rotation1: coordinates=elbow_flex_r axis=(0.226047 0.022269 0.9738618)
            LinearFunction(coefficients=1 0)
    CustomJoint radioulnar_r: socket_parent_frame_connectee_name=ulna_r_offset
        socket_child_frame_connectee_name=../radius_r
      Coordinate pro_sup_r: default_value=1.047198 range=(0 1.570796) clamped=true
      PhysicalOffsetFrame ulna_r_offset: socket_parent_connectee_name=../../ulna_r
          translation=(-0.006727 -0.013007 0.026083)
      SpatialTransform: axes_held_at_zero=(rotation1 rotation3 translation1 translation2 translation3)
        TransformAxis rotation2: coordinates=pro_sup_r axis=(0.05639803 0.9984065 0.001952001)
            LinearFunction(coefficients=1 0)
    CustomJoint radius_hand_r: socket_parent_frame_connectee_name=radius_r_offset
        socket_child_frame_connectee_name=../hand_r
      Coordinate wrist_flex_r: default_value=0 range=(-1.22173 1.22173) clamped=true
      PhysicalOffsetFrame radius_r_offset: socket_parent_connectee_name=../../radius_r
          translation=(-0.008797 -0.235841 0.01361)
      SpatialTransform: axes_held_at_zero=(rotation2 rotation3 translation1 translation2 translation3)
        TransformAxis rotation1: coordinates=wrist_flex_r axis=(0 0 1) LinearFunction(coefficients=1 0)
    CustomJoint acromial_l: socket_parent_frame_connectee_name=torso_offset
        socket_child_frame_connectee_name=../humerus_l
      Coordinate arm_add_l: default_value=-1.446864e-10 range=(-2.094395 1.570796) clamped=true
      Coordinate arm_flex_l: default_value=0 range=(-1.570796 1.570796) clamped=true
      Coordinate arm_rot_l: default_value=0 range=(-1.570796 1.570796) clamped=true
      PhysicalOffsetFrame torso_offset: socket_parent_connectee_name=../../torso translation=(-0.0281 0.41645 -0.199)
      SpatialTransform: axes_held_at_zero=(translation1 translation2 translation3)
        TransformAxis rotation1: coordinates=arm_add_l axis=(-1 0 0) LinearFunction(coefficients=1 0)
        TransformAxis rotation2: coordinates=arm_flex_l axis=(0 0 1) LinearFunction(coefficients=1 0)
        TransformAxis rotation3: coordinates=arm_rot_l axis=(0 -1 0) LinearFunction(coefficients=1 0)
    CustomJoint elbow_l: socket_parent_frame_connectee_name=humerus_l_offset
        socket_child_frame_connectee_name=../ulna_l
      Coordinate elbow_flex_l: default_value=5.784944e-5 range=(0 2.792527) clamped=true
      PhysicalOffsetFrame humerus_l_offset: socket_parent_connectee_name=../../humerus_l
          translation=(0.013144 -0.286273 0.009595)
      SpatialTransform: axes_held_at_zero=(rotation2 rotation3 translation1 translation2 translation3)
        TransformAxis rotation1: coordinates=elbow_flex_l axis=(-0.226047 -0.022269 0.9738618)
            LinearFunction(coefficients=1 0)
    CustomJoint radioulnar_l: socket_parent_frame_connectee_name=ulna_l_offset
        socket_child_frame_connectee_name=../radius_l
      Coordinate pro_sup_l: default_value=1.047198 range=(0 1.570796) clamped=true
      PhysicalOffsetFrame ulna_l_offset: socket_parent_connectee_name=../../ulna_l
          translation=(-0.006727 -0.013007 -0.026083)
      SpatialTransform: axes_held_at_zero=(rotation1 rotation3 translation1 translation2 translation3)
        TransformAxis rotation2: coordinates=pro_sup_l axis=(-0.05639803 -0.9984065 0.001952001)
            LinearFunction(coefficients=1 0)
    CustomJoint radius_hand_l: socket_parent_frame_connectee_name=radius_l_offset
        socket_child_frame_connectee_name=../hand_l
      Coordinate wrist_flex_l: default_value=0 range=(-1.22173 1.22173) clamped=true
      PhysicalOffsetFrame radius_l_offset: socket_parent_connectee_name=../../radius_l
          translation=(-0.008797 -0.235841 -0.01361)
      SpatialTransform: axes_held_at_zero=(rotation2 rotation3 translation1 translation2 translation3)
        TransformAxis rotation1: coordinates=wrist_flex_l axis=(0 0 1) LinearFunction(coefficients=1 0)
    CustomJoint hip_r: socket_parent_frame_connectee_name=pelvis_offset socket_child_frame_connectee_name=../femur_r
      Coordinate hip_flex_r: default_value=5.20871e-10 range=(-1.047198 2.617994) clamped=true
      Coordinate hip_add_r: default_value=0 range=(-1.047198 1.047198) clamped=true
      Coordinate hip_rot_r: default_value=0 range=(-1.047198 1.047198) clamped=true
      PhysicalOffsetFrame pelvis_offset: socket_parent_connectee_name=../../pelvis
          translation=(-0.056276 -0.07849 0.07726)
      SpatialTransform: axes_held_at_zero=(translation1 translation2 translation3)
        TransformAxis rotation1: coordinates=hip_flex_r axis=(0 0 1) LinearFunction(coefficients=1 0)
        TransformAxis rotation2: coordinates=hip_add_r axis=(1 0 0) LinearFunction(coefficients=1 0)
        TransformAxis rotation3: coordinates=hip_rot_r axis=(0 1 0) LinearFunction(coefficients=1 0)
    WeldJoint femur_femur: socket_parent_frame_connectee_name=femur_r_offset
        socket_child_frame_connectee_name=../femur_distal_r
      PhysicalOffsetFrame femur_r_offset: socket_parent_connectee_name=../../femur_r
          translation=(-0.00600005 -0.404425 -0.00126524)
    CustomJoint knee_r: socket_parent_frame_connectee_name=../femur_distal_r
        socket_child_frame_connectee_name=../tibia_proximal_r
      Coordinate knee_flex_r: default_value=0 range=(-0.1745329 2.792527) clamped=false
      Coordinate knee_add_r: default_value=0 range=(-0.8726646 0.8726646) clamped=false
      Coordinate knee_rot_r: default_value=0 range=(-0.8726646 0.8726646) clamped=false
      Coordinate knee_tx_r: default_value=0 range=(-0.2 0.2) clamped=false
      Coordinate knee_ty_r: default_value=0 range=(-0.5 1.2) clamped=false
      Coordinate knee_tz_r: default_value=0 range=(-0.2 0.2) clamped=false
      SpatialTransform:
        TransformAxis rotation1: coordinates=knee_flex_r axis=(0 0 1)
          SimmSpline: x=(-6.28319 6.28319) y=(6.28319 -6.28319)
        TransformAxis rotation2: coordinates=knee_add_r axis=(1 0 0) LinearFunction(coefficients=1 0)
        TransformAxis rotation3: coordinates=knee_rot_r axis=(0 1 0) LinearFunction(coefficients=1 0)
        TransformAxis translation1: coordinates=knee_tx_r axis=(1 0 0) LinearFunction(coefficients=1 0)
        TransformAxis translation2: coordinates=knee_ty_r axis=(0 1 0) LinearFunction(coefficients=1 0)
        TransformAxis translation3: coordinates=knee_tz_r axis=(0 0 1) LinearFunction(coefficients=1 0)
    CustomJoint pf_r: socket_parent_frame_connectee_name=../femur_distal_r
        socket_child_frame_connectee_name=../patella_com_r
      Coordinate pf_flex_r: default_value=0 range=(-1.570796 1.570796) clamped=false
      Coordinate pf_rot_r: default_value=0 range=(-1.570796 1.570796) clamped=false
      Coordinate pf_tilt_r: default_value=0 range=(-0.8726646 0.8726646) clamped=false
      Coordinate pf_tx_r: default_value=0.053 range=(-0.2 0.2) clamped=false
      Coordinate pf_ty_r: default_value=0.005 range=(-0.2 0.2) clamped=false
      Coordinate pf_tz_r: default_value=0.004 range=(-0.2 0.2) clamped=false
      SpatialTransform:
        TransformAxis rotation1: coordinates=pf_flex_r axis=(0 0 1) LinearFunction(coefficients=-1 0)
        TransformAxis rotation2: coordinates=pf_rot_r axis=(1 0 0) LinearFunction(coefficients=1 0)
        TransformAxis rotation3: coordinates=pf_tilt_r axis=(0 1 0) LinearFunction(coefficients=1 0)
        TransformAxis translation1: coordinates=pf_tx_r axis=(1 0 0) LinearFunction(coefficients=1 0)
        TransformAxis translation2: coordinates=pf_ty_r axis=(0 1 0) LinearFunction(coefficients=1 0)
        TransformAxis translation3: coordinates=pf_tz_r axis=(0 0 1) LinearFunction(coefficients=1 0)
    WeldJoint patella_com_patella_r: socket_parent_frame_connectee_name=patella_com_r_offset
        socket_child_frame_connectee_name=../patella_r
      PhysicalOffsetFrame patella_com_r_offset: socket_parent_connectee_name=../../patella_com_r
          translation=(9.57331e-5 -0.0173892 0)
    CustomJoint hip_l: socket_parent_frame_connectee_name=pelvis_offset socket_child_frame_connectee_name=../femur_l
      Coordinate hip_flex_l: default_value=5.20871e-10 range=(-1.047198 2.617994) clamped=true
      Coordinate hip_add_l: default_value=-1.736236e-9 range=(-1.047198 0.3490659) clamped=true
      Coordinate hip_rot_l: default_value=0 range=(-1.047198 1.047198) clamped=true
      PhysicalOffsetFrame pelvis_offset: socket_parent_connectee_name=../../pelvis
          translation=(-0.056276 -0.07849 -0.07726)
      SpatialTransform: axes_held_at_zero=(translation1 translation2 translation3)
        TransformAxis rotation1: coordinates=hip_flex_l axis=(0 0 1) LinearFunction(coefficients=1 0)
        TransformAxis rotation2: coordinates=hip_add_l axis=(1 0 0) LinearFunction(coefficients=1 0)
        TransformAxis rotation3: coordinates=hip_rot_l axis=(0 1 0) LinearFunction(coefficients=1 0)
    CustomJoint knee_l: socket_parent_frame_connectee_name=../femur_l socket_child_frame_connectee_name=../tibia_l
      Coordinate knee_flex_l: default_value=4.859727e-9 range=(-0.1745329 2.792527) clamped=true
      SpatialTransform:
        TransformAxis rotation1: coordinates=knee_flex_l axis=(0 0 1)
          SimmSpline: x=(-6.28319 6.28319) y=(6.28319 -6.28319)
        TransformAxis rotation2: coordinates=knee_flex_l axis=(1 0 0)
          SimmSpline: x=(-0.174533 0 0.174533 0.349066 0.523599 0.698132 0.872665 1.0472 1.22173 1.39626 1.5708 1.74533 1.91986 2.0944)
              y=(0.00498946 0 -0.00605681 -0.0127056 -0.0193932 -0.025694 -0.0313393 -0.0362355 -0.0404783 -0.044365 -0.0484046 -0.0533308 -0.0601155 -0.0699935)
        TransformAxis rotation3: coordinates=knee_flex_l axis=(0 1 0)
          SimmSpline: x=(-0.174533 0 0.174533 0.349066 0.523599 0.698132 0.872665 1.0472 1.22173 1.39626 1.5708 1.74533 1.91986 2.0944)
              y=(0.0568237 0 -0.0473143 -0.0858667 -0.116487 -0.140093 -0.157672 -0.170252 -0.178879 -0.184595 -0.18842 -0.191344 -0.194325 -0.198293)
        TransformAxis translation1: coordinates=knee_flex_l axis=(1 0 0)
          SimmSpline: x=(-0.174533 0 0.174533 0.349066 0.523599 0.698132 0.872665 1.0472 1.22173 1.39626 1.5708 1.74533 1.91986 2.0944)
              y=(-0.00164957 -4.8e-7 0.00153765 0.00280273 0.00366246 0.00401894 0.00381314 0.00302974 0.00169348 -0.00013342 -0.00235575 -0.00485457 -0.00749805 -0.0101522)
        TransformAxis translation2: coordinates=knee_flex_l axis=(0 1 0)
          SimmSpline: x=(-0.174533 0 0.174533 0.349066 0.523599 0.698132 0.872665 1.0472 1.22173 1.39626 1.5708 1.74533 1.91986 2.0944)
              y=(-0.403959 -0.404425 -0.40548 -0.407056 -0.40905 -0.411333 -0.413758 -0.416171 -0.418425 -0.420384 -0.42194 -0.423017 -0.423578 -0.423625)
        TransformAxis translation3: coordinates=knee_flex_l axis=(0 0 1)
          SimmSpline: x=(-0.174533 0 0.174533 0.349066 0.523599 0.698132 0.872665 1.0472 1.22173 1.39626 1.5708 1.74533 1.91986 2.0944)
              y=(0.00082532 0.00126524 0.00170877 0.0021306 0.00251419 0.00284969 0.00313273 0.00336333 0.00354482 0.00368239 0.00378263 0.00385241 0.00389806 0.00392316)
    CustomJoint pf_l: socket_parent_frame_connectee_name=../femur_l socket_child_frame_connectee_name=../patella_l
      Coordinate pf_l_r3: default_value=0.001136855 range=(-99999.9 99999.9) clamped=false
      Coordinate pf_l_tx: default_value=0.04435 range=(-99999.9 99999.9) clamped=false
      Coordinate pf_l_ty: default_value=-0.418712 range=(-99999.9 99999.9) clamped=false
      SpatialTransform: axes_held_at_zero=(rotation2 rotation3 translation3)
        TransformAxis rotation1: coordinates=pf_l_r3 axis=(0 0 1) LinearFunction(coefficients=1 0)
        TransformAxis translation1: coordinates=pf_l_tx axis=(1 0 0) LinearFunction(coefficients=1 0)
        TransformAxis translation2: coordinates=pf_l_ty axis=(0 1 0) LinearFunction(coefficients=1 0)
    CustomJoint ankle_l: socket_parent_frame_connectee_name=tibia_l_offset socket_child_frame_connectee_name=../talus_l
      Coordinate ankle_flex_l: default_value=0 range=(-1.570796 1.570796) clamped=true
      PhysicalOffsetFrame tibia_l_offset: socket_parent_connectee_name=../../tibia_l translation=(-0.01 -0.4 0)
      SpatialTransform: axes_held_at_zero=(rotation2 rotation3 translation1 translation2 translation3)
        TransformAxis rotation1: coordinates=ankle_flex_l axis=(-0.105014 -0.1740221 -0.9791263)
          SimmSpline: x=(-6.28319 6.28319) y=(6.28319 -6.28319)
    CustomJoint subtalar_l: socket_parent_frame_connectee_name=talus_l_offset
        socket_child_frame_connectee_name=../calcn_l
      Coordinate subt_angle_l: default_value=0 range=(-0.6981317 0.6981317) clamped=true
      PhysicalOffsetFrame talus_l_offset: socket_parent_connectee_name=../../talus_l
          translation=(-0.04877 -0.04195 -0.00792)
      SpatialTransform: axes_held_at_zero=(rotation2 rotation3 translation1 translation2 translation3)
        TransformAxis rotation1: coordinates=subt_angle_l axis=(0.78718 0.604747 0.120949)
          SimmSpline: x=(-6.28319 6.28319) y=(6.28319 -6.28319)
    CustomJoint mtp_l: socket_parent_frame_connectee_name=calcn_l_offset socket_child_frame_connectee_name=../toes_l
      Coordinate mtp_angle_l: default_value=0 range=(-1.047198 1.047198) clamped=true
      PhysicalOffsetFrame calcn_l_offset: socket_parent_connectee_name=../../calcn_l
          translation=(0.1788 -0.002 -0.00108)
      SpatialTransform: axes_held_at_zero=(rotation2 rotation3 translation1 translation2 translation3)
        TransformAxis rotation1: coordinates=mtp_angle_l axis=(0.5809542 0 0.8139363)
          SimmSpline: x=(-6.28319 6.28319) y=(6.28319 -6.28319)
    WeldJoint tibia_tibia: socket_parent_frame_connectee_name=tibia_proximal_r_offset
        socket_child_frame_connectee_name=../tibia_r
      PhysicalOffsetFrame tibia_proximal_r_offset: socket_parent_connectee_name=../../tibia_proximal_r
          translation=(0.006 0 0)
    CustomJoint ankle_r: socket_parent_frame_connectee_name=tibia_r_offset socket_child_frame_connectee_name=../talus_r
      Coordinate ankle_flex_r: default_value=0 range=(-1.570796 1.570796) clamped=true
      PhysicalOffsetFrame tibia_r_offset: socket_parent_connectee_name=../../tibia_r translation=(-0.01 -0.4 0)
      SpatialTransform: axes_held_at_zero=(rotation2 rotation3 translation1 translation2 translation3)
        TransformAxis rotation1: coordinates=ankle_flex_r axis=(-0.105014 -0.1740221 0.9791263)
            LinearFunction(coefficients=1 0)
    CustomJoint subtalar_r: socket_parent_frame_connectee_name=talus_r_offset
        socket_child_frame_connectee_name=../calcn_r
      Coordinate subt_angle_r: default_value=0 range=(-1.047198 1.047198) clamped=true
      PhysicalOffsetFrame talus_r_offset: socket_parent_connectee_name=../../talus_r
          translation=(-0.04877 -0.04195 0.00792)
      SpatialTransform: axes_held_at_zero=(rotation2 rotation3 translation1 translation2 translation3)
        TransformAxis rotation1: coordinates=subt_angle_r axis=(0.78718 0.604747 -0.120949)
            LinearFunction(coefficients=1 0)
    CustomJoint mtp_r: socket_parent_frame_connectee_name=calcn_r_offset socket_child_frame_connectee_name=../toes_r
      Coordinate mtp_angle_r: default_value=0 range=(-1.047198 1.047198) clamped=true
      PhysicalOffsetFrame calcn_r_offset: socket_parent_connectee_name=../../calcn_r
          translation=(0.1788 -0.002 0.00108)
      SpatialTransform: axes_held_at_zero=(rotation2 rotation3 translation1 translation2 translation3)
        TransformAxis rotation1: coordinates=mtp_angle_r axis=(0.5809542 0 -0.8139363) LinearFunction(coefficients=1 0)
    FreeJoint latMeniscus_r_seg1_to_tibia_proximal_r: socket_parent_frame_connectee_name=tibia_proximal_r_offset
        socket_child_frame_connectee_name=../latMeniscus_r_seg1of3
      Coordinate latMen_r_s1_rx: default_value=0 range=(-0.785 0.785)
      Coordinate latMen_r_s1_ry: default_value=0 range=(-0.785 0.785)
      Coordinate latMen_r_s1_rz: default_value=0 range=(-0.785 0.785)
      Coordinate latMen_r_s1_tx: default_value=0 range=(-0.1 0.1)
      Coordinate latMen_r_s1_ty: default_value=0 range=(-0.1 0.1)
      Coordinate latMen_r_s1_tz: default_value=0 range=(-0.1 0.1)
      PhysicalOffsetFrame tibia_proximal_r_offset: socket_parent_connectee_name=../../tibia_proximal_r
          translation=(-0.00892067 -0.0198203 0.0168451)
    FreeJoint latMeniscus_r_seg2_to_seg1: socket_parent_frame_connectee_name=latMeniscus_r_seg1of3_offset
        socket_child_frame_connectee_name=latMeniscus_r_seg2of3_offset
      Coordinate latMen_r_s2_rx: default_value=0 range=(-0.785 0.785)
      Coordinate latMen_r_s2_ry: default_value=0 range=(-0.785 0.785)
      Coordinate latMen_r_s2_rz: default_value=0 range=(-0.785 0.785)
      Coordinate latMen_r_s2_tx: default_value=0 range=(-0.1 0.1)
      Coordinate latMen_r_s2_ty: default_value=0 range=(-0.1 0.1)
      Coordinate latMen_r_s2_tz: default_value=0 range=(-0.1 0.1)
      PhysicalOffsetFrame latMeniscus_r_seg1of3_offset: socket_parent_connectee_name=../../latMeniscus_r_seg1of3
          translation=(0.00100021 -0.00206192 0.0102762) orientation=(0 5.1429 0)
      PhysicalOffsetFrame latMeniscus_r_seg2of3_offset: socket_parent_connectee_name=../../latMeniscus_r_seg2of3
          translation=(-0.00711238 -0.000626544 -0.00756151) orientation=(0 5.1429 0)
    FreeJoint latMeniscus_r_seg3_to_seg2: socket_parent_frame_connectee_name=latMeniscus_r_seg2of3_offset
        socket_child_frame_connectee_name=latMeniscus_r_seg3of3_offset
      Coordinate latMen_r_s3_rx: default_value=0 range=(-0.785 0.785)
      Coordinate latMen_r_s3_ry: default_value=0 range=(-0.785 0.785)
      Coordinate latMen_r_s3_rz: default_value=0 range=(-0.785 0.785)
      Coordinate latMen_r_s3_tx: default_value=0 range=(-0.1 0.1)
      Coordinate latMen_r_s3_ty: default_value=0 range=(-0.1 0.1)
      Coordinate latMen_r_s3_tz: default_value=0 range=(-0.1 0.1)
      PhysicalOffsetFrame latMeniscus_r_seg2of3_offset: socket_parent_connectee_name=../../latMeniscus_r_seg2of3
          translation=(0.0107421 0.00150306 -0.00157396) orientation=(0 6.86496 0)
      PhysicalOffsetFrame latMeniscus_r_seg3of3_offset: socket_parent_connectee_name=../../latMeniscus_r_seg3of3
          translation=(-0.00566442 3.74758e-6 0.00924473) orientation=(0 6.86496 0)
    FreeJoint medMeniscus_r_seg1_to_tibia_proximal_r: socket_parent_frame_connectee_name=tibia_proximal_r_offset
        socket_child_frame_connectee_name=../medMeniscus_r_seg1of3
      Coordinate medMen_r_s1_rx: default_value=0 range=(-0.785 0.785)
      Coordinate medMen_r_s1_ry: default_value=0 range=(-0.785 0.785)
      Coordinate medMen_r_s1_rz: default_value=0 range=(-0.785 0.785)
      Coordinate medMen_r_s1_tx: default_value=0 range=(-0.1 0.1)
      Coordinate medMen_r_s1_ty: default_value=0 range=(-0.1 0.1)
      Coordinate medMen_r_s1_tz: default_value=0 range=(-0.1 0.1)
      PhysicalOffsetFrame tibia_proximal_r_offset: socket_parent_connectee_name=../../tibia_proximal_r
          translation=(0.017222 -0.0196259 -0.0182872)
    FreeJoint medMeniscus_r_seg2_to_seg1: socket_parent_frame_connectee_name=medMeniscus_r_seg1of3_offset
        socket_child_frame_connectee_name=medMeniscus_r_seg2of3_offset
      Coordinate medMen_r_s2_rx: default_value=0 range=(-0.785 0.785)
      Coordinate medMen_r_s2_ry: default_value=0 range=(-0.785 0.785)
      Coordinate medMen_r_s2_rz: default_value=0 range=(-0.785 0.785)
      Coordinate medMen_r_s2_tx: default_value=0 range=(-0.1 0.1)
      Coordinate medMen_r_s2_ty: default_value=0 range=(-0.1 0.1)
      Coordinate medMen_r_s2_tz: default_value=0 range=(-0.1 0.1)
      PhysicalOffsetFrame medMeniscus_r_seg1of3_offset: socket_parent_connectee_name=../../medMeniscus_r_seg1of3
          translation=(-0.00805491 -0.00131213 -0.0067729) orientation=(0 2.62963 0)
      PhysicalOffsetFrame medMeniscus_r_seg2of3_offset: socket_parent_connectee_name=../../medMeniscus_r_seg2of3
          translation=(0.00980246 0.00197362 0.00247666) orientation=(0 2.62963 0)
    FreeJoint medMeniscus_r_seg3_to_seg2: socket_parent_frame_connectee_name=medMeniscus_r_seg2of3_offset
        socket_child_frame_connectee_name=medMeniscus_r_seg3of3_offset
      Coordinate medMen_r_s3_rx: default_value=0 range=(-0.785 0.785)
      Coordinate medMen_r_s3_ry: default_value=0 range=(-0.785 0.785)
      Coordinate medMen_r_s3_rz: default_value=0 range=(-0.785 0.785)
      Coordinate medMen_r_s3_tx: default_value=0 range=(-0.1 0.1)
      Coordinate medMen_r_s3_ty: default_value=0 range=(-0.1 0.1)
      Coordinate medMen_r_s3_tz: default_value=0 range=(-0.1 0.1)
      PhysicalOffsetFrame medMeniscus_r_seg2of3_offset: socket_parent_connectee_name=../../medMeniscus_r_seg2of3
          translation=(-0.00921865 -0.00071691 0.00512198) orientation=(0 4.03753 0)
      PhysicalOffsetFrame medMeniscus_r_seg3of3_offset: socket_parent_connectee_name=../../medMeniscus_r_seg3of3
          translation=(0.00344311 -0.000729114 -0.010131) orientation=(0 4.03753 0)
  ConstraintSet:
    CoordinateCouplerConstraint pf_l_r3_con: independent_coordinate_names=knee_flex_l dependent_coordinate_name=pf_l_r3
      coupled_coordinates_function: SimmSpline: x=(0 0.174533 0.349066 0.523599 0.698132 0.872665 1.0472 1.22173 1.39626 1.5708 1.74533 1.91986 2.0944)
          y=(0.00113686 -0.00629212 -0.105582 -0.253683 -0.414245 -0.579047 -0.747244 -0.91799 -1.09044 -1.26379 -1.43763 -1.61186 -1.78634)
    CoordinateCouplerConstraint pf_l_tx_con: independent_coordinate_names=knee_flex_l dependent_coordinate_name=pf_l_tx
      coupled_coordinates_function: SimmSpline: x=(0 0.174533 0.349066 0.523599 0.698132 0.872665 1.0472 1.22173 1.39626 1.5708 1.74533 1.91986 2.0944)
          y=(0.04435 0.040692 0.035581 0.029012 0.021473 0.013523 0.005483 -0.002412 -0.009959 -0.016903 -0.022926 -0.027739 -0.030815)
    CoordinateCouplerConstraint pf_l_ty_con: independent_coordinate_names=knee_flex_l dependent_coordinate_name=pf_l_ty
      coupled_coordinates_function: SimmSpline: x=(0 0.174533 0.349066 0.523599 0.698132 0.872665 1.0472 1.22173 1.39626 1.5708 1.74533 1.91986 2.0944)
          y=(-0.418712 -0.426965 -0.43422 -0.440152 -0.444617 -0.447495 -0.448724 -0.448337 -0.446353 -0.442826 -0.438035 -0.432448 -0.426632)
  ForceSet:
    Thelen2003Muscle addbrev_r: max_isometric_force=303.7 optimal_fiber_length=0.1031 tendon_slack_length=0.036
        pennation_angle_at_optimal=0.1064651
      PathPoint P1: socket_parent_frame_connectee_name=../../../pelvis (-0.0191 -0.094 0.0154)
      PathPoint P2: socket_parent_frame_connectee_name=../../../femur_r (-0.002 -0.118 0.0249)
    Thelen2003Muscle addlong_r: max_isometric_force=399.5 optimal_fiber_length=0.1082 tendon_slack_length=0.13
        pennation_angle_at_optimal=0.1235693
      PathPoint P1: socket_parent_frame_connectee_name=../../../pelvis (-0.00758 -0.0889 0.01888)
      PathPoint P2: socket_parent_frame_connectee_name=../../../femur_r (0.01126 -0.23937 0.01583)
    Thelen2003Muscle addmagProx_r: max_isometric_force=324.2 optimal_fiber_length=0.1056 tendon_slack_length=0.043
        pennation_angle_at_optimal=0.3872886
      PathPoint P1: socket_parent_frame_connectee_name=../../../pelvis (-0.03098 -0.10755 0.01365)
      PathPoint P2: socket_parent_frame_connectee_name=../../../femur_r (-0.01527 -0.07886 0.03202)
    Thelen2003Muscle addmagMid_r: max_isometric_force=324.2 optimal_fiber_length=0.1377 tendon_slack_length=0.048
        pennation_angle_at_optimal=0.2567379
      PathPoint P1: socket_parent_frame_connectee_name=../../../pelvis (-0.05266 -0.12075 0.02854)
      PathPoint P2: socket_parent_frame_connectee_name=../../../femur_r (0.00242 -0.1624 0.02922)
    Thelen2003Muscle addmagDist_r: max_isometric_force=324.2 optimal_fiber_length=0.1772 tendon_slack_length=0.09
        pennation_angle_at_optimal=0.2412045
      PathPoint P1: socket_parent_frame_connectee_name=../../../pelvis (-0.07404 -0.12767 0.03982)
      PathPoint P2: socket_parent_frame_connectee_name=../../../femur_r (0.01125 -0.2625 0.0193)
    Thelen2003Muscle addmagIsch_r: max_isometric_force=324.2 optimal_fiber_length=0.1562 tendon_slack_length=0.221
        pennation_angle_at_optimal=0.2073451
      PathPoint P1: socket_parent_frame_connectee_name=../../../pelvis (-0.08962 -0.12976 0.04171)
      PathPoint P2: socket_parent_frame_connectee_name=../../../femur_r (0.00481 -0.38797 -0.03273)
    Thelen2003Muscle bflh_r: max_isometric_force=705.2 optimal_fiber_length=0.0976 tendon_slack_length=0.322
        pennation_angle_at_optimal=0.2021091
      PathPoint P1: socket_parent_frame_connectee_name=../../../pelvis (-0.104 -0.1191 0.0586)
      PathPoint P2: socket_parent_frame_connectee_name=../../../tibia_r (-0.0317 -0.0425 0.0333)
    Thelen2003Muscle bfsh_r: max_isometric_force=631.6 optimal_fiber_length=0.1103 tendon_slack_length=0.104
        pennation_angle_at_optimal=0.2151991
      PathPoint P1: socket_parent_frame_connectee_name=../../../femur_r (0.005 -0.2111 0.0234)
      PathPoint P2: socket_parent_frame_connectee_name=../../../tibia_r (-0.0301 -0.0419 0.0318)
    Thelen2003Muscle edl_r: max_isometric_force=345.4 optimal_fiber_length=0.0693 tendon_slack_length=0.3673
        pennation_angle_at_optimal=0.1890192
      PathPoint P1: socket_parent_frame_connectee_name=../../../tibia_r (-0.016 -0.1157 0.0205)
      PathPoint P2: socket_parent_frame_connectee_name=../../../tibia_r (0.0164 -0.376 0.0112)
      PathPoint P3: socket_parent_frame_connectee_name=../../../calcn_r (0.0919 0.036 0.0008)
      PathPoint P4: socket_parent_frame_connectee_name=../../../calcn_r (0.1616 0.0055 0.013)
      PathPoint P5: socket_parent_frame_connectee_name=../../../toes_r (0.0003 0.0047 0.0153)
      PathPoint P6: socket_parent_frame_connectee_name=../../../toes_r (0.0443 -0.0004 0.025)
    Thelen2003Muscle ehl_r: max_isometric_force=165 optimal_fiber_length=0.0748 tendon_slack_length=0.3315
        pennation_angle_at_optimal=0.1647591
      PathPoint P1: socket_parent_frame_connectee_name=../../../tibia_r (-0.014 -0.155 0.0189)
      PathPoint P2: socket_parent_frame_connectee_name=../../../tibia_r (0.007 -0.2909 0.0164)
      PathPoint P3: socket_parent_frame_connectee_name=../../../tibia_r (0.02 -0.3693 -0.0028)
      PathPoint P4: socket_parent_frame_connectee_name=../../../calcn_r (0.097 0.0389 -0.0211)
      PathPoint P5: socket_parent_frame_connectee_name=../../../calcn_r (0.1293 0.0309 -0.0257)
      PathPoint P6: socket_parent_frame_connectee_name=../../../calcn_r (0.1734 0.0139 -0.028)
      PathPoint P7: socket_parent_frame_connectee_name=../../../toes_r (0.0298 0.0041 -0.0245)
      PathPoint P8: socket_parent_frame_connectee_name=../../../toes_r (0.0563 0.0034 -0.0186)
    Thelen2003Muscle fdl_r: max_isometric_force=274.4 optimal_fiber_length=0.0446 tendon_slack_length=0.3777
        pennation_angle_at_optimal=0.2380629
      PathPoint P1: socket_parent_frame_connectee_name=../../../tibia_r (-0.0023 -0.1832 -0.0018)
      PathPoint P2: socket_parent_frame_connectee_name=../../../tibia_r (-0.0176 -0.3645 -0.0124)
      PathPoint P3: socket_parent_frame_connectee_name=../../../calcn_r (0.0436 0.0315 -0.028)
      PathPoint P4: socket_parent_frame_connectee_name=../../../calcn_r (0.0708 0.0176 -0.0263)
      PathPoint P5: socket_parent_frame_connectee_name=../../../calcn_r (0.1658 -0.0081 0.0116)
      PathPoint P6: socket_parent_frame_connectee_name=../../../toes_r (-0.0019 -0.0078 0.0147)
      PathPoint P7: socket_parent_frame_connectee_name=../../../toes_r (0.0285 -0.0071 0.0215)
      PathPoint P8: socket_parent_frame_connectee_name=../../../toes_r (0.0441 -0.006 0.0242)
    Thelen2003Muscle fhl_r: max_isometric_force=436.8 optimal_fiber_length=0.0527 tendon_slack_length=0.356
        pennation_angle_at_optimal=0.2947861
      PathPoint P1: socket_parent_frame_connectee_name=../../../tibia_r (-0.031 -0.2163 0.02)
      PathPoint P2: socket_parent_frame_connectee_name=../../../tibia_r (-0.0242 -0.3671 -0.0076)
      PathPoint P3: socket_parent_frame_connectee_name=../../../calcn_r (0.0374 0.0276 -0.0241)
      PathPoint P4: socket_parent_frame_connectee_name=../../../calcn_r (0.1038 0.0068 -0.0256)
      PathPoint P5: socket_parent_frame_connectee_name=../../../calcn_r (0.1726 -0.0053 -0.0269)
      PathPoint P6: socket_parent_frame_connectee_name=../../../toes_r (0.0155 -0.0064 -0.0265)
      PathPoint P7: socket_parent_frame_connectee_name=../../../toes_r (0.0562 -0.0102 -0.0181)
    Thelen2003Muscle gaslat_r: max_isometric_force=606.4 optimal_fiber_length=0.0588 tendon_slack_length=0.369
        pennation_angle_at_optimal=0.2101376 FmaxMuscleStrain=2
      PathPoint P1: socket_parent_frame_connectee_name=../../../femur_r (-0.003 -0.3814 0.0277)
      PathPoint P2: socket_parent_frame_connectee_name=../../../calcn_r (0.0044 0.031 -0.0053)
      PathWrap pathwrap_: wrap_object=Gastroc_at_Condyles_r method=hybrid
    Thelen2003Muscle gasmed_r: max_isometric_force=1308 optimal_fiber_length=0.051 tendon_slack_length=0.389
        pennation_angle_at_optimal=0.1724385 FmaxMuscleStrain=2
      PathPoint P1: socket_parent_frame_connectee_name=../../../femur_r (0.008 -0.3788 -0.0208)
      PathPoint P2: socket_parent_frame_connectee_name=../../../calcn_r (0.0044 0.031 -0.0053)
      PathWrap pathwrap_: wrap_object=Gastroc_at_Condyles_r method=hybrid
    Thelen2003Muscle gem_r: max_isometric_force=218 optimal_fiber_length=0.024 tendon_slack_length=0.039
        pennation_angle_at_optimal=0
      PathPoint P1: socket_parent_frame_connectee_name=../../../pelvis (-0.10357 -0.0764 0.06707)
      PathPoint P2: socket_parent_frame_connectee_name=../../../femur_r (-0.0142 -0.0033 0.0443)
    Thelen2003Muscle glmax1_r: max_isometric_force=1092.2 optimal_fiber_length=0.1473 tendon_slack_length=0.05
        pennation_angle_at_optimal=0.3829252
      PathPoint P1: socket_parent_frame_connectee_name=../../../pelvis (-0.1231 0.0345 0.0563)
      PathPoint P2: socket_parent_frame_connectee_name=../../../pelvis (-0.1257 -0.0242 0.0779)
      PathPoint P3: socket_parent_frame_connectee_name=../../../femur_r (-0.0444 -0.0326 0.0302)
      PathPoint P4: socket_parent_frame_connectee_name=../../../femur_r (-0.0277 -0.0566 0.047)
      PathWrap pathwrap_: wrap_object=Gmax_at_pelvis_r method=hybrid
    Thelen2003Muscle glmax2_r: max_isometric_force=1561 optimal_fiber_length=0.1569 tendon_slack_length=0.0733
        pennation_angle_at_optimal=0.3829252
      PathPoint P1: socket_parent_frame_connectee_name=../../../pelvis (-0.1317 0.0087 0.0462)
      PathPoint P2: socket_parent_frame_connectee_name=../../../pelvis (-0.1344 -0.0609 0.0813)
      PathPoint P3: socket_parent_frame_connectee_name=../../../femur_r (-0.045 -0.0584 0.0252)
      PathPoint P4: socket_parent_frame_connectee_name=../../../femur_r (-0.0156 -0.1016 0.0419)
      PathWrap pathwrap_: wrap_object=Gmax_at_pelvis_r method=hybrid
    Thelen2003Muscle glmax3_r: max_isometric_force=1058.2 optimal_fiber_length=0.1665 tendon_slack_length=0.0702
        pennation_angle_at_optimal=0.3829252
      PathPoint P1: socket_parent_frame_connectee_name=../../../pelvis (-0.13 -0.0525 0.009)
      PathPoint P2: socket_parent_frame_connectee_name=../../../pelvis (-0.1273 -0.1263 0.0435)
      PathPoint P3: socket_parent_frame_connectee_name=../../../femur_r (-0.0281 -0.1125 0.0094)
      PathPoint P4: socket_parent_frame_connectee_name=../../../femur_r (-0.006 -0.1419 0.0411)
      PathWrap pathwrap_: wrap_object=Gmax_at_pelvis_r method=hybrid
    Thelen2003Muscle glmed1_r: max_isometric_force=1762.2 optimal_fiber_length=0.0733 tendon_slack_length=0.0565
        pennation_angle_at_optimal=0.3572689
      PathPoint P1: socket_parent_frame_connectee_name=../../../pelvis (-0.0445 0.0245 0.1172)
      PathPoint P2: socket_parent_frame_connectee_name=../../../femur_r (-0.0218 -0.0117 0.0555)
    Thelen2003Muscle glmed2_r: max_isometric_force=1033 optimal_fiber_length=0.0733 tendon_slack_length=0.066
        pennation_angle_at_optimal=0.3572689
      PathPoint P1: socket_parent_frame_connectee_name=../../../pelvis (-0.085 0.0316 0.0675)
      PathPoint P2: socket_parent_frame_connectee_name=../../../femur_r (-0.0258 -0.0058 0.0527)
    Thelen2003Muscle glmed3_r: max_isometric_force=1404 optimal_fiber_length=0.0733 tendon_slack_length=0.046
        pennation_angle_at_optimal=0.3572689
      PathPoint P1: socket_parent_frame_connectee_name=../../../pelvis (-0.1152 -0.0073 0.0526)
      PathPoint P2: socket_parent_frame_connectee_name=../../../femur_r (-0.0309 -0.0047 0.0518)
    Thelen2003Muscle glmin1_r: max_isometric_force=720 optimal_fiber_length=0.068 tendon_slack_length=0.016
        pennation_angle_at_optimal=0.1745329
      PathPoint P1: socket_parent_frame_connectee_name=../../../pelvis (-0.0464 -0.0149 0.1042)
      PathPoint P2: socket_parent_frame_connectee_name=../../../femur_r (-0.0072 -0.0104 0.056)
    Thelen2003Muscle glmin2_r: max_isometric_force=760 optimal_fiber_length=0.056 tendon_slack_length=0.026
        pennation_angle_at_optimal=0
      PathPoint P1: socket_parent_frame_connectee_name=../../../pelvis (-0.0616 -0.0142 0.0971)
      PathPoint P2: socket_parent_frame_connectee_name=../../../femur_r (-0.0096 -0.0104 0.056)
    Thelen2003Muscle glmin3_r: max_isometric_force=860 optimal_fiber_length=0.038 tendon_slack_length=0.051
        pennation_angle_at_optimal=0.01745329
      PathPoint P1: socket_parent_frame_connectee_name=../../../pelvis (-0.0789 -0.0155 0.0798)
      PathPoint P2: socket_parent_frame_connectee_name=../../../femur_r (-0.0135 -0.0083 0.055)
    Thelen2003Muscle grac_r: max_isometric_force=137.3 optimal_fiber_length=0.2278 tendon_slack_length=0.169
        pennation_angle_at_optimal=0.1424189
      PathPoint P1: socket_parent_frame_connectee_name=../../../pelvis (-0.04736 -0.12932 0.02456)
      PathPoint P2: socket_parent_frame_connectee_name=../../../tibia_r (-0.01842 -0.04755 -0.02961)
      PathPoint P3: socket_parent_frame_connectee_name=../../../tibia_r (0.00178 -0.06962 -0.01573)
      PathWrap pathwrap_: wrap_object=GR_at_condyles_r method=midpoint
    Thelen2003Muscle iliacus_r: max_isometric_force=2487.6 optimal_fiber_length=0.1066 tendon_slack_length=0.094
        pennation_angle_at_optimal=0.2494076
      PathPoint P1: socket_parent_frame_connectee_name=../../../pelvis (-0.0605 0.0309 0.0843)
      PathPoint P2: socket_parent_frame_connectee_name=../../../pelvis (-0.0135 -0.0557 0.0756)
      PathPoint P3: socket_parent_frame_connectee_name=../../../femur_r (-0.0023 -0.0565 0.0139)
      PathPoint P4: socket_parent_frame_connectee_name=../../../femur_r (-0.0122 -0.0636 0.0196)
      PathWrap pathwrap_: wrap_object=IL_at_brim_r method=hybrid
    Thelen2003Muscle pect_r: max_isometric_force=177 optimal_fiber_length=0.1 tendon_slack_length=0.033
        pennation_angle_at_optimal=0
      PathPoint P1: socket_parent_frame_connectee_name=../../../pelvis (-0.0232 -0.08325 0.04529)
      PathPoint P2: socket_parent_frame_connectee_name=../../../femur_r (-0.00797 -0.08518 0.02403)
      PathWrap pathwrap_: wrap_object=PECT_at_femshaft_r method=hybrid
    Thelen2003Muscle perbrev_r: max_isometric_force=305.9 optimal_fiber_length=0.0454 tendon_slack_length=0.1481
        pennation_angle_at_optimal=0.2000147
      PathPoint P1: socket_parent_frame_connectee_name=../../../tibia_r (-0.0243 -0.2532 0.0251)
      PathPoint P2: socket_parent_frame_connectee_name=../../../tibia_r (-0.0339 -0.3893 0.0249)
      PathPoint P3: socket_parent_frame_connectee_name=../../../tibia_r (-0.0285 -0.4004 0.0255)
      PathPoint P4: socket_parent_frame_connectee_name=../../../calcn_r (0.0471 0.027 0.0233)
      PathPoint P5: socket_parent_frame_connectee_name=../../../calcn_r (0.0677 0.0219 0.0343)
    Thelen2003Muscle perlong_r: max_isometric_force=653.3 optimal_fiber_length=0.0508 tendon_slack_length=0.333
        pennation_angle_at_optimal=0.2457424
      PathPoint P1: socket_parent_frame_connectee_name=../../../tibia_r (-0.02 -0.1373 0.0282)
      PathPoint P2: socket_parent_frame_connectee_name=../../../tibia_r (-0.0317 -0.39 0.0237)
      PathPoint P3: socket_parent_frame_connectee_name=../../../tibia_r (-0.0272 -0.4014 0.024)
      PathPoint P4: socket_parent_frame_connectee_name=../../../calcn_r (0.0438 0.023 0.0221)
      PathPoint P5: socket_parent_frame_connectee_name=../../../calcn_r (0.0681 0.0106 0.0284)
      PathPoint P6: socket_parent_frame_connectee_name=../../../calcn_r (0.0852 0.0069 0.0118)
      PathPoint P7: socket_parent_frame_connectee_name=../../../calcn_r (0.1203 0.0085 -0.0184)
    Thelen2003Muscle pertert_r: max_isometric_force=90 optimal_fiber_length=0.079 tendon_slack_length=0.1
        pennation_angle_at_optimal=0.2268928
      PathPoint P1: socket_parent_frame_connectee_name=../../../tibia_r (-0.0149 -0.2485 0.0222)
      PathPoint P2: socket_parent_frame_connectee_name=../../../tibia_r (0.0108 -0.382 0.0225)
      PathPoint P3: socket_parent_frame_connectee_name=../../../calcn_r (0.0857 0.0228 0.0299)
    Thelen2003Muscle piri_r: max_isometric_force=296 optimal_fiber_length=0.026 tendon_slack_length=0.115
        pennation_angle_at_optimal=0.1745329
      PathPoint P1: socket_parent_frame_connectee_name=../../../pelvis (-0.10181 -0.00653 0.01351)
      PathPoint P2: socket_parent_frame_connectee_name=../../../pelvis (-0.10202 -0.03066 0.06092)
      PathPoint P3: socket_parent_frame_connectee_name=../../../femur_r (-0.0148 -0.0036 0.0437)
    Thelen2003Muscle psoas_r: max_isometric_force=1916 optimal_fiber_length=0.1169 tendon_slack_length=0.097
        pennation_angle_at_optimal=0.1860521
      PathPoint P1: socket_parent_frame_connectee_name=../../../pelvis (-0.0606 0.0619 0.039)
      PathPoint P2: socket_parent_frame_connectee_name=../../../pelvis (-0.0205 -0.0654 0.0656)
      PathPoint P3: socket_parent_frame_connectee_name=../../../femur_r (-0.0132 -0.0467 0.0046)
      PathPoint P4: socket_parent_frame_connectee_name=../../../femur_r (-0.0235 -0.0524 0.0088)
      PathWrap pathwrap_: wrap_object=PS_at_brim_r method=hybrid
    Thelen2003Muscle quadfem_r: max_isometric_force=508 optimal_fiber_length=0.054 tendon_slack_length=0.024
        pennation_angle_at_optimal=0
      PathPoint P1: socket_parent_frame_connectee_name=../../../pelvis (-0.11192 -0.11473 0.05166)
      PathPoint P2: socket_parent_frame_connectee_name=../../../femur_r (-0.03575 -0.03552 0.03612)
    Thelen2003Muscle recfem_r: max_isometric_force=848.8 optimal_fiber_length=0.0759 tendon_slack_length=0.3642
        pennation_angle_at_optimal=0.2431244 FmaxMuscleStrain=2
      PathPoint P1: socket_parent_frame_connectee_name=../../../pelvis (-0.024 -0.0388 0.0933)
      PathPoint P2: socket_parent_frame_connectee_name=../../../patella_r (-0.00019817 0.032359 0.0011381)
      PathPoint P3: socket_parent_frame_connectee_name=../../../patella_r (0.003423 0.02996 0.00078874)
      PathWrap pathwrap_: wrap_object=KnExt_at_fem_r
    Thelen2003Muscle sart_r: max_isometric_force=113.5 optimal_fiber_length=0.403 tendon_slack_length=0.11
        pennation_angle_at_optimal=0.02321288
      PathPoint P1: socket_parent_frame_connectee_name=../../../pelvis (-0.0195 -0.0156 0.1056)
      PathPoint P2: socket_parent_frame_connectee_name=../../../femur_r (-0.003 -0.3568 -0.0421)
      PathPoint P3: socket_parent_frame_connectee_name=../../../tibia_r (-0.0251 -0.0401 -0.0365)
      PathPoint P4: socket_parent_frame_connectee_name=../../../tibia_r (-0.0159 -0.0599 -0.0264)
      PathPoint P5: socket_parent_frame_connectee_name=../../../tibia_r (0.0136 -0.081 -0.0026)
    Thelen2003Muscle semimem_r: max_isometric_force=1162.7 optimal_fiber_length=0.069 tendon_slack_length=0.378
        pennation_angle_at_optimal=0.2633702
      PathPoint P1: socket_parent_frame_connectee_name=../../../pelvis (-0.0987 -0.114 0.0614)
      PathPoint P2: socket_parent_frame_connectee_name=../../../tibia_r (-0.029 -0.0417 -0.0196)
    Thelen2003Muscle semiten_r: max_isometric_force=301.9 optimal_fiber_length=0.193 tendon_slack_length=0.245
        pennation_angle_at_optimal=0.2244493
      PathPoint P1: socket_parent_frame_connectee_name=../../../pelvis (-0.1038 -0.1253 0.0515)
      PathPoint P2: socket_parent_frame_connectee_name=../../../tibia_r (-0.0312 -0.0508 -0.0229)
      PathPoint P3: socket_parent_frame_connectee_name=../../../tibia_r (0.0019 -0.0773 -0.0117)
    Thelen2003Muscle soleus_r: max_isometric_force=3585.9 optimal_fiber_length=0.044 tendon_slack_length=0.2815
        pennation_angle_at_optimal=0.4930555 FmaxMuscleStrain=2
      PathPoint P1: socket_parent_frame_connectee_name=../../../tibia_r (-0.0076 -0.0916 0.0098)
      PathPoint P2: socket_parent_frame_connectee_name=../../../calcn_r (0.0044 0.031 -0.0053)
    Thelen2003Muscle tfl_r: max_isometric_force=155 optimal_fiber_length=0.095 tendon_slack_length=0.45
        pennation_angle_at_optimal=0.05235988
      PathPoint P1: socket_parent_frame_connectee_name=../../../pelvis (-0.0311 0.0214 0.1241)
      PathPoint P2: socket_parent_frame_connectee_name=../../../femur_r (0.0294 -0.0995 0.0597)
      PathPoint P3: socket_parent_frame_connectee_name=../../../tibia_r (0.0108 -0.041 0.0346)
    Thelen2003Muscle tibant_r: max_isometric_force=673.7 optimal_fiber_length=0.0683 tendon_slack_length=0.241
        pennation_angle_at_optimal=0.1668535
      PathPoint P1: socket_parent_frame_connectee_name=../../../tibia_r (0.0154 -0.1312 0.0162)
      PathPoint P2: socket_parent_frame_connectee_name=../../../tibia_r (0.0251 -0.1906 0.0128)
      PathPoint P3: socket_parent_frame_connectee_name=../../../tibia_r (0.0233 -0.3659 -0.0132)
      PathPoint P4: socket_parent_frame_connectee_name=../../../calcn_r (0.1166 0.0178 -0.0305)
    Thelen2003Muscle tibpost_r: max_isometric_force=905.6 optimal_fiber_length=0.0378 tendon_slack_length=0.2818
        pennation_angle_at_optimal=0.2392846
      PathPoint P1: socket_parent_frame_connectee_name=../../../tibia_r (-0.0041 -0.1304 0.0103)
      PathPoint P2: socket_parent_frame_connectee_name=../../../tibia_r (-0.0164 -0.3655 -0.0175)
      PathPoint P3: socket_parent_frame_connectee_name=../../../calcn_r (0.0417 0.0334 -0.0286)
      PathPoint P4: socket_parent_frame_connectee_name=../../../calcn_r (0.0772 0.0159 -0.0281)
    Thelen2003Muscle vasint_r: max_isometric_force=1024.2 optimal_fiber_length=0.0993 tendon_slack_length=0.1216
        pennation_angle_at_optimal=0.07923795 FmaxMuscleStrain=2
      PathPoint P1: socket_parent_frame_connectee_name=../../../femur_r (0.029 -0.1924 0.031)
      PathPoint P2: socket_parent_frame_connectee_name=../../../femur_r (0.0335 -0.2084 0.0285)
      PathPoint P3: socket_parent_frame_connectee_name=../../../patella_r (-0.0039001 0.03545 -0.00035737)
      PathWrap pathwrap_: wrap_object=KnExt_vasint_at_fem_r
    Thelen2003Muscle vaslat_r: max_isometric_force=2255.4 optimal_fiber_length=0.0994 tendon_slack_length=0.1423
        pennation_angle_at_optimal=0.3207915 FmaxMuscleStrain=2
      PathPoint P1: socket_parent_frame_connectee_name=../../../femur_r (0.0048 -0.1854 0.0349)
      PathPoint P2: socket_parent_frame_connectee_name=../../../femur_r (0.0269 -0.2591 0.0409)
      PathPoint P3: socket_parent_frame_connectee_name=../../../patella_r (0.0015589 0.03248 0.01185)
      PathWrap pathwrap_: wrap_object=KnExt_at_fem_r
    Thelen2003Muscle vasmed_r: max_isometric_force=1443.7 optimal_fiber_length=0.0968 tendon_slack_length=0.1266
        pennation_angle_at_optimal=0.516792 FmaxMuscleStrain=2
      PathPoint P1: socket_parent_frame_connectee_name=../../../femur_r (0.014 -0.2099 0.0188)
      PathPoint P2: socket_parent_frame_connectee_name=../../../femur_r (0.0356 -0.2769 0.0009)
      PathPoint P3: socket_parent_frame_connectee_name=../../../patella_r (-0.00049014 0.033072 -0.0093351)
      PathWrap pathwrap_: wrap_object=KnExt_at_fem_r
    BushingForce Bush_medMeniscus_r_seg2_to_seg1: socket_frame1_connectee_name=../medMeniscus_r_seg1of3
        socket_frame2_connectee_name=../medMeniscus_r_seg2of3 rotational_stiffness=(0.05 0.05 0.05) [Nm/rad]
        translational_stiffness=(300000 300000 300000) [N/m] rotational_damping=(0 0 0) [Nm/(rad/s)]
        translational_damping=(0 0 0) [N/(m/s)]
      PhysicalOffsetFrame medMeniscus_r_seg1of3_offset: socket_parent_connectee_name=../../medMeniscus_r_seg1of3
          translation=(-0.00805491 -0.00131213 -0.0067729) orientation=(0 2.62963 0)
      PhysicalOffsetFrame medMeniscus_r_seg2of3_offset: socket_parent_connectee_name=../../medMeniscus_r_seg2of3
          translation=(0.00980246 0.00197362 0.00247666) orientation=(0 2.62963 0)
    BushingForce Bush_medMeniscus_r_seg3_to_seg2: socket_frame1_connectee_name=../medMeniscus_r_seg2of3
        socket_frame2_connectee_name=../medMeniscus_r_seg3of3 rotational_stiffness=(0.05 0.05 0.05)
        translational_stiffness=(300000 300000 300000) rotational_damping=(0 0 0) translational_damping=(0 0 0)
      PhysicalOffsetFrame medMeniscus_r_seg2of3_offset: socket_parent_connectee_name=../../medMeniscus_r_seg2of3
          translation=(-0.00921865 -0.00071691 0.00512198) orientation=(0 4.03753 0)
      PhysicalOffsetFrame medMeniscus_r_seg3of3_offset: socket_parent_connectee_name=../../medMeniscus_r_seg3of3
          translation=(0.00344311 -0.000729114 -0.010131) orientation=(0 4.03753 0)
    ObjectGroup hip_add_r: members=(addbrev_r addlong_r addmagDist_r addmagIsch_r addmagMid_r addmagProx_r bflh_r grac_r pect_r semimem_r semiten_r)
    ObjectGroup hip_flex_r: members=(addbrev_r addlong_r glmin1_r grac_r iliacus_r pect_r psoas_r recfem_r sart_r tfl_r)
    ObjectGroup hip_ext_r: members=(addlong_r addmagDist_r addmagIsch_r addmagMid_r addmagProx_r bflh_r glmax1_r glmax2_r glmax3_r glmed1_r glmed2_r glmed3_r glmin3_r semimem_r semiten_r)
    ObjectGroup knee_flex_r: members=(bflh_r bfsh_r gaslat_r gasmed_r grac_r sart_r semimem_r semiten_r)
    ObjectGroup ankle_df_r: members=(edl_r ehl_r pertert_r tibant_r)
    ObjectGroup everter_r: members=(edl_r perbrev_r perlong_r pertert_r)
    ObjectGroup inverter_r: members=(ehl_r fdl_r fhl_r tibant_r tibpost_r)
    ObjectGroup ankle_pf_r: members=(fdl_r fhl_r gaslat_r gasmed_r perbrev_r perlong_r soleus_r tibpost_r)
    ObjectGroup hip_exrot_r: members=(gem_r glmin3_r piri_r quadfem_r)
    ObjectGroup hip_abd_r: members=(glmax1_r glmed1_r glmed2_r glmed3_r glmin1_r glmin2_r glmin3_r piri_r sart_r tfl_r)
    ObjectGroup hip_inrot_r: members=(glmed1_r glmed2_r glmed3_r glmin1_r iliacus_r psoas_r tfl_r)
    ObjectGroup knee_ext_r: members=(recfem_r vasint_r vaslat_r vasmed_r)
    ObjectGroup knee_abd_r
