# OpenSim document version 30506
Model Dynamic Full Body Model:
  gravity: 0 -9.80665 0
  length_units: m
  force_units: N
  defaults: Thelen2003Muscle default: optimal_fiber_length=0 pennation_angle_at_optimal=0 [radians]
      max_contraction_velocity=10 FmaxTendonStrain=0.05 FmaxMuscleStrain=1 KshapeActive=0.35 KshapePassive=4 Af=0.3
      Flen=1.5 activation_time_constant=0.01 [seconds] deactivation_time_constant=0.03 [seconds]
  Ground
  BodySet:
    Body pelvis: mass=8.3775 [kg] mass_center=(-0.0893 -0.025796 0) inertia=(0.053993 0.061279 0.067263 0 0 0)
        meshes=(pelvis.vtp pelvflip.vtp sacrum.vtp)
      WrapEllipsoid PS_at_brim_r: translation=(-0.0798 -0.0654 0.0656) quadrant=all dimensions=(0.052 0.0492 0.071)
      WrapEllipsoid IL_at_brim_r: translation=(-0.0685 -0.0557 0.0756) quadrant=all dimensions=(0.0549 0.0665 0.071)
      WrapEllipsoid Gmax_at_pelvis_r: xyz_body_rotation=(-0.637045 0.383623 -0.684867)
          translation=(-0.0795 -0.0825 0.0665) quadrant=all dimensions=(0.04 0.04 0.06)
      WrapEllipsoid PS_at_brim_l: translation=(-0.0798 -0.0654 -0.0656) quadrant=all dimensions=(0.052 0.0492 0.071)
      WrapEllipsoid IL_at_brim_l: translation=(-0.0685 -0.0557 -0.0756) quadrant=all dimensions=(0.0549 0.0665 0.071)
      WrapEllipsoid Gmax_at_pelvis_l: xyz_body_rotation=(0.637045 -0.383623 -0.684867)
          translation=(-0.0795 -0.0825 -0.0665) quadrant=all dimensions=(0.04 0.04 0.06)
    Body femur_r: mass=10.1325 mass_center=(0 -0.162162 0) inertia=(0.171988 0.035276 0.171988 0 0 0)
      WrapEllipsoid AB_at_femshaft_r: xyz_body_rotation=(0.111701 0 0.176278)
          translation=(0.0146011 -0.117162 0.025469) quadrant=all dimensions=(0.0165 0.07 0.021)
      WrapEllipsoid AL_at_femshaft_r: xyz_body_rotation=(0.111701 0 0.0541052)
          translation=(0.0308673 -0.23799 0.0119159) quadrant=all dimensions=(0.0201 0.1 0.018)
      WrapEllipsoid AMprox_at_femshaft_r: xyz_body_rotation=(0.111701 0 0.211185)
          translation=(0.00603642 -0.0775977 0.0299068) quadrant=all dimensions=(0.0211 0.07 0.032)
      WrapEllipsoid AMmid_at_femshaft_r: xyz_body_rotation=(0.111701 0 0.123918)
          translation=(0.0230125 -0.160711 0.0205842) quadrant=all dimensions=(0.0214 0.12 0.031)
      WrapEllipsoid AMdist_at_femshaft_r: xyz_body_rotation=(0.111701 0 0.176278)
          translation=(0.0307071 -0.260769 0.00936092) quadrant=all dimensions=(0.0218 0.2 0.0215)
      WrapEllipsoid AMisch_at_condyles_r: xyz_body_rotation=(0.111701 0 -0.434587)
          translation=(-0.0286471 -0.376993 -0.00367576) quadrant=all dimensions=(0.05 0.24 0.0402)
      WrapEllipsoid PECT_at_femshaft_r: xyz_body_rotation=(0.111701 0 0.211185)
          translation=(0.00762137 -0.0852965 0.0290433) quadrant=all dimensions=(0.0166 0.05 0.0131)
      WrapCylinder KnExt_at_fem_r: translation=(0.01 -0.397 0) quadrant=x radius=0.028 length=0.2
      WrapCylinder KnExt_vasint_at_fem_r: translation=(0.01 -0.397 0) quadrant=x radius=0.026 length=0.2
      WrapEllipsoid Gastroc_at_Condyles_r: xyz_body_rotation=(0.0589921 -0.0872665 0.0232129)
          translation=(0.01 -0.4075 0.0003) quadrant=all dimensions=(0.03 0.025 0.15)
    Body femur_distal_r: mass=0.01 mass_center=(0 0 0) inertia=(0.001 0.001 0.001 0 0 0)
        meshes=(ACLC01-R-femur-cart-volume.vtp ACLC01-R-femur-060914.vtp)
      WrapCylinder Capsule_r: xyz_body_rotation=(-0.0299066 0.02 0.331613) translation=(-0.004 -0.003 0) quadrant=all
          radius=0.018 length=0.5
    Body patella_r: mass=0.4875 mass_center=(0.0018 0.0264 0) inertia=(1.6e-5 7.4e-5 7.4e-5 0 0 0)
        meshes=(ACLC01-R-patella-cart-060914.vtp ACLC01-R-patella-060914.vtp)
      WrapEllipsoid PatTen_r: xyz_body_rotation=(0 0 0.01) translation=(0.0005 -0.009389232 0.00048233) quadrant=all
          dimensions=(0.005 0.008 0.012)
    Body tibia_proximal_r: mass=0.01 mass_center=(0 0 0) inertia=(0.001 0.001 0.001 0 0 0)
        meshes=(ACLC01-R-tibia-cart-111214.vtp ACLC01-R-tibia-111214.vtp ACLC01-R-fibula-111214.vtp)
      WrapEllipsoid Med_Lig_r: xyz_body_rotation=(-0.104907 -0.0349066 0.181613) translation=(0.001 -0.0346 -0.0187)
          quadrant=all dimensions=(0.03 0.018 0.012)
      WrapEllipsoid Med_LigP_r: xyz_body_rotation=(-0.139813 0.349066 0.181613) translation=(-0.0104 -0.0314 -0.0227)
          quadrant=all dimensions=(0.025 0.0054 0.0053)
    Body tibia_r: mass=3.2475 mass_center=(0 -0.171713 0) inertia=(0.029999 0.005157 0.031231 0 0 0)
      WrapEllipsoid GR_at_condyles_r: xyz_body_rotation=(0 0 -0.18326) translation=(0 0 0) quadrant=all
          dimensions=(0.036 0.0635 0.0533)
      WrapEllipsoid SM_at_condyles_r: xyz_body_rotation=(0 0 -0.296706) translation=(0 0 0) quadrant=all
          dimensions=(0.0352 0.0602 0.0489)
      WrapEllipsoid ST_at_condyles_r: xyz_body_rotation=(0 0 -0.270526) translation=(0 0 0) quadrant=all
          dimensions=(0.0425 0.069 0.0572)
      WrapCylinder BFLH_at_gastroc_r: translation=(-0.0316 -0.0443 0) quadrant=y radius=0.01 length=0.1
      WrapCylinder Gastroc_at_Shank_r: xyz_body_rotation=(2.96723 0.0289725 -1.47812)
          translation=(-0.0074 -0.074 -0.0033) quadrant=-y radius=0.055 length=0.1
    Body talus_r: mass=0.045 mass_center=(0.0055 0.0023 0) inertia=(3e-6 1e-6 3e-6 0 0 0) meshes=talus_rv.vtp
    Body calcn_r: mass=1.235 mass_center=(0.101865 0.0156 0) inertia=(0.001269 0.003229 0.003744 0 0 0)
        meshes=(calcaneous_rv.vtp navicular_rv.vtp cuboid_rv.vtp first_cuneiform_rv.vtp second_cuneiform_rv.vtp third_cuneiform_rv.vtp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)
    Body toes_r: mass=0.1975 mass_center=(0.0307 -0.0026 0.0105) inertia=(0.000202 0.000517 0.000595 0 0 0)
        meshes=(prox_phalanx1_rvs.vtp prox_phalanx2_rvs.vtp prox_phalanx3_rvs.vtp prox_phalanx4_rvs.vtp prox_phalanx5_rvs.vtp mid_phalanx2_rvs.vtp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)
    Body femur_l: mass=10.1325 mass_center=(0 -0.162162 0) inertia=(0.171988 0.035276 0.171988 0 0 0)
        meshes=femur_l.vtp
      WrapEllipsoid AB_at_femshaft_l: xyz_body_rotation=(-0.111701 0 0.176278)
          translation=(0.0146011 -0.117162 -0.025469) quadrant=all dimensions=(0.0165 0.07 0.021)
      WrapEllipsoid AL_at_femshaft_l: xyz_body_rotation=(-0.111701 0 0.0541052)
          translation=(0.0308673 -0.23799 -0.0119159) quadrant=all dimensions=(0.0201 0.1 0.018)
      WrapEllipsoid AMprox_at_femshaft_l: xyz_body_rotation=(-0.111701 0 0.211185)
          translation=(0.00603642 -0.0775977 -0.0299068) quadrant=all dimensions=(0.0211 0.07 0.032)
      WrapEllipsoid AMmid_at_femshaft_l: xyz_body_rotation=(-0.111701 0 0.123918)
          translation=(0.0230125 -0.160711 -0.0205842) quadrant=all dimensions=(0.0214 0.12 0.031)
      WrapEllipsoid AMdist_at_femshaft_l: xyz_body_rotation=(-0.111701 0 0.176278)
          translation=(0.0307071 -0.260769 -0.00936092) quadrant=all dimensions=(0.0218 0.2 0.0215)
      WrapEllipsoid AMisch_at_condyles_l: xyz_body_rotation=(-0.111701 0 -0.434587)
          translation=(-0.0286471 -0.376993 0.00367576) quadrant=all dimensions=(0.05 0.24 0.0402)
      WrapEllipsoid PECT_at_femshaft_l: xyz_body_rotation=(-0.111701 0 0.211185)
          translation=(0.00762137 -0.0852965 -0.0290433) quadrant=all dimensions=(0.0166 0.05 0.0131)
      WrapCylinder KnExt_at_fem_l: xyz_body_rotation=(0.0623371 -0.0507601 -0.892533)
          translation=(0.00358828 -0.402732 -0.00209111) quadrant=all radius=0.025 length=0.1
      WrapEllipsoid Gastroc_at_Condyles_l: xyz_body_rotation=(-0.0589921 0.0937242 0.0232129)
          translation=(0.0048 -0.4075 -0.0003) quadrant=all dimensions=(0.03 0.025 0.05)
    Body patella_l: mass=0.4875 mass_center=(0.0018 0.0264 0) inertia=(1.6e-5 7.4e-5 7.4e-5 0 0 0) meshes=patella_l.vtp
    Body tibia_l: mass=3.2475 mass_center=(0 -0.171713 0) inertia=(0.029999 0.005157 0.031231 0 0 0)
        meshes=(tibia_l.vtp fibula_l.vtp)
      WrapEllipsoid GR_at_condyles_l: xyz_body_rotation=(0 0 -0.18326) translation=(0 0 0) quadrant=all
          dimensions=(0.036 0.0635 0.0533)
      WrapEllipsoid SM_at_condyles_l: xyz_body_rotation=(0 0 -0.296706) translation=(0 0 0) quadrant=all
          dimensions=(0.0352 0.0602 0.0489)
      WrapEllipsoid ST_at_condyles_l: xyz_body_rotation=(0 0 -0.270526) translation=(0 0 0) quadrant=all
          dimensions=(0.0425 0.069 0.0572)
      WrapCylinder BFLH_at_gastroc_l: translation=(-0.0316 -0.0443 0) quadrant=y radius=0.01 length=0.1
      WrapCylinder Gastroc_at_Shank_l: xyz_body_rotation=(-2.96723 -0.0289725 -1.47812)
          translation=(-0.0074 -0.074 0.0033) quadrant=-y radius=0.055 length=0.1
    Body talus_l: mass=0.045 mass_center=(0.0055 0.0023 0) inertia=(3e-6 1e-6 3e-6 0 0 0) meshes=talus_lv.vtp
    Body calcn_l: mass=1.235 mass_center=(0.101865 0.0156 0) inertia=(0.001269 0.003229 0.003744 0 0 0)
        meshes=(calcaneous_lv.vtp navicular_lv.vtp cuboid_lv.vtp first_cuneiform_lv.vtp second_cuneiform_lv.vtp third_cuneiform_lv.vtp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)
    Body toes_l: mass=0.1975 mass_center=(0.0307 -0.0026 -0.0105) inertia=(0.000202 0.000517 0.000595 0 0 0)
        meshes=(prox_phalanx1_lvs.vtp prox_phalanx2_lvs.vtp prox_phalanx3_lvs.vtp prox_phalanx4_lvs.vtp prox_phalanx5_lvs.vtp mid_phalanx2_lvs.vtp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)
    Body torso: mass=24.2175 mass_center=(0 0.256438 0) inertia=(0.440821 0.276872 0.596511 0 0 0)
        meshes=(lumbar1sm.vtp lumbar2sm.vtp lumbar3sm.vtp lumbar4sm.vtp lumbar5.vtp ribcage_s.vtp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)
    Body neckhead: mass=5.205 mass_center=(0.0288 0.161501 0) inertia=(0.030471 0.02092 0.028195 0 0 0)
        meshes=(cerv1sm.vtp cerv2sm.vtp cerv3sm.vtp cerv4sm.vtp cerv5sm.vtp cerv6sm.vtp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)
    Body humerus_r: mass=2.0325 mass_center=(0 -0.164502 0) inertia=(0.011946 0.004121 0.013409 0 0 0)
        meshes=humerus_rv.vtp
    Body ulna_r: mass=0.6075 mass_center=(0 -0.120525 0) inertia=(0.002962 0.000618 0.003213 0 0 0) meshes=ulna_rv.vtp
    Body radius_r: mass=0.6075 mass_center=(0 -0.120525 0) inertia=(0.002962 0.000618 0.003213 0 0 0)
        meshes=radius_rv.vtp
    Body hand_r: mass=0.4575 mass_center=(0 -0.068095 0) inertia=(0.000892 0.000547 0.00134 0 0 0)
        meshes=(pisiform_rvs.vtp lunate_rvs.vtp scaphoid_rvs.vtp triquetrum_rvs.vtp hamate_rvs.vtp capitate_rvs.vtp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)
    Body humerus_l: mass=2.0325 mass_center=(0 -0.164502 0) inertia=(0.011946 0.004121 0.013409 0 0 0)
        meshes=humerus_lv.vtp
    Body ulna_l: mass=0.6075 mass_center=(0 -0.120525 0) inertia=(0.002962 0.000618 0.003213 0 0 0) meshes=ulna_lv.vtp
    Body radius_l: mass=0.6075 mass_center=(0 -0.120525 0) inertia=(0.002962 0.000618 0.003213 0 0 0)
        meshes=radius_lv.vtp
    Body hand_l: mass=0.4575 mass_center=(0 -0.068095 0) inertia=(0.000892 0.000547 0.00134 0 0 0)
        meshes=(pisiform_lvs.vtp lunate_lvs.vtp scaphoid_lvs.vtp triquetrum_lvs.vtp hamate_lvs.vtp capitate_lvs.vtp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)
  JointSet:
    CustomJoint gnd_pelvis:
      connectors: parent_frame=ground child_frame=pelvis
      Coordinate pelvis_tilt: default_value=0 range=(-4.712389 4.712389) clamped=false
      Coordinate pelvis_list: default_value=0 range=(-4.712389 4.712389) clamped=false
      Coordinate pelvis_rot: default_value=0 range=(-4.712389 4.712389) clamped=false
      Coordinate pelvis_tx: default_value=0 range=(-10 10) clamped=false
      Coordinate pelvis_ty: default_value=0.969 range=(-10 10) clamped=false
      Coordinate pelvis_tz: default_value=0 range=(-10 10) clamped=false
      SpatialTransform:
        TransformAxis rotation1: coordinates=pelvis_tilt axis=(0 0 1) LinearFunction(coefficients=1 0)
        TransformAxis rotation2: coordinates=pelvis_list axis=(1 0 0) LinearFunction(coefficients=1 0)
        TransformAxis rotation3: coordinates=pelvis_rot axis=(0 1 0) LinearFunction(coefficients=1 0)
        TransformAxis translation1: coordinates=pelvis_tx axis=(1 0 0) LinearFunction(coefficients=1 0)
        TransformAxis translation2: coordinates=pelvis_ty axis=(0 1 0) LinearFunction(coefficients=1 0)
        TransformAxis translation3: coordinates=pelvis_tz axis=(0 0 1) LinearFunction(coefficients=1 0)
    CustomJoint hip_r:
      connectors: parent_frame=pelvis_offset child_frame=femur_r
      Coordinate hip_flex_r: default_value=0 range=(-1.047198 2.617994) clamped=true
      Coordinate hip_add_r: default_value=0 range=(-1.047198 1.047198) clamped=true
      Coordinate hip_rot_r: default_value=0 range=(-1.047198 1.047198) clamped=true
      PhysicalOffsetFrame pelvis_offset: translation=(-0.056276 -0.07849 0.07726)
        connectors: parent=pelvis
      SpatialTransform: axes_held_at_zero=(translation1 translation2 translation3)
        TransformAxis rotation1: coordinates=hip_flex_r axis=(0 0 1) LinearFunction(coefficients=1 0)
        TransformAxis rotation2: coordinates=hip_add_r axis=(1 0 0) LinearFunction(coefficients=1 0)
        TransformAxis rotation3: coordinates=hip_rot_r axis=(0 1 0) LinearFunction(coefficients=1 0)
    WeldJoint femur_femur:
      connectors: parent_frame=femur_r_offset child_frame=femur_distal_r
      PhysicalOffsetFrame femur_r_offset: translation=(-0.00600005 -0.404425 -0.00126524)
        connectors: parent=femur_r
    CustomJoint pf_r:
      connectors: parent_frame=femur_distal_r child_frame=patella_r
      Coordinate pf_flex_r: default_value=0 range=(-1.570796 1.570796) clamped=true
      Coordinate pf_rot_r: default_value=0 range=(-1.570796 1.570796) clamped=true
      Coordinate pf_tilt_r: default_value=0 range=(-0.8726646 0.8726646) clamped=true
      Coordinate pf_tx_r: default_value=0.053 range=(-0.2 0.2) clamped=true
      Coordinate pf_ty_r: default_value=0.005 range=(-0.2 0.2) clamped=true
      Coordinate pf_tz_r: default_value=0.004 range=(-0.2 0.2) clamped=true
      SpatialTransform:
        TransformAxis rotation1: coordinates=pf_flex_r axis=(0 0 1)
          SimmSpline: x=(-6.28319 6.28319) y=(6.28319 -6.28319)
        TransformAxis rotation2: coordinates=pf_rot_r axis=(1 0 0) LinearFunction(coefficients=1 0)
        TransformAxis rotation3: coordinates=pf_tilt_r axis=(0 1 0) LinearFunction(coefficients=1 0)
        TransformAxis translation1: coordinates=pf_tx_r axis=(1 0 0) LinearFunction(coefficients=1 0)
        TransformAxis translation2: coordinates=pf_ty_r axis=(0 1 0) LinearFunction(coefficients=1 0)
        TransformAxis translation3: coordinates=pf_tz_r axis=(0 0 1) LinearFunction(coefficients=1 0)
    CustomJoint knee_r:
      connectors: parent_frame=femur_distal_r child_frame=tibia_proximal_r
      Coordinate knee_flex_r: default_value=0 range=(-0.1745329 2.792527) clamped=true
      Coordinate knee_add_r: default_value=0 range=(-0.8726646 0.8726646) clamped=true
      Coordinate knee_rot_r: default_value=0 range=(-0.8726646 0.8726646) clamped=true
      Coordinate knee_tx_r: default_value=0 range=(-0.2 0.2) clamped=true
      Coordinate knee_ty_r: default_value=0 range=(-0.2 0.2) clamped=true
      Coordinate knee_tz_r: default_value=0 range=(-0.2 0.2) clamped=true
      SpatialTransform:
        TransformAxis rotation1: coordinates=knee_flex_r axis=(0 0 1) LinearFunction(coefficients=-1 0)
        TransformAxis rotation2: coordinates=knee_add_r axis=(1 0 0) LinearFunction(coefficients=1 0)
        TransformAxis rotation3: coordinates=knee_rot_r axis=(0 1 0) LinearFunction(coefficients=1 0)
        TransformAxis translation1: coordinates=knee_tx_r axis=(1 0 0) LinearFunction(coefficients=1 0)
        TransformAxis translation2: coordinates=knee_ty_r axis=(0 1 0) LinearFunction(coefficients=1 0)
        TransformAxis translation3: coordinates=knee_tz_r axis=(0 0 1) LinearFunction(coefficients=1 0)
    WeldJoint tibia_tibia:
      connectors: parent_frame=tibia_proximal_r_offset child_frame=tibia_r
      PhysicalOffsetFrame tibia_proximal_r_offset: translation=(0.006 0 0)
        connectors: parent=tibia_proximal_r
    CustomJoint ankle_r:
      connectors: parent_frame=tibia_r_offset child_frame=talus_r
      Coordinate ankle_flex_r: default_value=0 range=(-1.570796 1.570796) clamped=true
      PhysicalOffsetFrame tibia_r_offset: translation=(-0.01 -0.4 0)
        connectors: parent=tibia_r
      SpatialTransform: axes_held_at_zero=(rotation2 rotation3 translation1 translation2 translation3)
        TransformAxis rotation1: coordinates=ankle_flex_r axis=(-0.105014 -0.1740221 0.9791263)
            LinearFunction(coefficients=1 0)
    CustomJoint subtalar_r:
      connectors: parent_frame=talus_r_offset child_frame=calcn_r
      Coordinate subt_angle_r: default_value=0 range=(-1.047198 1.047198) clamped=true
      PhysicalOffsetFrame talus_r_offset: translation=(-0.04877 -0.04195 0.00792)
        connectors: parent=talus_r
      SpatialTransform: axes_held_at_zero=(rotation2 rotation3 translation1 translation2 translation3)
        TransformAxis rotation1: coordinates=subt_angle_r axis=(0.78718 0.604747 -0.120949)
            LinearFunction(coefficients=1 0)
    CustomJoint mtp_r:
      connectors: parent_frame=calcn_r_offset child_frame=toes_r
      Coordinate mtp_angle_r: default_value=0 range=(-1.047198 1.047198) clamped=true
      PhysicalOffsetFrame calcn_r_offset: translation=(0.1788 -0.002 0.00108)
        connectors: parent=calcn_r
      SpatialTransform: axes_held_at_zero=(rotation2 rotation3 translation1 translation2 translation3)
        TransformAxis rotation1: coordinates=mtp_angle_r axis=(0.5809542 0 -0.8139363) LinearFunction(coefficients=1 0)
    CustomJoint hip_l:
      connectors: parent_frame=pelvis_offset child_frame=femur_l
      Coordinate hip_flex_l: default_value=0 range=(-1.047198 2.617994) clamped=true
      Coordinate hip_add_l: default_value=0 range=(-1.047198 0.3490659) clamped=true
      Coordinate hip_rot_l: default_value=0 range=(-1.047198 1.047198) clamped=true
      PhysicalOffsetFrame pelvis_offset: translation=(-0.056276 -0.07849 -0.07726)
        connectors: parent=pelvis
      SpatialTransform: axes_held_at_zero=(translation1 translation2 translation3)
        TransformAxis rotation1: coordinates=hip_flex_l axis=(0 0 1) LinearFunction(coefficients=1 0)
        TransformAxis rotation2: coordinates=hip_add_l axis=(1 0 0) LinearFunction(coefficients=1 0)
        TransformAxis rotation3: coordinates=hip_rot_l axis=(0 1 0) LinearFunction(coefficients=1 0)
    CustomJoint pf_l:
      connectors: parent_frame=femur_l child_frame=patella_l
      Coordinate pf_l_r3: default_value=0.001136855 range=(-99999.9 99999.9) clamped=false
      Coordinate pf_l_tx: default_value=0.04435 range=(-99999.9 99999.9) clamped=false
      Coordinate pf_l_ty: default_value=-0.418712 range=(-99999.9 99999.9) clamped=false
      SpatialTransform: axes_held_at_zero=(rotation2 rotation3 translation3)
        TransformAxis rotation1: coordinates=pf_l_r3 axis=(0 0 1) LinearFunction(coefficients=1 0)
        TransformAxis translation1: coordinates=pf_l_tx axis=(1 0 0) LinearFunction(coefficients=1 0)
        TransformAxis translation2: coordinates=pf_l_ty axis=(0 1 0) LinearFunction(coefficients=1 0)
    CustomJoint knee_l:
      connectors: parent_frame=femur_l child_frame=tibia_l
      Coordinate knee_flex_l: default_value=0 range=(-0.1745329 2.792527) clamped=true
      SpatialTransform:
        TransformAxis rotation1: coordinates=knee_flex_l axis=(0 0 1)
          SimmSpline: x=(-6.28319 6.28319) y=(6.28319 -6.28319)
        TransformAxis rotation2: coordinates=knee_flex_l axis=(1 0 0)
          SimmSpline: x=(-0.174533 0 0.174533 0.349066 0.523599 0.698132 0.872665 1.0472 1.22173 1.39626 1.5708 1.74533 1.91986 2.0944)
              y=(0.00498946 0 -0.00605681 -0.0127056 -0.0193932 -0.025694 -0.0313393 -0.0362355 -0.0404783 -0.044365 -0.0484046 -0.0533308 -0.0601155 -0.0699935)
        TransformAxis rotation3: coordinates=knee_flex_l axis=(0 1 0)
          SimmSpline: x=(-0.174533 0 0.174533 0.349066 0.523599 0.698132 0.872665 1.0472 1.22173 1.39626 1.5708 1.74533 1.91986 2.0944)
              y=(0.0568237 0 -0.0473143 -0.0858667 -0.116487 -0.140093 -0.157672 -0.170252 -0.178879 -0.184595 -0.18842 -0.191344 -0.194325 -0.198293)
        TransformAxis translation1: coordinates=knee_flex_l axis=(1 0 0)
          SimmSpline: x=(-0.174533 0 0.174533 0.349066 0.523599 0.698132 0.872665 1.0472 1.22173 1.39626 1.5708 1.74533 1.91986 2.0944)
              y=(-0.00164957 -4.8e-7 0.00153765 0.00280273 0.00366246 0.00401894 0.00381314 0.00302974 0.00169348 -0.00013342 -0.00235575 -0.00485457 -0.00749805 -0.0101522)
        TransformAxis translation2: coordinates=knee_flex_l axis=(0 1 0)
          SimmSpline: x=(-0.174533 0 0.174533 0.349066 0.523599 0.698132 0.872665 1.0472 1.22173 1.39626 1.5708 1.74533 1.91986 2.0944)
              y=(-0.403959 -0.404425 -0.40548 -0.407056 -0.40905 -0.411333 -0.413758 -0.416171 -0.418425 -0.420384 -0.42194 -0.423017 -0.423578 -0.423625)
        TransformAxis translation3: coordinates=knee_flex_l axis=(0 0 1)
          SimmSpline: x=(-0.174533 0 0.174533 0.349066 0.523599 0.698132 0.872665 1.0472 1.22173 1.39626 1.5708 1.74533 1.91986 2.0944)
              y=(0.00082532 0.00126524 0.00170877 0.0021306 0.00251419 0.00284969 0.00313273 0.00336333 0.00354482 0.00368239 0.00378263 0.00385241 0.00389806 0.00392316)
    CustomJoint ankle_l:
      connectors: parent_frame=tibia_l_offset child_frame=talus_l
      Coordinate ankle_flex_l: default_value=0 range=(-1.570796 1.570796) clamped=true
      PhysicalOffsetFrame tibia_l_offset: translation=(-0.01 -0.4 0)
        connectors: parent=tibia_l
      SpatialTransform: axes_held_at_zero=(rotation2 rotation3 translation1 translation2 translation3)
        TransformAxis rotation1: coordinates=ankle_flex_l axis=(-0.105014 -0.1740221 -0.9791263)
          SimmSpline: x=(-6.28319 6.28319) y=(6.28319 -6.28319)
    CustomJoint subtalar_l:
      connectors: parent_frame=talus_l_offset child_frame=calcn_l
      Coordinate subt_angle_l: default_value=0 range=(-0.6981317 0.6981317) clamped=true
      PhysicalOffsetFrame talus_l_offset: translation=(-0.04877 -0.04195 -0.00792)
        connectors: parent=talus_l
      SpatialTransform: axes_held_at_zero=(rotation2 rotation3 translation1 translation2 translation3)
        TransformAxis rotation1: coordinates=subt_angle_l axis=(0.78718 0.604747 0.120949)
          SimmSpline: x=(-6.28319 6.28319) y=(6.28319 -6.28319)
    CustomJoint mtp_l:
      connectors: parent_frame=calcn_l_offset child_frame=toes_l
      Coordinate mtp_angle_l: default_value=0 range=(-1.047198 1.047198) clamped=true
      PhysicalOffsetFrame calcn_l_offset: translation=(0.1788 -0.002 -0.00108)
        connectors: parent=calcn_l
      SpatialTransform: axes_held_at_zero=(rotation2 rotation3 translation1 translation2 translation3)
        TransformAxis rotation1: coordinates=mtp_angle_l axis=(0.5809542 0 0.8139363)
          SimmSpline: x=(-6.28319 6.28319) y=(6.28319 -6.28319)
    CustomJoint pelvis_torso:
      connectors: parent_frame=pelvis_offset child_frame=torso
      Coordinate lumbar_ext: default_value=0 range=(-1.047198 1.047198) clamped=true
      Coordinate lumbar_latbend: default_value=0 range=(-1.047198 1.047198) clamped=true
      Coordinate lumbar_rot: default_value=0 range=(-1.047198 1.047198) clamped=true
      PhysicalOffsetFrame pelvis_offset: translation=(-0.1 0.055 0)
        connectors: parent=pelvis
      SpatialTransform: axes_held_at_zero=(translation1 translation2 translation3)
        TransformAxis rotation1: coordinates=lumbar_ext axis=(0 0 1) LinearFunction(coefficients=1 0)
        TransformAxis rotation2: coordinates=lumbar_latbend axis=(1 0 0) LinearFunction(coefficients=1 0)
        TransformAxis rotation3: coordinates=lumbar_rot axis=(0 1 0) LinearFunction(coefficients=1 0)
    CustomJoint torso_neckhead:
      connectors: parent_frame=torso_offset child_frame=neckhead
      Coordinate neck_ext: default_value=0 range=(-0.8726646 1.256637) clamped=true
      Coordinate neck_latbend: default_value=0 range=(-0.6981317 0.6981317) clamped=true
      Coordinate neck_rot: default_value=0 range=(-1.151917 1.151917) clamped=true
      PhysicalOffsetFrame torso_offset: translation=(-0.0253 0.44895 0)
        connectors: parent=torso
      SpatialTransform: axes_held_at_zero=(translation1 translation2 translation3)
        TransformAxis rotation1: coordinates=neck_ext axis=(0 0 1) LinearFunction(coefficients=1 0)
        TransformAxis rotation2: coordinates=neck_latbend axis=(1 0 0) LinearFunction(coefficients=1 0)
        TransformAxis rotation3: coordinates=neck_rot axis=(0 1 0) LinearFunction(coefficients=1 0)
    CustomJoint acromial_r:
      connectors: parent_frame=torso_offset child_frame=humerus_r
      Coordinate arm_add_r: default_value=0 range=(-2.094395 1.570796) clamped=true
      Coordinate arm_flex_r: default_value=0 range=(-1.570796 1.570796) clamped=true
      Coordinate arm_rot_r: default_value=0 range=(-1.570796 1.570796) clamped=true
      PhysicalOffsetFrame torso_offset: translation=(-0.0281 0.41645 0.199)
        connectors: parent=torso
      SpatialTransform: axes_held_at_zero=(translation1 translation2 translation3)
        TransformAxis rotation1: coordinates=arm_add_r axis=(1 0 0) LinearFunction(coefficients=1 0)
        TransformAxis rotation2: coordinates=arm_flex_r axis=(0 0 1) LinearFunction(coefficients=1 0)
        TransformAxis rotation3: coordinates=arm_rot_r axis=(0 1 0) LinearFunction(coefficients=1 0)
    CustomJoint elbow_r:
      connectors: parent_frame=humerus_r_offset child_frame=ulna_r
      Coordinate elbow_flex_r: default_value=0 range=(0 2.792527) clamped=true
      PhysicalOffsetFrame humerus_r_offset: translation=(0.013144 -0.286273 -0.009595)
        connectors: parent=humerus_r
      SpatialTransform: axes_held_at_zero=(rotation2 rotation3 translation1 translation2 translation3)
        TransformAxis rotation1: coordinates=elbow_flex_r axis=(0.226047 0.022269 0.9738618)
            LinearFunction(coefficients=1 0)
    CustomJoint radioulnar_r:
      connectors: parent_frame=ulna_r_offset child_frame=radius_r
      Coordinate pro_sup_r: default_value=1.047198 range=(0 1.570796) clamped=true
      PhysicalOffsetFrame ulna_r_offset: translation=(-0.006727 -0.013007 0.026083)
        connectors: parent=ulna_r
      SpatialTransform: axes_held_at_zero=(rotation1 rotation3 translation1 translation2 translation3)
        TransformAxis rotation2: coordinates=pro_sup_r axis=(0.05639803 0.9984065 0.001952001)
            LinearFunction(coefficients=1 0)
    CustomJoint radius_hand_r:
      connectors: parent_frame=radius_r_offset child_frame=hand_r
      Coordinate wrist_flex_r: default_value=0 range=(-1.22173 1.22173) clamped=true
      PhysicalOffsetFrame radius_r_offset: translation=(-0.008797 -0.235841 0.01361)
        connectors: parent=radius_r
      SpatialTransform: axes_held_at_zero=(rotation2 rotation3 translation1 translation2 translation3)
        TransformAxis rotation1: coordinates=wrist_flex_r axis=(0 0 1) LinearFunction(coefficients=1 0)
    CustomJoint acromial_l:
      connectors: parent_frame=torso_offset child_frame=humerus_l
      Coordinate arm_add_l: default_value=0 range=(-2.094395 1.570796) clamped=true
      Coordinate arm_flex_l: default_value=0 range=(-1.570796 1.570796) clamped=true
      Coordinate arm_rot_l: default_value=0 range=(-1.570796 1.570796) clamped=true
      PhysicalOffsetFrame torso_offset: translation=(-0.0281 0.41645 -0.199)
        connectors: parent=torso
      SpatialTransform: axes_held_at_zero=(translation1 translation2 translation3)
        TransformAxis rotation1: coordinates=arm_add_l axis=(-1 0 0) LinearFunction(coefficients=1 0)
        TransformAxis rotation2: coordinates=arm_flex_l axis=(0 0 1) LinearFunction(coefficients=1 0)
        TransformAxis rotation3: coordinates=arm_rot_l axis=(0 -1 0) LinearFunction(coefficients=1 0)
    CustomJoint elbow_l:
      connectors: parent_frame=humerus_l_offset child_frame=ulna_l
      Coordinate elbow_flex_l: default_value=0 range=(0 2.792527) clamped=true
      PhysicalOffsetFrame humerus_l_offset: translation=(0.013144 -0.286273 0.009595)
        connectors: parent=humerus_l
      SpatialTransform: axes_held_at_zero=(rotation2 rotation3 translation1 translation2 translation3)
        TransformAxis rotation1: coordinates=elbow_flex_l axis=(-0.226047 -0.022269 0.9738618)
            LinearFunction(coefficients=1 0)
    CustomJoint radioulnar_l:
      connectors: parent_frame=ulna_l_offset child_frame=radius_l
      Coordinate pro_sup_l: default_value=1.047198 range=(0 1.570796) clamped=true
      PhysicalOffsetFrame ulna_l_offset: translation=(-0.006727 -0.013007 -0.026083)
        connectors: parent=ulna_l
      SpatialTransform: axes_held_at_zero=(rotation1 rotation3 translation1 translation2 translation3)
        TransformAxis rotation2: coordinates=pro_sup_l axis=(-0.05639803 -0.9984065 0.001952001)
            LinearFunction(coefficients=1 0)
    CustomJoint radius_hand_l:
      connectors: parent_frame=radius_l_offset child_frame=hand_l
      Coordinate wrist_flex_l: default_value=0 range=(-1.22173 1.22173) clamped=true
      PhysicalOffsetFrame radius_l_offset: translation=(-0.008797 -0.235841 -0.01361)
        connectors: parent=radius_l
      SpatialTransform: axes_held_at_zero=(rotation2 rotation3 translation1 translation2 translation3)
        TransformAxis rotation1: coordinates=wrist_flex_l axis=(0 0 1) LinearFunction(coefficients=1 0)
  ForceSet:
    Thelen2003Muscle addbrev_r: max_isometric_force=303.7 optimal_fiber_length=0.1031 tendon_slack_length=0.036
        pennation_angle_at_optimal=0.1064651
      PathPoint P1: (-0.0191 -0.094 0.0154)
        connectors: parent_frame=pelvis
      PathPoint P2: (-0.002 -0.118 0.0249)
        connectors: parent_frame=femur_r
    Thelen2003Muscle addlong_r: max_isometric_force=399.5 optimal_fiber_length=0.1082 tendon_slack_length=0.13
        pennation_angle_at_optimal=0.1235693
      PathPoint P1: (-0.00758 -0.0889 0.01888)
        connectors: parent_frame=pelvis
      PathPoint P2: (0.01126 -0.23937 0.01583)
        connectors: parent_frame=femur_r
    Thelen2003Muscle addmagProx_r: max_isometric_force=324.2 optimal_fiber_length=0.1056 tendon_slack_length=0.043
        pennation_angle_at_optimal=0.3872886
      PathPoint P1: (-0.03098 -0.10755 0.01365)
        connectors: parent_frame=pelvis
      PathPoint P2: (-0.01527 -0.07886 0.03202)
        connectors: parent_frame=femur_r
    Thelen2003Muscle addmagMid_r: max_isometric_force=324.2 optimal_fiber_length=0.1377 tendon_slack_length=0.048
        pennation_angle_at_optimal=0.2567379
      PathPoint P1: (-0.05266 -0.12075 0.02854)
        connectors: parent_frame=pelvis
      PathPoint P2: (0.00242 -0.1624 0.02922)
        connectors: parent_frame=femur_r
    Thelen2003Muscle addmagDist_r: max_isometric_force=324.2 optimal_fiber_length=0.1772 tendon_slack_length=0.09
        pennation_angle_at_optimal=0.2412045
      PathPoint P1: (-0.07404 -0.12767 0.03982)
        connectors: parent_frame=pelvis
      PathPoint P2: (0.01125 -0.2625 0.0193)
        connectors: parent_frame=femur_r
    Thelen2003Muscle addmagIsch_r: max_isometric_force=324.2 optimal_fiber_length=0.1562 tendon_slack_length=0.221
        pennation_angle_at_optimal=0.2073451
      PathPoint P1: (-0.08962 -0.12976 0.04171)
        connectors: parent_frame=pelvis
      PathPoint P2: (0.00481 -0.38797 -0.03273)
        connectors: parent_frame=femur_r
    Thelen2003Muscle bflh_r: max_isometric_force=705.2 optimal_fiber_length=0.0976 tendon_slack_length=0.322
        pennation_angle_at_optimal=0.2021091
      PathPoint P1: (-0.104 -0.1191 0.0586)
        connectors: parent_frame=pelvis
      PathPoint P2: (-0.0317 -0.0425 0.0333)
        connectors: parent_frame=tibia_r
    Thelen2003Muscle bfsh_r: max_isometric_force=631.6 optimal_fiber_length=0.1103 tendon_slack_length=0.104
        pennation_angle_at_optimal=0.2151991
      PathPoint P1: (0.005 -0.2111 0.0234)
        connectors: parent_frame=femur_r
      PathPoint P2: (-0.0301 -0.0419 0.0318)
        connectors: parent_frame=tibia_r
    Thelen2003Muscle edl_r: max_isometric_force=345.4 optimal_fiber_length=0.0693 tendon_slack_length=0.3673
        pennation_angle_at_optimal=0.1890192
      PathPoint P1: (-0.016 -0.1157 0.0205)
        connectors: parent_frame=tibia_r
      PathPoint P2: (0.0164 -0.376 0.0112)
        connectors: parent_frame=tibia_r
      PathPoint P3: (0.0919 0.036 0.0008)
        connectors: parent_frame=calcn_r
      PathPoint P4: (0.1616 0.0055 0.013)
        connectors: parent_frame=calcn_r
      PathPoint P5: (0.0003 0.0047 0.0153)
        connectors: parent_frame=toes_r
      PathPoint P6: (0.0443 -0.0004 0.025)
        connectors: parent_frame=toes_r
    Thelen2003Muscle ehl_r: max_isometric_force=165 optimal_fiber_length=0.0748 tendon_slack_length=0.3315
        pennation_angle_at_optimal=0.1647591
      PathPoint P1: (-0.014 -0.155 0.0189)
        connectors: parent_frame=tibia_r
      PathPoint P2: (0.007 -0.2909 0.0164)
        connectors: parent_frame=tibia_r
      PathPoint P3: (0.02 -0.3693 -0.0028)
        connectors: parent_frame=tibia_r
      PathPoint P4: (0.097 0.0389 -0.0211)
        connectors: parent_frame=calcn_r
      PathPoint P5: (0.1293 0.0309 -0.0257)
        connectors: parent_frame=calcn_r
      PathPoint P6: (0.1734 0.0139 -0.028)
        connectors: parent_frame=calcn_r
      PathPoint P7: (0.0298 0.0041 -0.0245)
        connectors: parent_frame=toes_r
      PathPoint P8: (0.0563 0.0034 -0.0186)
        connectors: parent_frame=toes_r
    Thelen2003Muscle fdl_r: max_isometric_force=274.4 optimal_fiber_length=0.0446 tendon_slack_length=0.3777
        pennation_angle_at_optimal=0.2380629
      PathPoint P1: (-0.0023 -0.1832 -0.0018)
        connectors: parent_frame=tibia_r
      PathPoint P2: (-0.0176 -0.3645 -0.0124)
        connectors: parent_frame=tibia_r
      PathPoint P3: (0.0436 0.0315 -0.028)
        connectors: parent_frame=calcn_r
      PathPoint P4: (0.0708 0.0176 -0.0263)
        connectors: parent_frame=calcn_r
      PathPoint P5: (0.1658 -0.0081 0.0116)
        connectors: parent_frame=calcn_r
      PathPoint P6: (-0.0019 -0.0078 0.0147)
        connectors: parent_frame=toes_r
      PathPoint P7: (0.0285 -0.0071 0.0215)
        connectors: parent_frame=toes_r
      PathPoint P8: (0.0441 -0.006 0.0242)
        connectors: parent_frame=toes_r
    Thelen2003Muscle fhl_r: max_isometric_force=436.8 optimal_fiber_length=0.0527 tendon_slack_length=0.356
        pennation_angle_at_optimal=0.2947861
      PathPoint P1: (-0.031 -0.2163 0.02)
        connectors: parent_frame=tibia_r
      PathPoint P2: (-0.0242 -0.3671 -0.0076)
        connectors: parent_frame=tibia_r
      PathPoint P3: (0.0374 0.0276 -0.0241)
        connectors: parent_frame=calcn_r
      PathPoint P4: (0.1038 0.0068 -0.0256)
        connectors: parent_frame=calcn_r
      PathPoint P5: (0.1726 -0.0053 -0.0269)
        connectors: parent_frame=calcn_r
      PathPoint P6: (0.0155 -0.0064 -0.0265)
        connectors: parent_frame=toes_r
      PathPoint P7: (0.0562 -0.0102 -0.0181)
        connectors: parent_frame=toes_r
    Thelen2003Muscle gaslat_r: max_isometric_force=606.4 optimal_fiber_length=0.0588 tendon_slack_length=0.369
        pennation_angle_at_optimal=0.2101376 FmaxMuscleStrain=2
      PathPoint P1: (-0.003 -0.3814 0.0277)
        connectors: parent_frame=femur_r
      PathPoint P2: (0.0044 0.031 -0.0053)
        connectors: parent_frame=calcn_r
      PathWrap pathwrap_0: wrap_object=Gastroc_at_Condyles_r method=hybrid
    Thelen2003Muscle gasmed_r: max_isometric_force=1308 optimal_fiber_length=0.051 tendon_slack_length=0.389
        pennation_angle_at_optimal=0.1724385 FmaxMuscleStrain=2
      PathPoint P1: (0.008 -0.3788 -0.0208)
        connectors: parent_frame=femur_r
      PathPoint P2: (0.0044 0.031 -0.0053)
        connectors: parent_frame=calcn_r
      PathWrap pathwrap_0: wrap_object=Gastroc_at_Condyles_r method=hybrid
    Thelen2003Muscle gem_r: max_isometric_force=218 optimal_fiber_length=0.024 tendon_slack_length=0.039
        pennation_angle_at_optimal=0
      PathPoint P1: (-0.10357 -0.0764 0.06707)
        connectors: parent_frame=pelvis
      PathPoint P2: (-0.0142 -0.0033 0.0443)
        connectors: parent_frame=femur_r
    Thelen2003Muscle glmax1_r: max_isometric_force=1092.2 optimal_fiber_length=0.1473 tendon_slack_length=0.05
        pennation_angle_at_optimal=0.3829252
      PathPoint P1: (-0.1231 0.0345 0.0563)
        connectors: parent_frame=pelvis
      PathPoint P2: (-0.1257 -0.0242 0.0779)
        connectors: parent_frame=pelvis
      PathPoint P3: (-0.0444 -0.0326 0.0302)
        connectors: parent_frame=femur_r
      PathPoint P4: (-0.0277 -0.0566 0.047)
        connectors: parent_frame=femur_r
      PathWrap pathwrap_0: wrap_object=Gmax_at_pelvis_r method=hybrid
    Thelen2003Muscle glmax2_r: max_isometric_force=1561 optimal_fiber_length=0.1569 tendon_slack_length=0.0733
        pennation_angle_at_optimal=0.3829252
      PathPoint P1: (-0.1317 0.0087 0.0462)
        connectors: parent_frame=pelvis
      PathPoint P2: (-0.1344 -0.0609 0.0813)
        connectors: parent_frame=pelvis
      PathPoint P3: (-0.045 -0.0584 0.0252)
        connectors: parent_frame=femur_r
      PathPoint P4: (-0.0156 -0.1016 0.0419)
        connectors: parent_frame=femur_r
      PathWrap pathwrap_0: wrap_object=Gmax_at_pelvis_r method=hybrid
    Thelen2003Muscle glmax3_r: max_isometric_force=1058.2 optimal_fiber_length=0.1665 tendon_slack_length=0.0702
        pennation_angle_at_optimal=0.3829252
      PathPoint P1: (-0.13 -0.0525 0.009)
        connectors: parent_frame=pelvis
      PathPoint P2: (-0.1273 -0.1263 0.0435)
        connectors: parent_frame=pelvis
      PathPoint P3: (-0.0281 -0.1125 0.0094)
        connectors: parent_frame=femur_r
      PathPoint P4: (-0.006 -0.1419 0.0411)
        connectors: parent_frame=femur_r
      PathWrap pathwrap_0: wrap_object=Gmax_at_pelvis_r method=hybrid
    Thelen2003Muscle glmed1_r: max_isometric_force=1762.2 optimal_fiber_length=0.0733 tendon_slack_length=0.0565
        pennation_angle_at_optimal=0.3572689
      PathPoint P1: (-0.0445 0.0245 0.1172)
        connectors: parent_frame=pelvis
      PathPoint P2: (-0.0218 -0.0117 0.0555)
        connectors: parent_frame=femur_r
    Thelen2003Muscle glmed2_r: max_isometric_force=1033 optimal_fiber_length=0.0733 tendon_slack_length=0.066
        pennation_angle_at_optimal=0.3572689
      PathPoint P1: (-0.085 0.0316 0.0675)
        connectors: parent_frame=pelvis
      PathPoint P2: (-0.0258 -0.0058 0.0527)
        connectors: parent_frame=femur_r
    Thelen2003Muscle glmed3_r: max_isometric_force=1404 optimal_fiber_length=0.0733 tendon_slack_length=0.046
        pennation_angle_at_optimal=0.3572689
      PathPoint P1: (-0.1152 -0.0073 0.0526)
        connectors: parent_frame=pelvis
      PathPoint P2: (-0.0309 -0.0047 0.0518)
        connectors: parent_frame=femur_r
    Thelen2003Muscle glmin1_r: max_isometric_force=720 optimal_fiber_length=0.068 tendon_slack_length=0.016
        pennation_angle_at_optimal=0.1745329
      PathPoint P1: (-0.0464 -0.0149 0.1042)
        connectors: parent_frame=pelvis
      PathPoint P2: (-0.0072 -0.0104 0.056)
        connectors: parent_frame=femur_r
    Thelen2003Muscle glmin2_r: max_isometric_force=760 optimal_fiber_length=0.056 tendon_slack_length=0.026
        pennation_angle_at_optimal=0
      PathPoint P1: (-0.0616 -0.0142 0.0971)
        connectors: parent_frame=pelvis
      PathPoint P2: (-0.0096 -0.0104 0.056)
        connectors: parent_frame=femur_r
    Thelen2003Muscle glmin3_r: max_isometric_force=860 optimal_fiber_length=0.038 tendon_slack_length=0.051
        pennation_angle_at_optimal=0.01745329
      PathPoint P1: (-0.0789 -0.0155 0.0798)
        connectors: parent_frame=pelvis
      PathPoint P2: (-0.0135 -0.0083 0.055)
        connectors: parent_frame=femur_r
    Thelen2003Muscle grac_r: max_isometric_force=137.3 optimal_fiber_length=0.2278 tendon_slack_length=0.169
        pennation_angle_at_optimal=0.1424189
      PathPoint P1: (-0.04736 -0.12932 0.02456)
        connectors: parent_frame=pelvis
      PathPoint P2: (-0.01842 -0.04755 -0.02961)
        connectors: parent_frame=tibia_r
      PathPoint P3: (0.00178 -0.06962 -0.01573)
        connectors: parent_frame=tibia_r
      PathWrap pathwrap_0: wrap_object=GR_at_condyles_r method=midpoint
    Thelen2003Muscle iliacus_r: max_isometric_force=2487.6 optimal_fiber_length=0.1066 tendon_slack_length=0.094
        pennation_angle_at_optimal=0.2494076
      PathPoint P1: (-0.0605 0.0309 0.0843)
        connectors: parent_frame=pelvis
      PathPoint P2: (-0.0135 -0.0557 0.0756)
        connectors: parent_frame=pelvis
      PathPoint P3: (-0.0023 -0.0565 0.0139)
        connectors: parent_frame=femur_r
      PathPoint P4: (-0.0122 -0.0636 0.0196)
        connectors: parent_frame=femur_r
      PathWrap pathwrap_0: wrap_object=IL_at_brim_r method=hybrid
    Thelen2003Muscle pect_r: max_isometric_force=177 optimal_fiber_length=0.1 tendon_slack_length=0.033
        pennation_angle_at_optimal=0
      PathPoint P1: (-0.0232 -0.08325 0.04529)
        connectors: parent_frame=pelvis
      PathPoint P2: (-0.00797 -0.08518 0.02403)
        connectors: parent_frame=femur_r
      PathWrap pathwrap_0: wrap_object=PECT_at_femshaft_r method=hybrid
    Thelen2003Muscle perbrev_r: max_isometric_force=305.9 optimal_fiber_length=0.0454 tendon_slack_length=0.1481
        pennation_angle_at_optimal=0.2000147
      PathPoint P1: (-0.0243 -0.2532 0.0251)
        connectors: parent_frame=tibia_r
      PathPoint P2: (-0.0339 -0.3893 0.0249)
        connectors: parent_frame=tibia_r
      PathPoint P3: (-0.0285 -0.4004 0.0255)
        connectors: parent_frame=tibia_r
      PathPoint P4: (0.0471 0.027 0.0233)
        connectors: parent_frame=calcn_r
      PathPoint P5: (0.0677 0.0219 0.0343)
        connectors: parent_frame=calcn_r
    Thelen2003Muscle perlong_r: max_isometric_force=653.3 optimal_fiber_length=0.0508 tendon_slack_length=0.333
        pennation_angle_at_optimal=0.2457424
      PathPoint P1: (-0.02 -0.1373 0.0282)
        connectors: parent_frame=tibia_r
      PathPoint P2: (-0.0317 -0.39 0.0237)
        connectors: parent_frame=tibia_r
      PathPoint P3: (-0.0272 -0.4014 0.024)
        connectors: parent_frame=tibia_r
      PathPoint P4: (0.0438 0.023 0.0221)
        connectors: parent_frame=calcn_r
      PathPoint P5: (0.0681 0.0106 0.0284)
        connectors: parent_frame=calcn_r
      PathPoint P6: (0.0852 0.0069 0.0118)
        connectors: parent_frame=calcn_r
      PathPoint P7: (0.1203 0.0085 -0.0184)
        connectors: parent_frame=calcn_r
    Thelen2003Muscle pertert_r: max_isometric_force=90 optimal_fiber_length=0.079 tendon_slack_length=0.1
        pennation_angle_at_optimal=0.2268928
      PathPoint P1: (-0.0149 -0.2485 0.0222)
        connectors: parent_frame=tibia_r
      PathPoint P2: (0.0108 -0.382 0.0225)
        connectors: parent_frame=tibia_r
      PathPoint P3: (0.0857 0.0228 0.0299)
        connectors: parent_frame=calcn_r
    Thelen2003Muscle piri_r: max_isometric_force=296 optimal_fiber_length=0.026 tendon_slack_length=0.115
        pennation_angle_at_optimal=0.1745329
      PathPoint P1: (-0.10181 -0.00653 0.01351)
        connectors: parent_frame=pelvis
      PathPoint P2: (-0.10202 -0.03066 0.06092)
        connectors: parent_frame=pelvis
      PathPoint P3: (-0.0148 -0.0036 0.0437)
        connectors: parent_frame=femur_r
    Thelen2003Muscle psoas_r: max_isometric_force=1916 optimal_fiber_length=0.1169 tendon_slack_length=0.097
        pennation_angle_at_optimal=0.1860521
      PathPoint P1: (-0.0606 0.0619 0.039)
        connectors: parent_frame=pelvis
      PathPoint P2: (-0.0205 -0.0654 0.0656)
        connectors: parent_frame=pelvis
      PathPoint P3: (-0.0132 -0.0467 0.0046)
        connectors: parent_frame=femur_r
      PathPoint P4: (-0.0235 -0.0524 0.0088)
        connectors: parent_frame=femur_r
      PathWrap pathwrap_0: wrap_object=PS_at_brim_r method=hybrid
    Thelen2003Muscle quadfem_r: max_isometric_force=508 optimal_fiber_length=0.054 tendon_slack_length=0.024
        pennation_angle_at_optimal=0
      PathPoint P1: (-0.11192 -0.11473 0.05166)
        connectors: parent_frame=pelvis
      PathPoint P2: (-0.03575 -0.03552 0.03612)
        connectors: parent_frame=femur_r
    Thelen2003Muscle recfem_r: max_isometric_force=848.8 optimal_fiber_length=0.0759 tendon_slack_length=0.3642
        pennation_angle_at_optimal=0.2431244 FmaxMuscleStrain=2
      PathPoint P1: (-0.024 -0.0388 0.0933)
        connectors: parent_frame=pelvis
      PathPoint P2: (-0.000102437 0.0149698 0.0011381)
        connectors: parent_frame=patella_r
      PathPoint P3: (0.00351873 0.0125708 0.00078874)
        connectors: parent_frame=patella_r
      PathWrap pathwrap_0: wrap_object=KnExt_at_fem_r
    Thelen2003Muscle sart_r: max_isometric_force=113.5 optimal_fiber_length=0.403 tendon_slack_length=0.11
        pennation_angle_at_optimal=0.02321288
      PathPoint P1: (-0.0195 -0.0156 0.1056)
        connectors: parent_frame=pelvis
      PathPoint P2: (-0.003 -0.3568 -0.0421)
        connectors: parent_frame=femur_r
      PathPoint P3: (-0.0251 -0.0401 -0.0365)
        connectors: parent_frame=tibia_r
      PathPoint P4: (-0.0159 -0.0599 -0.0264)
        connectors: parent_frame=tibia_r
      PathPoint P5: (0.0136 -0.081 -0.0026)
        connectors: parent_frame=tibia_r
    Thelen2003Muscle semimem_r: max_isometric_force=1162.7 optimal_fiber_length=0.069 tendon_slack_length=0.378
        pennation_angle_at_optimal=0.2633702
      PathPoint P1: (-0.0987 -0.114 0.0614)
        connectors: parent_frame=pelvis
      PathPoint P2: (-0.029 -0.0417 -0.0196)
        connectors: parent_frame=tibia_r
    Thelen2003Muscle semiten_r: max_isometric_force=301.9 optimal_fiber_length=0.193 tendon_slack_length=0.245
        pennation_angle_at_optimal=0.2244493
      PathPoint P1: (-0.1038 -0.1253 0.0515)
        connectors: parent_frame=pelvis
      PathPoint P2: (-0.0312 -0.0508 -0.0229)
        connectors: parent_frame=tibia_r
      PathPoint P3: (0.0019 -0.0773 -0.0117)
        connectors: parent_frame=tibia_r
    Thelen2003Muscle soleus_r: max_isometric_force=3585.9 optimal_fiber_length=0.044 tendon_slack_length=0.2815
        pennation_angle_at_optimal=0.4930555 FmaxMuscleStrain=2
      PathPoint P1: (-0.0076 -0.0916 0.0098)
        connectors: parent_frame=tibia_r
      PathPoint P2: (0.0044 0.031 -0.0053)
        connectors: parent_frame=calcn_r
    Thelen2003Muscle tfl_r: max_isometric_force=155 optimal_fiber_length=0.095 tendon_slack_length=0.45
        pennation_angle_at_optimal=0.05235988
      PathPoint P1: (-0.0311 0.0214 0.1241)
        connectors: parent_frame=pelvis
      PathPoint P2: (0.0294 -0.0995 0.0597)
        connectors: parent_frame=femur_r
      PathPoint P3: (0.0108 -0.041 0.0346)
        connectors: parent_frame=tibia_r
    Thelen2003Muscle tibant_r: max_isometric_force=673.7 optimal_fiber_length=0.0683 tendon_slack_length=0.241
        pennation_angle_at_optimal=0.1668535
      PathPoint P1: (0.0154 -0.1312 0.0162)
        connectors: parent_frame=tibia_r
      PathPoint P2: (0.0251 -0.1906 0.0128)
        connectors: parent_frame=tibia_r
      PathPoint P3: (0.0233 -0.3659 -0.0132)
        connectors: parent_frame=tibia_r
      PathPoint P4: (0.1166 0.0178 -0.0305)
        connectors: parent_frame=calcn_r
    Thelen2003Muscle tibpost_r: max_isometric_force=905.6 optimal_fiber_length=0.0378 tendon_slack_length=0.2818
        pennation_angle_at_optimal=0.2392846
      PathPoint P1: (-0.0041 -0.1304 0.0103)
        connectors: parent_frame=tibia_r
      PathPoint P2: (-0.0164 -0.3655 -0.0175)
        connectors: parent_frame=tibia_r
      PathPoint P3: (0.0417 0.0334 -0.0286)
        connectors: parent_frame=calcn_r
      PathPoint P4: (0.0772 0.0159 -0.0281)
        connectors: parent_frame=calcn_r
    Thelen2003Muscle vasint_r: max_isometric_force=1024.2 optimal_fiber_length=0.0993 tendon_slack_length=0.1216
        pennation_angle_at_optimal=0.07923795 FmaxMuscleStrain=2
      PathPoint P1: (0.029 -0.1924 0.031)
        connectors: parent_frame=femur_r
      PathPoint P2: (0.0335 -0.2084 0.0285)
        connectors: parent_frame=femur_r
      PathPoint P3: (-0.00380437 0.0180608 -0.00035737)
        connectors: parent_frame=patella_r
      PathWrap pathwrap_0: wrap_object=KnExt_vasint_at_fem_r
    Thelen2003Muscle vaslat_r: max_isometric_force=2255.4 optimal_fiber_length=0.0994 tendon_slack_length=0.1423
        pennation_angle_at_optimal=0.3207915 FmaxMuscleStrain=2
      PathPoint P1: (0.0048 -0.1854 0.0349)
        connectors: parent_frame=femur_r
      PathPoint P2: (0.0269 -0.2591 0.0409)
        connectors: parent_frame=femur_r
      PathPoint P3: (0.00165463 0.0150908 0.01185)
        connectors: parent_frame=patella_r
      PathWrap pathwrap_0: wrap_object=KnExt_at_fem_r
    Thelen2003Muscle vasmed_r: max_isometric_force=1443.7 optimal_fiber_length=0.0968 tendon_slack_length=0.1266
        pennation_angle_at_optimal=0.516792 FmaxMuscleStrain=2
      PathPoint P1: (0.014 -0.2099 0.0188)
        connectors: parent_frame=femur_r
      PathPoint P2: (0.0356 -0.2769 0.0009)
        connectors: parent_frame=femur_r
      PathPoint P3: (-0.000394407 0.0156828 -0.0093351)
        connectors: parent_frame=patella_r
      PathWrap pathwrap_0: wrap_object=KnExt_at_fem_r
    WISCO_Ligament [values shared by the 76 below unless stated]: ligament_transition_strain=0.03
    WISCO_Ligament MCLd1: linear_stiffness=500 reference_strain=0.04 reference_length=0.032
      PathPoint P1: (-0.0017455 -0.00045737 -0.037269)
        connectors: parent_frame=femur_distal_r
      PathPoint P2: (-0.00021515 -0.031853 -0.031379)
        connectors: parent_frame=tibia_proximal_r
      PathWrap: wrap_object=Med_Lig_r method=hybrid
    WISCO_Ligament MCLd2: linear_stiffness=500 reference_strain=-0.04 reference_length=0.0314
      PathPoint P1: (0.0028899 -0.0006742 -0.038035)
        connectors: parent_frame=femur_distal_r
      PathPoint P2: (0.0049463 -0.031262 -0.031379)
        connectors: parent_frame=tibia_proximal_r
      PathWrap: wrap_object=Med_Lig_r method=hybrid
    WISCO_Ligament MCLd3: linear_stiffness=500 reference_strain=0 reference_length=0.0371
      PathPoint P1: (0.0038775 0.0036824 -0.039033)
        connectors: parent_frame=femur_distal_r
      PathPoint P2: (0.0054198 -0.032627 -0.031467)
        connectors: parent_frame=tibia_proximal_r
      PathWrap: wrap_object=Med_Lig_r method=hybrid
    WISCO_Ligament MCLd4: linear_stiffness=500 reference_strain=0.04 reference_length=0.0346
      PathPoint P1: (0.00096177 0.0014429 -0.038236)
        connectors: parent_frame=femur_distal_r
      PathPoint P2: (0.0026082 -0.032414 -0.031427)
        connectors: parent_frame=tibia_proximal_r
      PathWrap: wrap_object=Med_Lig_r method=hybrid
    WISCO_Ligament MCLd5: linear_stiffness=500 reference_strain=0.04 reference_length=0.0388
      PathPoint P1: (-0.0010825 0.0046882 -0.038669)
        connectors: parent_frame=femur_distal_r
      PathPoint P2: (-9.2907e-5 -0.033387 -0.031424)
        connectors: parent_frame=tibia_proximal_r
      PathWrap: wrap_object=Med_Lig_r method=hybrid
    WISCO_Ligament MCLs1: linear_stiffness=500 reference_strain=0.04 reference_length=0.0752
      PathPoint P1: (0.0053709 0.0083394 -0.04065)
        connectors: parent_frame=femur_distal_r
      PathPoint P2: (0.014323 -0.061131 -0.015466)
        connectors: parent_frame=tibia_proximal_r
      PathWrap: wrap_object=Med_Lig_r method=hybrid
    WISCO_Ligament MCLs2: linear_stiffness=500 reference_strain=0.04 reference_length=0.0934
      PathPoint P1: (0.0056326 0.015275 -0.040595)
        connectors: parent_frame=femur_distal_r
      PathPoint P2: (0.019234 -0.071438 -0.010942)
        connectors: parent_frame=tibia_proximal_r
      PathWrap: wrap_object=Med_Lig_r method=hybrid
    WISCO_Ligament MCLs3: linear_stiffness=500 reference_strain=0.05 reference_length=0.0749
      PathPoint P1: (-0.00040512 0.016541 -0.038878)
        connectors: parent_frame=femur_distal_r
      PathPoint P2: (0.0011834 -0.05547 -0.021542)
        connectors: parent_frame=tibia_proximal_r
      PathWrap: wrap_object=Med_Lig_r method=hybrid
    WISCO_Ligament MCLs4: linear_stiffness=500 reference_strain=0.05 reference_length=0.0864
      PathPoint P1: (-0.0011507 0.0080931 -0.039482)
        connectors: parent_frame=femur_distal_r
      PathPoint P2: (0.0065168 -0.074829 -0.017341)
        connectors: parent_frame=tibia_proximal_r
      PathWrap: wrap_object=Med_Lig_r method=hybrid
    WISCO_Ligament MCLs5: linear_stiffness=500 reference_strain=0.05 reference_length=0.082
      PathPoint P1: (0.0025007 0.011534 -0.040624)
        connectors: parent_frame=femur_distal_r
      PathPoint P2: (0.011919 -0.065762 -0.016444)
        connectors: parent_frame=tibia_proximal_r
      PathWrap: wrap_object=Med_Lig_r method=hybrid
    WISCO_Ligament MCLs6: linear_stiffness=500 reference_strain=0.05 reference_length=0.0778
      PathPoint P1: (0.00092052 0.013423 -0.040266)
        connectors: parent_frame=femur_distal_r
      PathPoint P2: (0.0071679 -0.06075 -0.019481)
        connectors: parent_frame=tibia_proximal_r
      PathWrap: wrap_object=Med_Lig_r method=hybrid
    WISCO_Ligament ACLpl1: linear_stiffness=820 reference_strain=0.03 reference_length=0.0259
      PathPoint P1: (-0.0038361 -3.0877e-5 0.0070808)
        connectors: parent_frame=femur_distal_r
      PathPoint P2: (0.010136 -0.020482 -0.00036186)
        connectors: parent_frame=tibia_proximal_r
    WISCO_Ligament ACLpl2: linear_stiffness=820 reference_strain=0.01 reference_length=0.0232
      PathPoint P1: (-0.0038641 -0.0030479 0.0072371)
        connectors: parent_frame=femur_distal_r
      PathPoint P2: (0.010071 -0.021322 0.0039158)
        connectors: parent_frame=tibia_proximal_r
    WISCO_Ligament ACLpl3: linear_stiffness=820 reference_strain=-0.05 reference_length=0.0265
      PathPoint P1: (-0.0012585 -0.00061438 0.005778)
        connectors: parent_frame=femur_distal_r
      PathPoint P2: (0.014123 -0.021793 0.0014326)
        connectors: parent_frame=tibia_proximal_r
    WISCO_Ligament ACLpl4: linear_stiffness=820 reference_strain=-0.12 reference_length=0.0223
      PathPoint P1: (-0.00049734 -0.0048442 0.0061921)
        connectors: parent_frame=femur_distal_r
      PathPoint P2: (0.014311 -0.021465 0.0048355)
        connectors: parent_frame=tibia_proximal_r
    WISCO_Ligament ACLpl5: linear_stiffness=820 reference_strain=-0.02 reference_length=0.024
      PathPoint P1: (-0.0015255 -0.0021886 0.0062745)
        connectors: parent_frame=femur_distal_r
      PathPoint P2: (0.012201 -0.021304 0.0017124)
        connectors: parent_frame=tibia_proximal_r
    WISCO_Ligament ACLpl6: linear_stiffness=820 reference_strain=-0.03 reference_length=0.0244
      PathPoint P1: (-0.0027392 -0.0031662 0.0068024)
        connectors: parent_frame=femur_distal_r
      PathPoint P2: (0.012531 -0.021976 0.0043276)
        connectors: parent_frame=tibia_proximal_r
    WISCO_Ligament ACLam1: linear_stiffness=820 reference_strain=-0.14 reference_length=0.0294
      PathPoint P1: (0.0011685 0.0031897 0.002616)
        connectors: parent_frame=femur_distal_r
      PathPoint P2: (0.016437 -0.020666 -0.0052185)
        connectors: parent_frame=tibia_proximal_r
    WISCO_Ligament ACLam2: linear_stiffness=820 reference_strain=-0.05 reference_length=0.0285
      PathPoint P1: (-0.0011691 0.0010628 0.0052107)
        connectors: parent_frame=femur_distal_r
      PathPoint P2: (0.014972 -0.021642 -0.00057088)
        connectors: parent_frame=tibia_proximal_r
    WISCO_Ligament ACLam3: linear_stiffness=820 reference_strain=-0.08 reference_length=0.0278
      PathPoint P1: (-0.0009364 0.0036972 0.0041682)
        connectors: parent_frame=femur_distal_r
      PathPoint P2: (0.011939 -0.019622 -0.0038468)
        connectors: parent_frame=tibia_proximal_r
    WISCO_Ligament ACLam4: linear_stiffness=820 reference_strain=-0.14 reference_length=0.0297
      PathPoint P1: (0.00084902 0.0010256 0.0040526)
        connectors: parent_frame=femur_distal_r
      PathPoint P2: (0.018517 -0.022158 -0.001854)
        connectors: parent_frame=tibia_proximal_r
    WISCO_Ligament ACLam5: linear_stiffness=820 reference_strain=-0.14 reference_length=0.0291
      PathPoint P1: (0.00056465 0.0025467 0.003565)
        connectors: parent_frame=femur_distal_r
      PathPoint P2: (0.016132 -0.02093 -0.0036845)
        connectors: parent_frame=tibia_proximal_r
    WISCO_Ligament ACLam6: linear_stiffness=820 reference_strain=-0.12 reference_length=0.0296
      PathPoint P1: (-0.00057334 0.0017233 0.0046087)
        connectors: parent_frame=femur_distal_r
      PathPoint P2: (0.016387 -0.02174 -0.0013455)
        connectors: parent_frame=tibia_proximal_r
    WISCO_Ligament PCLal1: linear_stiffness=900 reference_strain=0.03 reference_length=0.0352
      PathPoint P1: (0.0010633 -0.0026457 -0.010709)
        connectors: parent_frame=femur_distal_r
      PathPoint P2: (-0.014049 -0.03139 0.0029368)
        connectors: parent_frame=tibia_proximal_r
    WISCO_Ligament PCLal2: linear_stiffness=900 reference_strain=-0.1 reference_length=0.0281
      PathPoint P1: (0.0071112 -0.00473 -0.0046475)
        connectors: parent_frame=femur_distal_r
      PathPoint P2: (-0.010099 -0.02566 0.00288)
        connectors: parent_frame=tibia_proximal_r
    WISCO_Ligament PCLal3: linear_stiffness=900 reference_strain=0.03 reference_length=0.0335
      PathPoint P1: (0.0046634 -0.00088757 -0.0070401)
        connectors: parent_frame=femur_distal_r
      PathPoint P2: (-0.012055 -0.028137 0.0030545)
        connectors: parent_frame=tibia_proximal_r
    WISCO_Ligament PCLal4: linear_stiffness=900 reference_strain=-0.04 reference_length=0.0321
      PathPoint P1: (0.0048125 -0.0045282 -0.00815)
        connectors: parent_frame=femur_distal_r
      PathPoint P2: (-0.012695 -0.030786 -0.0022615)
        connectors: parent_frame=tibia_proximal_r
    WISCO_Ligament PCLal5: linear_stiffness=900 reference_strain=-0.02 reference_length=0.0327
      PathPoint P1: (0.0050176 -0.0034313 -0.0075544)
        connectors: parent_frame=femur_distal_r
      PathPoint P2: (-0.01241 -0.029808 0.00089554)
        connectors: parent_frame=tibia_proximal_r
    WISCO_Ligament PCLpm1: linear_stiffness=300 reference_strain=-0.05 reference_length=0.0326
      PathPoint P1: (0.0045535 -0.0054955 -0.0090256)
        connectors: parent_frame=femur_distal_r
      PathPoint P2: (-0.013917 -0.031775 -0.0033347)
        connectors: parent_frame=tibia_proximal_r
    WISCO_Ligament PCLpm2: linear_stiffness=300 reference_strain=-0.12 reference_length=0.0314
      PathPoint P1: (0.0022125 -0.008266 -0.010651)
        connectors: parent_frame=femur_distal_r
      PathPoint P2: (-0.017052 -0.032778 -0.0065962)
        connectors: parent_frame=tibia_proximal_r
    WISCO_Ligament PCLpm3: linear_stiffness=300 reference_strain=-0.08 reference_length=0.0282
      PathPoint P1: (0.0018148 -0.0061646 -0.010734)
        connectors: parent_frame=femur_distal_r
      PathPoint P2: (-0.013228 -0.029616 -0.0066956)
        connectors: parent_frame=tibia_proximal_r
    WISCO_Ligament PCLpm4: linear_stiffness=300 reference_strain=-0.12 reference_length=0.0349
      PathPoint P1: (0.0065082 -0.0078452 -0.0080514)
        connectors: parent_frame=femur_distal_r
      PathPoint P2: (-0.016262 -0.033443 -0.0014326)
        connectors: parent_frame=tibia_proximal_r
    WISCO_Ligament PCLpm5: linear_stiffness=300 reference_strain=-0.1 reference_length=0.0316
      PathPoint P1: (0.0048766 -0.0078242 -0.0097349)
        connectors: parent_frame=femur_distal_r
      PathPoint P2: (-0.014784 -0.032047 -0.0047864)
        connectors: parent_frame=tibia_proximal_r
    WISCO_Ligament LCL1: linear_stiffness=600 reference_strain=0.06 reference_length=0.0521
      PathPoint P1: (-0.0021714 0.0020776 0.035465)
        connectors: parent_frame=femur_distal_r
      PathPoint P2: (-0.013217 -0.048269 0.043157)
        connectors: parent_frame=tibia_proximal_r
    WISCO_Ligament LCL2: linear_stiffness=600 reference_strain=0.06 reference_length=0.059
      PathPoint P1: (-0.0021909 0.006045 0.035642)
        connectors: parent_frame=femur_distal_r
      PathPoint P2: (-0.014842 -0.050771 0.045564)
        connectors: parent_frame=tibia_proximal_r
    WISCO_Ligament LCL3: linear_stiffness=600 reference_strain=0.06 reference_length=0.0565
      PathPoint P1: (-0.000376 0.0039832 0.036523)
        connectors: parent_frame=femur_distal_r
      PathPoint P2: (-0.011881 -0.050605 0.045433)
        connectors: parent_frame=tibia_proximal_r
    WISCO_Ligament LCL4: linear_stiffness=600 reference_strain=0.06 reference_length=0.0617
      PathPoint P1: (-3.0505e-5 0.0065622 0.036488)
        connectors: parent_frame=femur_distal_r
      PathPoint P2: (-0.011705 -0.053176 0.0463)
        connectors: parent_frame=tibia_proximal_r
    WISCO_Ligament PT1: linear_stiffness=3000 reference_strain=0.02 reference_length=0.0478
      PathPoint P1: (0.0023888 -0.009575232 0.01486)
        connectors: parent_frame=patella_r
      PathPoint P2: (0.032815 -0.046612 0.01998)
        connectors: parent_frame=tibia_proximal_r
      PathWrap: wrap_object=PatTen_r method=hybrid
    WISCO_Ligament PT2: linear_stiffness=30000 reference_strain=0.02 reference_length=0.0506
      PathPoint P1: (0.0034486 -0.01150293 -0.011925)
        connectors: parent_frame=patella_r
      PathPoint P2: (0.033646 -0.049788 0.0046861)
        connectors: parent_frame=tibia_proximal_r
      PathWrap: wrap_object=PatTen_r method=hybrid
    WISCO_Ligament PT3: linear_stiffness=30000 reference_strain=0 reference_length=0.0519
      PathPoint P1: (0.0061702 -0.008735332 0.0034073)
        connectors: parent_frame=patella_r
      PathPoint P2: (0.037044 -0.050068 0.014577)
        connectors: parent_frame=tibia_proximal_r
      PathWrap: wrap_object=PatTen_r method=hybrid
    WISCO_Ligament PT4: linear_stiffness=30000 reference_strain=0.01 reference_length=0.0411
      PathPoint P1: (0.0028259 -0.01642144 0.0032342)
        connectors: parent_frame=patella_r
      PathPoint P2: (0.034705 -0.046151 0.013008)
        connectors: parent_frame=tibia_proximal_r
      PathWrap: wrap_object=PatTen_r method=hybrid
    WISCO_Ligament PT5: linear_stiffness=30000 reference_strain=0 reference_length=0.046
      PathPoint P1: (0.0032667 -0.01249393 0.010452)
        connectors: parent_frame=patella_r
      PathPoint P2: (0.035086 -0.048114 0.017907)
        connectors: parent_frame=tibia_proximal_r
      PathWrap: wrap_object=PatTen_r method=hybrid
    WISCO_Ligament PT6: linear_stiffness=3000 reference_strain=0.02 reference_length=0.0477
      PathPoint P1: (0.0058293 -0.01270133 -0.0037896)
        connectors: parent_frame=patella_r
      PathPoint P2: (0.035954 -0.048374 0.0099597)
        connectors: parent_frame=tibia_proximal_r
      PathWrap: wrap_object=PatTen_r method=hybrid
    WISCO_Ligament lPFL1: linear_stiffness=150 reference_strain=0.01 reference_length=0.0346
      PathPoint P1: (0.02 0.01 0.035456)
        connectors: parent_frame=femur_distal_r
      PathPoint P2: (-0.0015501 0.01082177 0.018582)
        connectors: parent_frame=patella_r
    WISCO_Ligament lPFL2: linear_stiffness=150 reference_strain=-0.1 reference_length=0.033
      PathPoint P1: (0.023 0.0005 0.0344)
        connectors: parent_frame=femur_distal_r
      PathPoint P2: (-0.00011041 -0.008670132 0.017223)
        connectors: parent_frame=patella_r
    WISCO_Ligament lPFL3: linear_stiffness=150 reference_strain=0.01 reference_length=0.0342
      PathPoint P1: (0.017602 0.0055075 0.036008)
        connectors: parent_frame=femur_distal_r
      PathPoint P2: (-0.0030893 0.002456768 0.021373)
        connectors: parent_frame=patella_r
    WISCO_Ligament lPFL4: linear_stiffness=150 reference_strain=-0.12 reference_length=0.0304
      PathPoint P1: (0.025 0.0070288 0.033883)
        connectors: parent_frame=femur_distal_r
      PathPoint P2: (0.00092173 0.004008768 0.021066)
        connectors: parent_frame=patella_r
    WISCO_Ligament lPFL5: linear_stiffness=150 reference_strain=0.01 reference_length=0.0333
      PathPoint P1: (0.019 0.008 0.035591)
        connectors: parent_frame=femur_distal_r
      PathPoint P2: (-0.0025654 0.006071768 0.021187)
        connectors: parent_frame=patella_r
    WISCO_Ligament lPFL6: linear_stiffness=150 reference_strain=0.01 reference_length=0.0336
      PathPoint P1: (0.019 0.003 0.035537)
        connectors: parent_frame=femur_distal_r
      PathPoint P2: (-0.0024546 -0.004656232 0.020621)
        connectors: parent_frame=patella_r
    WISCO_Ligament lPFL7: linear_stiffness=150 reference_strain=-0.08 reference_length=0.0309
      PathPoint P1: (0.023 0.0095 0.034)
        connectors: parent_frame=femur_distal_r
      PathPoint P2: (-0.00087067 0.007909768 0.020645)
        connectors: parent_frame=patella_r
    WISCO_Ligament lPFL8: linear_stiffness=150 reference_strain=-0.08 reference_length=0.031
      PathPoint P1: (0.0235 0.0042486 0.035)
        connectors: parent_frame=femur_distal_r
      PathPoint P2: (-5.8994e-5 -0.0008052324 0.021541)
        connectors: parent_frame=patella_r
    WISCO_Ligament mPFL1: linear_stiffness=150 reference_strain=-0.05 reference_length=0.0449
      PathPoint P1: (0.01482 0.014851 -0.037847)
        connectors: parent_frame=femur_distal_r
      PathPoint P2: (0.00022401 0.007770768 -0.018839)
        connectors: parent_frame=patella_r
    WISCO_Ligament mPFL2: linear_stiffness=150 reference_strain=0.01 reference_length=0.0495
      PathPoint P1: (0.014175 0.0056463 -0.039555)
        connectors: parent_frame=femur_distal_r
      PathPoint P2: (0.00109 -0.009672032 -0.016379)
        connectors: parent_frame=patella_r
    WISCO_Ligament mPFL3: linear_stiffness=150 reference_strain=0.01 reference_length=0.0485
      PathPoint P1: (0.011384 0.010327 -0.040161)
        connectors: parent_frame=femur_distal_r
      PathPoint P2: (0.00031179 -0.001101232 -0.020734)
        connectors: parent_frame=patella_r
    WISCO_Ligament mPFL4: linear_stiffness=150 reference_strain=-0.06 reference_length=0.0428
      PathPoint P1: (0.018919 0.010476 -0.036686)
        connectors: parent_frame=femur_distal_r
      PathPoint P2: (0.0032401 -5.023237e-5 -0.020656)
        connectors: parent_frame=patella_r
    WISCO_Ligament mPFL5: linear_stiffness=150 reference_strain=-0.03 reference_length=0.0445
      PathPoint P1: (0.015379 0.012476 -0.038367)
        connectors: parent_frame=femur_distal_r
      PathPoint P2: (0.00088381 0.002788768 -0.020659)
        connectors: parent_frame=patella_r
    WISCO_Ligament mPFL6: linear_stiffness=150 reference_strain=0.01 reference_length=0.0472
      PathPoint P1: (0.014485 0.0085394 -0.039286)
        connectors: parent_frame=femur_distal_r
      PathPoint P2: (0.0016164 -0.004529232 -0.02005)
        connectors: parent_frame=patella_r
    WISCO_Ligament MCLp1: linear_stiffness=500 reference_strain=0.05 reference_length=0.0307
      PathPoint P1: (-0.0080573 -0.0071292 -0.034763)
        connectors: parent_frame=femur_distal_r
      PathPoint P2: (-0.01695 -0.034752 -0.024723)
        connectors: parent_frame=tibia_proximal_r
      PathWrap: wrap_object=Med_LigP_r method=hybrid
    WISCO_Ligament MCLp2: linear_stiffness=500 reference_strain=0.05 reference_length=0.0314
      PathPoint P1: (-0.0055986 -0.0063413 -0.03542)
        connectors: parent_frame=femur_distal_r
      PathPoint P2: (-0.0154 -0.034926 -0.02684)
        connectors: parent_frame=tibia_proximal_r
      PathWrap: wrap_object=Med_LigP_r method=hybrid
    WISCO_Ligament MCLp3: linear_stiffness=500 reference_strain=0.02 reference_length=0.0302
      PathPoint P1: (-0.0072934 -0.0097238 -0.034157)
        connectors: parent_frame=femur_distal_r
      PathPoint P2: (-0.015144 -0.037335 -0.024747)
        connectors: parent_frame=tibia_proximal_r
      PathWrap: wrap_object=Med_LigP_r method=hybrid
    WISCO_Ligament MCLp4: linear_stiffness=500 reference_strain=-0.02 reference_length=0.0299
      PathPoint P1: (-0.0046077 -0.0095908 -0.034789)
        connectors: parent_frame=femur_distal_r
      PathPoint P2: (-0.01293 -0.037191 -0.02677)
        connectors: parent_frame=tibia_proximal_r
      PathWrap: wrap_object=Med_LigP_r method=hybrid
    WISCO_Ligament MCLp5: linear_stiffness=500 reference_strain=0.05 reference_length=0.0306
      PathPoint P1: (-0.0063085 -0.0083706 -0.034788)
        connectors: parent_frame=femur_distal_r
      PathPoint P2: (-0.015199 -0.03615 -0.025692)
        connectors: parent_frame=tibia_proximal_r
      PathWrap: wrap_object=Med_LigP_r method=hybrid
    WISCO_Ligament PFL1: linear_stiffness=440 reference_strain=0.01 reference_length=0.0442
      PathPoint P1: (-0.0017516 -0.0011259 0.034832)
        connectors: parent_frame=femur_distal_r
      PathPoint P2: (-0.023707 -0.039486 0.036077)
        connectors: parent_frame=tibia_proximal_r
    WISCO_Ligament PFL2: linear_stiffness=440 reference_strain=-0.12 reference_length=0.0389
      PathPoint P1: (-0.0009411 -0.0064366 0.033945)
        connectors: parent_frame=femur_distal_r
      PathPoint P2: (-0.021428 -0.039528 0.034615)
        connectors: parent_frame=tibia_proximal_r
    WISCO_Ligament PFL3: linear_stiffness=440 reference_strain=-0.03 reference_length=0.0477
      PathPoint P1: (0.00435 -0.0027203 0.036774)
        connectors: parent_frame=femur_distal_r
      PathPoint P2: (-0.023292 -0.041485 0.038865)
        connectors: parent_frame=tibia_proximal_r
    WISCO_Ligament PFL4: linear_stiffness=440 reference_strain=-0.14 reference_length=0.0427
      PathPoint P1: (0.0035 -0.007151 0.034517)
        connectors: parent_frame=femur_distal_r
      PathPoint P2: (-0.021261 -0.041671 0.038733)
        connectors: parent_frame=tibia_proximal_r
    WISCO_Ligament PFL5: linear_stiffness=440 reference_strain=-0.1 reference_length=0.0424
      PathPoint P1: (0.0017 -0.0048477 0.03444)
        connectors: parent_frame=femur_distal_r
      PathPoint P2: (-0.022384 -0.039633 0.036734)
        connectors: parent_frame=tibia_proximal_r
    WISCO_Ligament pCAP1: linear_stiffness=500 reference_strain=0.04 reference_length=0.0551
      PathPoint P1: (-0.00965 0.016897 -0.024009)
        connectors: parent_frame=femur_distal_r
      PathPoint P2: (-0.019173 -0.033168 -0.017395)
        connectors: parent_frame=tibia_proximal_r
      PathWrap: wrap_object=Capsule_r
    WISCO_Ligament pCAP2: linear_stiffness=500 reference_strain=0.04 reference_length=0.0567
      PathPoint P1: (-0.009839 0.016583 0.024113)
        connectors: parent_frame=femur_distal_r
      PathPoint P2: (-0.017485 -0.03569 0.021412)
        connectors: parent_frame=tibia_proximal_r
      PathWrap: wrap_object=Capsule_r
    WISCO_Ligament pCAP3: linear_stiffness=500 reference_strain=0.04 reference_length=0.0719
      PathPoint P1: (-0.00965 0.016897 -0.023009)
        connectors: parent_frame=femur_distal_r
      PathPoint P2: (-0.017476 -0.035694 0.020413)
        connectors: parent_frame=tibia_proximal_r
      PathWrap: wrap_object=Capsule_r
    WISCO_Ligament pCAP4: linear_stiffness=500 reference_strain=0.03 reference_length=0.067
      PathPoint P1: (-0.009839 0.016583 0.023113)
        connectors: parent_frame=femur_distal_r
      PathPoint P2: (-0.01918 -0.033164 -0.016395)
        connectors: parent_frame=tibia_proximal_r
      PathWrap: wrap_object=Capsule_r
    WISCO_Ligament pCAP5: linear_stiffness=500 reference_strain=0.04 reference_length=0.055
      PathPoint P1: (-0.00965 0.016897 -0.020009)
        connectors: parent_frame=femur_distal_r
      PathPoint P2: (-0.019206 -0.033152 -0.013396)
        connectors: parent_frame=tibia_proximal_r
      PathWrap: wrap_object=Capsule_r
    WISCO_Ligament pCAP6: linear_stiffness=500 reference_strain=0.04 reference_length=0.0568
      PathPoint P1: (-0.009839 0.016583 0.020113)
        connectors: parent_frame=femur_distal_r
      PathPoint P2: (-0.017453 -0.035705 0.017413)
        connectors: parent_frame=tibia_proximal_r
      PathWrap: wrap_object=Capsule_r
    WISCO_Ligament pCAP7: linear_stiffness=500 reference_strain=0.04 reference_length=0.055
      PathPoint P1: (-0.00965 0.016897 -0.016009)
        connectors: parent_frame=femur_distal_r
      PathPoint P2: (-0.019237 -0.033136 -0.0093957)
        connectors: parent_frame=tibia_proximal_r
      PathWrap: wrap_object=Capsule_r
    WISCO_Ligament pCAP8: linear_stiffness=500 reference_strain=0.04 reference_length=0.0568
      PathPoint P1: (-0.009839 0.016583 0.016113)
        connectors: parent_frame=femur_distal_r
      PathPoint P2: (-0.01742 -0.035721 0.013413)
        connectors: parent_frame=tibia_proximal_r
      PathWrap: wrap_object=Capsule_r
    WISCO_Ligament ITB_r: linear_stiffness=10000 reference_strain=0.56 reference_length=0.5704
      PathPoint P1: (-0.07 0.05 0.1)
        connectors: parent_frame=pelvis
      PathPoint P2: (-0.01 -0.0047 0.06)
        connectors: parent_frame=femur_r
      PathPoint P3: (0.0108 -0.031 0.0346)
        connectors: parent_frame=tibia_r
    ObjectGroup hip_add_r: members=(addbrev_r addlong_r addmagDist_r addmagIsch_r addmagMid_r addmagProx_r bflh_r grac_r pect_r semimem_r semiten_r)
    ObjectGroup hip_flex_r: members=(addbrev_r addlong_r glmin1_r grac_r iliacus_r pect_r psoas_r recfem_r sart_r tfl_r)
    ObjectGroup hip_ext_r: members=(addlong_r addmagDist_r addmagIsch_r addmagMid_r addmagProx_r bflh_r glmax1_r glmax2_r glmax3_r glmed1_r glmed2_r glmed3_r glmin3_r semimem_r semiten_r)
    ObjectGroup knee_flex_r: members=(bflh_r bfsh_r gaslat_r gasmed_r grac_r sart_r semimem_r semiten_r)
    ObjectGroup ankle_df_r: members=(edl_r ehl_r pertert_r tibant_r)
    ObjectGroup everter_r: members=(edl_r perbrev_r perlong_r pertert_r)
    ObjectGroup inverter_r: members=(ehl_r fdl_r fhl_r tibant_r tibpost_r)
    ObjectGroup ankle_pf_r: members=(fdl_r fhl_r gaslat_r gasmed_r perbrev_r perlong_r soleus_r tibpost_r)
    ObjectGroup hip_exrot_r: members=(gem_r glmin3_r piri_r quadfem_r)
    ObjectGroup hip_abd_r: members=(glmax1_r glmed1_r glmed2_r glmed3_r glmin1_r glmin2_r glmin3_r piri_r sart_r tfl_r)
    ObjectGroup hip_inrot_r: members=(glmed1_r glmed2_r glmed3_r glmin1_r iliacus_r psoas_r tfl_r)
    ObjectGroup knee_ext_r: members=(recfem_r vasint_r vaslat_r vasmed_r)
    ObjectGroup knee_abd_r
  MarkerSet:
    Marker Oglobal: (0 0 0)
      connectors: parent_frame=ground
    Marker Xglobal: (1 0 0)
      connectors: parent_frame=ground
    Marker Yglobal: (0 1 0)
      connectors: parent_frame=ground
    Marker Zglobal: (0 0 1)
      connectors: parent_frame=ground
    Marker Sacrum: (-0.18 0.01 0)
      connectors: parent_frame=pelvis
    Marker Sacral: (-0.18 0.01 0)
      connectors: parent_frame=pelvis
    Marker S2: (-0.18 0.01 0)
      connectors: parent_frame=pelvis
    Marker SACR: (-0.18 0.01 0)
      connectors: parent_frame=pelvis
    Marker VSAC: (-0.18 0.01 0)
      connectors: parent_frame=pelvis
    Marker R.ASIS: (0.02 0.01 0.128)
      connectors: parent_frame=pelvis
    Marker R.Asis: (0.02 0.01 0.128)
      connectors: parent_frame=pelvis
    Marker RASIS: (0.02 0.01 0.128)
      connectors: parent_frame=pelvis
    Marker RASI: (0.02 0.01 0.128)
      connectors: parent_frame=pelvis
    Marker R.Iliac: (-0.08 0.06 0.15)
      connectors: parent_frame=pelvis
    Marker R.PSIS: (-0.18 0.01 0.055)
      connectors: parent_frame=pelvis
    Marker R.Psis: (-0.18 0.01 0.055)
      connectors: parent_frame=pelvis
    Marker RPSIS: (-0.18 0.01 0.055)
      connectors: parent_frame=pelvis
    Marker RPSI: (-0.18 0.01 0.055)
      connectors: parent_frame=pelvis
    Marker R.Trochanter: (-0.1 -0.11 0.16)
      connectors: parent_frame=pelvis
    Marker R.GreatTroch: (-0.1 -0.11 0.16)
      connectors: parent_frame=pelvis
    Marker R.GTR: (-0.1 -0.11 0.16)
      connectors: parent_frame=pelvis
    Marker L.ASIS: (0.02 0.01 -0.128)
      connectors: parent_frame=pelvis
    Marker L.Asis: (0.02 0.01 -0.128)
      connectors: parent_frame=pelvis
    Marker LASIS: (0.02 0.01 -0.128)
      connectors: parent_frame=pelvis
    Marker LASI: (0.02 0.01 -0.128)
      connectors: parent_frame=pelvis
    Marker L.Iliac: (-0.08 0.06 -0.15)
      connectors: parent_frame=pelvis
    Marker L.PSIS: (-0.18 0.01 -0.055)
      connectors: parent_frame=pelvis
    Marker L.Psis: (-0.18 0.01 -0.055)
      connectors: parent_frame=pelvis
    Marker LPSIS: (-0.18 0.01 -0.055)
      connectors: parent_frame=pelvis
    Marker LPSI: (-0.18 0.01 -0.055)
      connectors: parent_frame=pelvis
    Marker L.Trochanter: (-0.1 -0.11 -0.16)
      connectors: parent_frame=pelvis
    Marker L.GreatTroch: (-0.1 -0.11 -0.16)
      connectors: parent_frame=pelvis
    Marker L.GTR: (-0.1 -0.11 -0.16)
      connectors: parent_frame=pelvis
    Marker Offset: (-0.18 0.22 0)
      connectors: parent_frame=torso
    Marker Sternum: (0.035 0.41 0)
      connectors: parent_frame=torso
    Marker Xiphoid: (0.035 0.41 0)
      connectors: parent_frame=torso
    Marker T10: (0 0 0)
      connectors: parent_frame=torso
    Marker CLAV: (0.035 0.45 0)
      connectors: parent_frame=torso
    Marker R.Clavicle: (0.035 0.45 0.025)
      connectors: parent_frame=torso
    Marker L.Clavicle: (0.035 0.45 -0.025)
      connectors: parent_frame=torso
    Marker STRN: (0.18 0.22 0)
      connectors: parent_frame=torso
    Marker RBAK: (0.18 0.22 0)
      connectors: parent_frame=torso
    Marker Thoracic: (0.18 0.22 0)
      connectors: parent_frame=torso
    Marker R.Scapula: (-0.12 -0.1 -0.08)
      connectors: parent_frame=torso
    Marker R.Scapula.Top: (0 0 0)
      connectors: parent_frame=torso
    Marker R.Scapula.Bottom: (0 0 0)
      connectors: parent_frame=torso
    Marker R.Angulus.Acromialis: (-0.085 0.435 0.184)
      connectors: parent_frame=torso
    Marker R.Trigonum.Spinae: (-0.126 0.4 0.119)
      connectors: parent_frame=torso
    Marker R.Angulus.Inferior: (-0.135 0.27 0.135)
      connectors: parent_frame=torso
    Marker C7.Spinous.Process: (-0.08 0.455 0)
      connectors: parent_frame=torso
    Marker Lumbar: (-0.08 0.455 0)
      connectors: parent_frame=torso
    Marker Neck: (-0.08 0.455 0)
      connectors: parent_frame=torso
    Marker L.Scapula: (-0.12 -0.1 0.08)
      connectors: parent_frame=torso
    Marker L.Scapula.Top: (0 0 0)
      connectors: parent_frame=torso
    Marker L.Scapula.Bottom: (0 0 0)
      connectors: parent_frame=torso
    Marker L.Angulus.Acromialis: (-0.085 0.435 -0.184)
      connectors: parent_frame=torso
    Marker L.Trigonum.Spinae: (-0.126 0.4 -0.119)
      connectors: parent_frame=torso
    Marker L.Angulus.Inferior: (-0.135 0.27 -0.135)
      connectors: parent_frame=torso
    Marker R.Shoulder: (-0.0488 0.45065 0.165)
      connectors: parent_frame=torso
    Marker R.ShoulderCenter: (-0.0488 0.44065 0.165)
      connectors: parent_frame=torso
    Marker R.ShoulderAnterior: (-0.0388 0.45065 0.165)
      connectors: parent_frame=torso
    Marker R.ShoulderPosterior: (-0.0588 0.45065 0.165)
      connectors: parent_frame=torso
    Marker RSHO: (-0.0488 0.45065 0.165)
      connectors: parent_frame=torso
    Marker L.Shoulder: (-0.0488 0.45065 -0.165)
      connectors: parent_frame=torso
    Marker L.ShoulderAnterior: (-0.0388 0.45065 -0.165)
      connectors: parent_frame=torso
    Marker L.ShoulderCenter: (-0.0488 0.45065 -0.165)
      connectors: parent_frame=torso
    Marker L.ShoulderPosterior: (-0.0588 0.45065 -0.165)
      connectors: parent_frame=torso
    Marker LSHO: (-0.0588 0.47065 -0.165)
      connectors: parent_frame=torso
    Marker Rear.Head: (-0.07166 0.2359 0)
      connectors: parent_frame=neckhead
    Marker Head.Rear: (-0.07166 0.2359 0)
      connectors: parent_frame=neckhead
    Marker RearHead: (-0.07166 0.2359 0)
      connectors: parent_frame=neckhead
    Marker HeadRear: (-0.07166 0.2359 0)
      connectors: parent_frame=neckhead
    Marker Front.Head: (0.1183 0.2359 0)
      connectors: parent_frame=neckhead
    Marker Head.Front: (0.1183 0.2359 0)
      connectors: parent_frame=neckhead
    Marker FrontHead: (0.1183 0.2359 0)
      connectors: parent_frame=neckhead
    Marker HeadFront: (0.1183 0.2359 0)
      connectors: parent_frame=neckhead
    Marker Top.Head: (0.0233 0.2959 0)
      connectors: parent_frame=neckhead
    Marker Head.Top: (0.0233 0.2959 0)
      connectors: parent_frame=neckhead
    Marker TopHead: (0.0233 0.2959 0)
      connectors: parent_frame=neckhead
    Marker HeadTop: (0.0233 0.2959 0)
      connectors: parent_frame=neckhead
    Marker R.Ear: (-0.07166 0.2359 0)
      connectors: parent_frame=neckhead
    Marker L.Ear: (-0.07166 0.2359 0)
      connectors: parent_frame=neckhead
    Marker RBHD: (-0.07166 0.2359 0)
      connectors: parent_frame=neckhead
    Marker RFHD: (-0.07166 0.2359 0)
      connectors: parent_frame=neckhead
    Marker LBHD: (-0.07166 0.2359 0)
      connectors: parent_frame=neckhead
    Marker LFHD: (-0.07166 0.2359 0)
      connectors: parent_frame=neckhead
    Marker HEDO: (-0.07166 0.2359 0)
      connectors: parent_frame=neckhead
    Marker HEDP: (-0.07166 0.2359 0)
      connectors: parent_frame=neckhead
    Marker HEDA: (-0.07166 0.2359 0)
      connectors: parent_frame=neckhead
    Marker HEDL: (-0.07166 0.2359 0)
      connectors: parent_frame=neckhead
    Marker C7: (0 0 0)
      connectors: parent_frame=neckhead
    Marker C7.Spinous.Process: (0 0 0)
      connectors: parent_frame=neckhead
    Marker R.Bicep: (0.04 -0.15 0)
      connectors: parent_frame=humerus_r
    Marker R.Biceps: (0.04 -0.15 0)
      connectors: parent_frame=humerus_r
    Marker R.Tricep: (-0.04 -0.15 0)
      connectors: parent_frame=humerus_r
    Marker R.Biceps.Lateral: (0.03 -0.15 0.02)
      connectors: parent_frame=humerus_r
    Marker R.Humerus: (0 0 0)
      connectors: parent_frame=humerus_r
    Marker R.ElbowCenter: (-0.01 -0.281 0)
      connectors: parent_frame=humerus_r
    Marker R.Elbow: (-0.01 -0.281 0.04)
      connectors: parent_frame=humerus_r
    Marker R.Elbow.Lateral: (-0.01 -0.281 0.04)
      connectors: parent_frame=humerus_r
    Marker R.Elbow.Lat: (-0.01 -0.281 0.04)
      connectors: parent_frame=humerus_r
    Marker RELB: (-0.01 -0.281 0.04)
      connectors: parent_frame=humerus_r
    Marker R.Elbow.Medial: (0 -0.281 -0.04)
      connectors: parent_frame=humerus_r
    Marker R.ElbowMedial: (0 -0.281 -0.04)
      connectors: parent_frame=humerus_r
    Marker R.Elbow.Med: (0 -0.281 -0.04)
      connectors: parent_frame=humerus_r
    Marker R.MElbow: (0 -0.281 -0.04)
      connectors: parent_frame=humerus_r
    Marker R.Melb: (0 -0.281 -0.04)
      connectors: parent_frame=humerus_r
    Marker R.Forearm: (0 -0.15 0)
      connectors: parent_frame=ulna_r
    Marker R.Wrist: (-0.025 -0.245 0.006)
      connectors: parent_frame=radius_r
    Marker R.WristCenter: (-0.025 -0.245 0.006)
      connectors: parent_frame=radius_r
    Marker R.Wrist.Lateral: (-0.025 -0.245 0.006)
      connectors: parent_frame=radius_r
    Marker R.Wrist.Lat: (-0.025 -0.245 0.006)
      connectors: parent_frame=radius_r
    Marker R.Wrist.Medial: (0.035 -0.245 0)
      connectors: parent_frame=radius_r
    Marker R.Wrist.Med: (0.035 -0.245 0)
      connectors: parent_frame=radius_r
    Marker R.Ulna: (0 -0.245 -0.03)
      connectors: parent_frame=radius_r
    Marker R.Radius: (0 -0.245 0.04)
      connectors: parent_frame=radius_r
    Marker RWRI: (-0.025 -0.245 0.006)
      connectors: parent_frame=radius_r
    Marker RWRA: (-0.025 -0.245 0.006)
      connectors: parent_frame=radius_r
    Marker RWRB: (0.035 -0.245 0)
      connectors: parent_frame=radius_r
    Marker R.Hand: (-0.03 -0.05 0)
      connectors: parent_frame=hand_r
    Marker L.Bicep: (0.04 -0.15 0)
      connectors: parent_frame=humerus_l
    Marker L.Biceps: (0.04 -0.15 0)
      connectors: parent_frame=humerus_l
    Marker L.Tricep: (-0.04 -0.15 0)
      connectors: parent_frame=humerus_l
    Marker L.Biceps.Lateral: (0.03 -0.15 -0.02)
      connectors: parent_frame=humerus_l
    Marker L.Humerus: (0 0 0)
      connectors: parent_frame=humerus_l
    Marker L.ElbowCenter: (0.01 -0.281 0)
      connectors: parent_frame=humerus_l
    Marker L.Elbow: (0.01 -0.281 -0.04)
      connectors: parent_frame=humerus_l
    Marker L.Elbow.Lateral: (0.01 -0.281 -0.04)
      connectors: parent_frame=humerus_l
    Marker L.ElbowLateral: (0.01 -0.281 -0.04)
      connectors: parent_frame=humerus_l
    Marker L.Elbow.Lat: (0.01 -0.281 -0.04)
      connectors: parent_frame=humerus_l
    Marker LELB: (0.01 -0.281 -0.04)
      connectors: parent_frame=humerus_l
    Marker L.Elbow.Medial: (-0.02 -0.281 0.04)
      connectors: parent_frame=humerus_l
    Marker L.ElbowMedial: (-0.02 -0.281 0.04)
      connectors: parent_frame=humerus_l
    Marker L.Elbow.Med: (-0.02 -0.281 0.04)
      connectors: parent_frame=humerus_l
    Marker L.MElbow: (-0.02 -0.281 0.04)
      connectors: parent_frame=humerus_l
    Marker L.Melb: (-0.02 -0.281 0.04)
      connectors: parent_frame=humerus_l
    Marker L.Forearm: (0 -0.15 0)
      connectors: parent_frame=ulna_l
    Marker L.Wrist: (-0.025 -0.245 -0.006)
      connectors: parent_frame=radius_l
    Marker L.WristCenter: (-0.025 -0.245 -0.006)
      connectors: parent_frame=radius_l
    Marker L.Wrist.Lateral: (-0.025 -0.245 -0.006)
      connectors: parent_frame=radius_l
    Marker L.Wrist.Lat: (-0.025 -0.245 -0.006)
      connectors: parent_frame=radius_l
    Marker L.Wrist.Medial: (0.035 -0.245 0)
      connectors: parent_frame=radius_l
    Marker L.Wrist.Med: (0.035 -0.245 0)
      connectors: parent_frame=radius_l
    Marker L.Ulna: (0 -0.245 0.03)
      connectors: parent_frame=radius_l
    Marker L.Radius: (0 -0.245 -0.04)
      connectors: parent_frame=radius_l
    Marker LWRI: (-0.025 -0.245 -0.006)
      connectors: parent_frame=radius_l
    Marker LWRA: (-0.025 -0.245 -0.006)
      connectors: parent_frame=radius_l
    Marker LWRB: (0.025 -0.245 0)
      connectors: parent_frame=radius_l
    Marker L.Hand: (-0.03 -0.05 0)
      connectors: parent_frame=hand_l
    Marker RKneeCenter: (0 -0.404 0)
      connectors: parent_frame=femur_r
    Marker R.Knee: (0 -0.404 0.05)
      connectors: parent_frame=femur_r
    Marker R.Knee.Lateral: (0 -0.404 0.05)
      connectors: parent_frame=femur_r
    Marker R.Knee.Lat: (0 -0.404 0.05)
      connectors: parent_frame=femur_r
    Marker RKNE: (0 -0.404 0.05)
      connectors: parent_frame=femur_r
    Marker R.Knee.Medial: (0 -0.404 -0.05)
      connectors: parent_frame=femur_r
    Marker R.Knee.Med: (0 -0.404 -0.05)
      connectors: parent_frame=femur_r
    Marker R.MKnee: (0 -0.404 -0.05)
      connectors: parent_frame=femur_r
    Marker R.Mkn: (0 -0.404 -0.05)
      connectors: parent_frame=femur_r
    Marker R.Thigh: (0.0179 -0.224 0.1147)
      connectors: parent_frame=femur_r
    Marker R.Thigh.Superior: (0.0179 -0.224 0.1147)
      connectors: parent_frame=femur_r
    Marker R.Thigh.Inferior: (0.0179 -0.224 0.1147)
      connectors: parent_frame=femur_r
    Marker R.Thigh.Lateral: (0.0179 -0.224 0.1147)
      connectors: parent_frame=femur_r
    Marker R.Thigh.Lateral.Superior: (0.0179 -0.224 0.1147)
      connectors: parent_frame=femur_r
    Marker R.Thigh.Upper: (0.0179 -0.264 0.0647)
      connectors: parent_frame=femur_r
    Marker R.Thigh.Lateral.Inferior: (0.0179 -0.264 0.0647)
      connectors: parent_frame=femur_r
    Marker R.Thigh.Front: (0.08 -0.324 0.0047)
      connectors: parent_frame=femur_r
    Marker R.Thigh.Medial.Inferior: (0.08 -0.324 0.0047)
      connectors: parent_frame=femur_r
    Marker R.Thigh.Rear: (-0.0479 -0.324 0.0047)
      connectors: parent_frame=femur_r
    Marker R.Thigh.Medial.Superior: (0.0179 -0.224 0.1147)
      connectors: parent_frame=femur_r
    Marker R.TH1: (0.0179 -0.224 0.1147)
      connectors: parent_frame=femur_r
    Marker R.TH2: (0.0179 -0.264 0.0647)
      connectors: parent_frame=femur_r
    Marker R.TH3: (0.0179 -0.264 0.0647)
      connectors: parent_frame=femur_r
    Marker R.TH4: (0.08 -0.324 0.0047)
      connectors: parent_frame=femur_r
    Marker RHJC: (0 0 0)
      connectors: parent_frame=femur_r
    Marker R_HJC: (0 0 0)
      connectors: parent_frame=femur_r
    Marker R.AnkleCenter: (-0.005 -0.385 0)
      connectors: parent_frame=tibia_r
    Marker RAnkleCenter: (-0.005 -0.385 0)
      connectors: parent_frame=tibia_r
    Marker R.Ankle: (-0.005 -0.385 0.053)
      connectors: parent_frame=tibia_r
    Marker R.Ankle.Lateral: (-0.005 -0.385 0.053)
      connectors: parent_frame=tibia_r
    Marker R.Ankle.Lat: (-0.005 -0.385 0.053)
      connectors: parent_frame=tibia_r
    Marker RANK: (-0.005 -0.41 0.053)
      connectors: parent_frame=tibia_r
    Marker R.Ankle.Medial: (0.006 -0.385 -0.038)
      connectors: parent_frame=tibia_r
    Marker R.AnkleMedial: (0.006 -0.385 -0.038)
      connectors: parent_frame=tibia_r
    Marker RankleMedial: (0.006 -0.385 -0.038)
      connectors: parent_frame=tibia_r
    Marker R.MAnkle: (0.006 -0.385 -0.038)
      connectors: parent_frame=tibia_r
    Marker R.Man: (0.006 -0.385 -0.038)
      connectors: parent_frame=tibia_r
    Marker R.Ankle.Med: (0.006 -0.385 -0.038)
      connectors: parent_frame=tibia_r
    Marker R.TibTub: (0.05 -0.06 0.01)
      connectors: parent_frame=tibia_r
    Marker R.Shank: (0.0104 -0.2322 0.0748)
      connectors: parent_frame=tibia_r
    Marker R.Leg.Lateral.Inferior: (0.0125 -0.3196 0.06)
      connectors: parent_frame=tibia_r
    Marker R.Shank.Superior: (0.0125 -0.3196 0.06)
      connectors: parent_frame=tibia_r
    Marker R.Shank.Inferior: (0.0125 -0.3196 0.06)
      connectors: parent_frame=tibia_r
    Marker R.Shank.Lateral: (0.0125 -0.3196 0.06)
      connectors: parent_frame=tibia_r
    Marker R.Shank.Upper: (0.0125 -0.3196 0.06)
      connectors: parent_frame=tibia_r
    Marker R.Leg.Medial.Inferior: (0.0125 -0.3196 0.06)
      connectors: parent_frame=tibia_r
    Marker R.Shank.Front: (0.0425 -0.3596 0)
      connectors: parent_frame=tibia_r
    Marker R.Leg.Superior: (0.0425 -0.3596 0)
      connectors: parent_frame=tibia_r
    Marker R.Shank.Rear: (-0.0325 -0.3596 0)
      connectors: parent_frame=tibia_r
    Marker RTIB: (0.0125 -0.3196 0.06)
      connectors: parent_frame=tibia_r
    Marker R.SH1: (0.0104 -0.2322 0.0748)
      connectors: parent_frame=tibia_r
    Marker R.SH2: (0.0125 -0.3196 0.06)
      connectors: parent_frame=tibia_r
    Marker R.SH3: (0.0125 -0.3196 0.06)
      connectors: parent_frame=tibia_r
    Marker R.SH4: (0.0125 -0.3196 0.06)
      connectors: parent_frame=tibia_r
    Marker RTIB: (0.0125 -0.3196 0.06)
      connectors: parent_frame=tibia_r
    Marker R.Patella: (0.02 0.002610768 0)
      connectors: parent_frame=patella_r
    Marker R.Toe: (0.19 0.018 0)
      connectors: parent_frame=calcn_r
    Marker R.ToeMedial: (0.19 0.018 0)
      connectors: parent_frame=calcn_r
    Marker R.ToeLateral: (0.19 0.018 0)
      connectors: parent_frame=calcn_r
    Marker RTOE: (0.19 0.018 0)
      connectors: parent_frame=calcn_r
    Marker R.MedFoot: (0.11 0.018 -0.04)
      connectors: parent_frame=calcn_r
    Marker R.Midfoot.Medial: (0.11 0.018 -0.04)
      connectors: parent_frame=calcn_r
    Marker R.Midfoot.Lateral: (0.11 0.018 0.04)
      connectors: parent_frame=calcn_r
    Marker R.Midfoot.Superior: (0.11 0.018 0.04)
      connectors: parent_frame=calcn_r
    Marker R.Methead1: (0.2 0.005 -0.045)
      connectors: parent_frame=calcn_r
    Marker R.MT1: (0.2 0.005 -0.045)
      connectors: parent_frame=calcn_r
    Marker R.MT0: (0.2 0.005 -0.045)
      connectors: parent_frame=calcn_r
    Marker R.Latfoot: (0.11 0.018 0.04)
      connectors: parent_frame=calcn_r
    Marker R.MT5: (0.15 0.005 0.055)
      connectors: parent_frame=calcn_r
    Marker R.Methead5: (0.15 0.005 0.055)
      connectors: parent_frame=calcn_r
    Marker R.Heel: (-0.03 0.018 -0.01)
      connectors: parent_frame=calcn_r
    Marker R.Hindfoot: (-0.03 0.018 -0.01)
      connectors: parent_frame=calcn_r
    Marker RHEE: (-0.03 0.018 -0.01)
      connectors: parent_frame=calcn_r
    Marker LKneeCenter: (0 -0.404 0)
      connectors: parent_frame=femur_l
    Marker L.Knee: (0 -0.404 -0.05)
      connectors: parent_frame=femur_l
    Marker L.Knee.Lateral: (0 -0.404 -0.05)
      connectors: parent_frame=femur_l
    Marker L.Knee.Lat: (0 -0.404 -0.05)
      connectors: parent_frame=femur_l
    Marker LKNE: (0 -0.404 -0.05)
      connectors: parent_frame=femur_l
    Marker L.Knee.Medial: (0 -0.404 0.05)
      connectors: parent_frame=femur_l
    Marker L.Knee.Med: (0 -0.404 0.05)
      connectors: parent_frame=femur_l
    Marker L.MKnee: (0 -0.404 0.05)
      connectors: parent_frame=femur_l
    Marker L.Mkn: (0 -0.404 0.05)
      connectors: parent_frame=femur_l
    Marker L.Thigh: (0.0179 -0.224 -0.1147)
      connectors: parent_frame=femur_l
    Marker L.Thigh.Superior: (0.0179 -0.224 -0.1147)
      connectors: parent_frame=femur_l
    Marker L.Thigh.Inferior: (0.0179 -0.224 -0.1147)
      connectors: parent_frame=femur_l
    Marker L.Thigh.Lateral: (0.0179 -0.224 -0.1147)
      connectors: parent_frame=femur_l
    Marker L.Thigh.Upper: (0.0179 -0.264 -0.0647)
      connectors: parent_frame=femur_l
    Marker L.Thigh.Front: (0.08 -0.324 -0.0047)
      connectors: parent_frame=femur_l
    Marker L.Thigh.Medial.Inferior: (0.08 -0.324 -0.0047)
      connectors: parent_frame=femur_l
    Marker L.Thigh.Rear: (-0.0479 -0.324 -0.0047)
      connectors: parent_frame=femur_l
    Marker L.Thigh.Lateral.Inferior: (0.0179 -0.264 -0.0647)
      connectors: parent_frame=femur_l
    Marker LTHI: (0.0179 -0.264 -0.0647)
      connectors: parent_frame=femur_l
    Marker L.TH1: (0.0179 -0.224 -0.1147)
      connectors: parent_frame=femur_l
    Marker L.TH2: (0.0179 -0.224 -0.1147)
      connectors: parent_frame=femur_l
    Marker L.TH3: (0.0179 -0.264 -0.0647)
      connectors: parent_frame=femur_l
    Marker L.TH4: (0.08 -0.324 -0.0047)
      connectors: parent_frame=femur_l
    Marker LHJC: (0 0 0)
      connectors: parent_frame=femur_l
    Marker L_HJC: (0 0 0)
      connectors: parent_frame=femur_l
    Marker LAnkleCenter: (-0.005 -0.385 0)
      connectors: parent_frame=tibia_l
    Marker L.Ankle: (-0.005 -0.385 -0.053)
      connectors: parent_frame=tibia_l
    Marker L.Ankle.Lateral: (-0.005 -0.385 -0.053)
      connectors: parent_frame=tibia_l
    Marker L.Ankle.Lat: (-0.005 -0.385 -0.053)
      connectors: parent_frame=tibia_l
    Marker LANK: (-0.005 -0.385 -0.053)
      connectors: parent_frame=tibia_l
    Marker L.Ankle.Medial: (0.006 -0.385 0.038)
      connectors: parent_frame=tibia_l
    Marker L.Ankle.Med: (0.006 -0.385 0.038)
      connectors: parent_frame=tibia_l
    Marker L.Shank: (0.0104 -0.2322 -0.0748)
      connectors: parent_frame=tibia_l
    Marker L.Leg.Superior: (0.0425 -0.3596 0)
      connectors: parent_frame=tibia_l
    Marker L.Shank.Upper: (0.0125 -0.3196 -0.06)
      connectors: parent_frame=tibia_l
    Marker L.Shank.Superior: (0.0125 -0.3196 -0.06)
      connectors: parent_frame=tibia_l
    Marker L.Shank.Inferior: (0.0125 -0.3196 -0.06)
      connectors: parent_frame=tibia_l
    Marker L.Shank.Lateral: (0.0125 -0.3196 -0.06)
      connectors: parent_frame=tibia_l
    Marker L.Leg.Lateral.Inferior: (0.0125 -0.3196 -0.06)
      connectors: parent_frame=tibia_l
    Marker L.TibTub: (0.05 -0.06 -0.01)
      connectors: parent_frame=tibia_l
    Marker L.Shank.Front: (0.0425 -0.3596 0)
      connectors: parent_frame=tibia_l
    Marker L.Shank.Rear: (-0.0325 -0.3596 0)
      connectors: parent_frame=tibia_l
    Marker L.Leg.Medial.Inferior: (0.0125 -0.3196 -0.06)
      connectors: parent_frame=tibia_l
    Marker LTIB: (0.0125 -0.3196 -0.06)
      connectors: parent_frame=tibia_l
    Marker L.MAnkle: (0.006 -0.3888 0.038)
      connectors: parent_frame=tibia_l
    Marker L.Man: (0.006 -0.3888 0.038)
      connectors: parent_frame=tibia_l
    Marker L.SH1: (0.0104 -0.2322 -0.0748)
      connectors: parent_frame=tibia_l
    Marker L.SH2: (0.0425 -0.3596 0)
      connectors: parent_frame=tibia_l
    Marker L.SH3: (0.0125 -0.3196 -0.06)
      connectors: parent_frame=tibia_l
    Marker L.SH4: (0.0125 -0.3196 -0.06)
      connectors: parent_frame=tibia_l
    Marker L.Patella: (0.02 0.02 0)
      connectors: parent_frame=patella_l
    Marker L.Toe: (0.19 0.018 0)
      connectors: parent_frame=calcn_l
    Marker L.ToeMedial: (0.19 0.018 0)
      connectors: parent_frame=calcn_l
    Marker L.ToeLateral: (0.19 0.018 0)
      connectors: parent_frame=calcn_l
    Marker LTOE: (0.19 0.018 0)
      connectors: parent_frame=calcn_l
    Marker L.Midfoot.Medial: (0.11 0.018 0.04)
      connectors: parent_frame=calcn_l
    Marker L.Midfoot.Lateral: (0.11 0.018 -0.04)
      connectors: parent_frame=calcn_l
    Marker L.Midfoot.Superior: (0.11 0.018 0)
      connectors: parent_frame=calcn_l
    Marker L.MedFoot: (0.11 0.018 0.04)
      connectors: parent_frame=calcn_l
    Marker L.Methead1: (0.2 0.005 0.045)
      connectors: parent_frame=calcn_l
    Marker L.LatFoot: (0.11 0.018 0.04)
      connectors: parent_frame=calcn_l
    Marker L.Methead5: (0.15 0.005 -0.055)
      connectors: parent_frame=calcn_l
    Marker L.Heel: (-0.03 0.018 0.01)
      connectors: parent_frame=calcn_l
    Marker L.Hindfoot: (-0.03 0.018 0.01)
      connectors: parent_frame=calcn_l
    Marker LHEE: (-0.03 0.018 0.01)
      connectors: parent_frame=calcn_l
    Marker L.MT1: (0.2 0.005 0.045)
      connectors: parent_frame=calcn_l
    Marker L.MTO: (0.2 0.005 0.045)
      connectors: parent_frame=calcn_l
    Marker L.MT0: (0.2 0.005 0.045)
      connectors: parent_frame=calcn_l
    Marker L.MT5: (0.15 0.005 -0.055)
      connectors: parent_frame=calcn_l
