# OpenSim document version 30516
ScaleTool fbKnee_3segMenisci-scaled:
  mass: 62 [kg]
  height: -1
  age: -1
  GenericModelMaker:
    model_file: ..\..\..\models\fbknee\lenhart\fbknee.osim
  ModelScaler:
    apply: true
    scaling_order: measurements
    marker_file: ../../../models/fbknee/motion_data/overground_17_osim.trc
    time_range: 0 2.57
    preserve_mass_distribution: true
    output_model_file: ..\..\..\..\build\sandbox\wipCOMAKMain\outputs/aclc01.osim
    output_scale_file: ..\..\..\..\build\sandbox\wipCOMAKMain\outputs/aclc01_scale_factors.xml
    MeasurementSet:
      Measurement pelvis_x: apply=true
        MarkerPair: markers=(R_HJC R.Knee)
        MarkerPair: markers=(L_HJC L.Knee)
        BodyScale pelvis: axes=X
      Measurement pelvis_y: apply=true
        MarkerPair: markers=(R_HJC R.Knee)
        MarkerPair: markers=(L_HJC L.Knee)
        BodyScale pelvis: axes=Y
      Measurement pelvis_z: apply=true
        MarkerPair: markers=(R_HJC L_HJC)
        BodyScale pelvis: axes=Z
      Measurement femur_r: apply=true
        MarkerPair: markers=(R_HJC R.Knee)
        MarkerPair: markers=(L_HJC L.Knee)
        BodyScale femur_r: axes=(X Y Z)
      Measurement femur_distal_r: apply=true
        MarkerPair: markers=(R_HJC R.Knee)
        MarkerPair: markers=(L_HJC L.Knee)
        BodyScale femur_distal_r: axes=(X Y Z)
        BodyScale femurMesh_frame: axes=(X Y Z)
        BodyScale tibiaMesh_distal_r: axes=(X Y Z)
        BodyScale patellaMesh_distal_r: axes=(X Y Z)
      Measurement patella_r: apply=true
        MarkerPair: markers=(R_HJC R.Knee)
        MarkerPair: markers=(L_HJC L.Knee)
        BodyScale patella_r: axes=(X Y Z)
      Measurement tibia_proximal_r: apply=true
        MarkerPair: markers=(R_HJC R.Knee)
        MarkerPair: markers=(L_HJC L.Knee)
        BodyScale tibia_proximal_r: axes=(X Y Z)
      Measurement tibia_r: apply=true
        MarkerPair: markers=(R.Knee R.Ankle)
        MarkerPair: markers=(L.Knee L.Ankle)
        BodyScale tibia_r: axes=(X Y Z)
      Measurement talus_r: apply=true
        MarkerPair: markers=(R.Knee R.Ankle)
        MarkerPair: markers=(L.Knee L.Ankle)
        BodyScale talus_r: axes=(X Y Z)
      Measurement calcn_r: apply=true
        MarkerPair: markers=(R_HJC R.Knee)
        MarkerPair: markers=(L_HJC L.Knee)
        MarkerPair: markers=(R.Knee R.Ankle)
        MarkerPair: markers=(L.Knee L.Ankle)
        BodyScale calcn_r: axes=(X Y Z)
      Measurement toes_r: apply=true
        MarkerPair: markers=(R_HJC R.Knee)
        MarkerPair: markers=(L_HJC L.Knee)
        MarkerPair: markers=(R.Knee R.Ankle)
        MarkerPair: markers=(L.Knee L.Ankle)
        BodyScale toes_r: axes=(X Y Z)
      Measurement neckhead: apply=true
        MarkerPair: markers=(R_HJC R.Shoulder)
        MarkerPair: markers=(L_HJC L.Shoulder)
        BodyScale neckhead: axes=(X Y Z)
      Measurement torso: apply=true
        MarkerPair: markers=(R_HJC R.Shoulder)
        MarkerPair: markers=(L_HJC L.Shoulder)
        BodyScale torso: axes=(X Y Z)
      Measurement humerus_r: apply=true
        MarkerPair: markers=(R.Shoulder R.Elbow)
        MarkerPair: markers=(L.Shoulder L.Elbow)
        BodyScale humerus_r: axes=(X Y Z)
      Measurement humerus_l: apply=true
        MarkerPair: markers=(R.Shoulder R.Elbow)
        MarkerPair: markers=(L.Shoulder L.Elbow)
        BodyScale humerus_l: axes=(X Y Z)
      Measurement ulna_r: apply=true
        MarkerPair: markers=(R.Elbow R.Wrist)
        MarkerPair: markers=(L.Elbow L.Wrist)
        BodyScale ulna_r: axes=(X Y Z)
      Measurement ulna_l: apply=true
        MarkerPair: markers=(R.Elbow R.Wrist)
        MarkerPair: markers=(L.Elbow L.Wrist)
        BodyScale ulna_l: axes=(X Y Z)
      Measurement radius_r: apply=true
        MarkerPair: markers=(R.Elbow R.Wrist)
        MarkerPair: markers=(L.Elbow L.Wrist)
        BodyScale radius_r: axes=(X Y Z)
      Measurement raduis_l: apply=true
        MarkerPair: markers=(R.Elbow R.Wrist)
        MarkerPair: markers=(L.Elbow L.Wrist)
        BodyScale radius_l: axes=(X Y Z)
      Measurement hand_r: apply=true
        MarkerPair: markers=(R.Elbow R.Wrist)
        MarkerPair: markers=(L.Elbow L.Wrist)
        BodyScale hand_r: axes=(X Y Z)
      Measurement hand_l: apply=true
        MarkerPair: markers=(R.Elbow R.Wrist)
        MarkerPair: markers=(L.Elbow L.Wrist)
        BodyScale hand_l: axes=(X Y Z)
      Measurement femur_l: apply=true
        MarkerPair: markers=(R_HJC R.Knee)
        MarkerPair: markers=(L_HJC L.Knee)
        BodyScale femur_l: axes=(X Y Z)
      Measurement patella_l: apply=true
        MarkerPair: markers=(R_HJC R.Knee)
        MarkerPair: markers=(L_HJC L.Knee)
        BodyScale patella_l: axes=(X Y Z)
      Measurement tibia_l: apply=true
        MarkerPair: markers=(R.Knee R.Ankle)
        MarkerPair: markers=(L.Knee L.Ankle)
        BodyScale tibia_l: axes=(X Y Z)
      Measurement talus_l: apply=true
        MarkerPair: markers=(R.Knee R.Ankle)
        MarkerPair: markers=(L.Knee L.Ankle)
        BodyScale talus_l: axes=(X Y Z)
      Measurement calcn_l: apply=true
        MarkerPair: markers=(R_HJC R.Knee)
        MarkerPair: markers=(L_HJC L.Knee)
        MarkerPair: markers=(R.Knee R.Ankle)
        MarkerPair: markers=(L.Knee L.Ankle)
        BodyScale calcn_l: axes=(X Y Z)
      Measurement toes_l: apply=true
        MarkerPair: markers=(R_HJC R.Knee)
        MarkerPair: markers=(L_HJC L.Knee)
        MarkerPair: markers=(R.Knee R.Ankle)
        MarkerPair: markers=(L.Knee L.Ankle)
        BodyScale toes_l: axes=(X Y Z)
  MarkerPlacer:
    apply: true
    marker_file: ../../../models/fbknee/motion_data/overground_17_osim.trc
    time_range: 0 0.1
    output_motion_file: ./scale1_output.mot
    output_model_file: aclc01.osim
    max_marker_movement: -1
    IKTaskSet:
      IKMarkerTask S2: apply=true weight=20
      IKMarkerTask R.ASIS: apply=true weight=30
      IKMarkerTask R.PSIS: apply=true weight=20
      IKMarkerTask L.ASIS: apply=true weight=30
      IKMarkerTask L.PSIS: apply=true weight=20
      IKMarkerTask L.Trochanter: apply=false weight=1
      IKMarkerTask L.GreatTroch: apply=false weight=1
      IKMarkerTask R.Clavicle: apply=true weight=0
      IKMarkerTask L.Clavicle: apply=true weight=0
      IKMarkerTask L.Scapula: apply=true weight=0
      IKMarkerTask R.Shoulder: apply=true weight=1
      IKMarkerTask L.Shoulder: apply=true weight=1
      IKMarkerTask R.Bicep: apply=true weight=0
      IKMarkerTask R.Elbow: apply=true weight=1
      IKMarkerTask R.MElbow: apply=false weight=1
      IKMarkerTask R.Forearm: apply=true weight=0
      IKMarkerTask R.Wrist: apply=true weight=1
      IKMarkerTask L.Bicep: apply=true weight=0
      IKMarkerTask L.Elbow: apply=true weight=1
      IKMarkerTask L.MElbow: apply=false weight=1
      IKMarkerTask R.Knee: apply=true weight=5
      IKMarkerTask R.MKnee: apply=false weight=5
      IKMarkerTask R.TH1: apply=true weight=0
      IKMarkerTask R.TH2: apply=true weight=0
      IKMarkerTask R.TH3: apply=true weight=0
      IKMarkerTask R_HJC: apply=true weight=200
      IKMarkerTask R.Ankle: apply=true weight=5
      IKMarkerTask R.MAnkle: apply=false weight=5
      IKMarkerTask R.SH1: apply=true weight=0
      IKMarkerTask R.SH2: apply=true weight=0
      IKMarkerTask R.SH3: apply=true weight=0
      IKMarkerTask R.SH4: apply=true weight=0
      IKMarkerTask R.MT1: apply=false weight=1
      IKMarkerTask R.MT5: apply=true weight=1
      IKMarkerTask R.Heel: apply=true weight=1
      IKMarkerTask L.Knee: apply=true weight=5
      IKMarkerTask L.MKnee: apply=false weight=5
      IKMarkerTask L.TH1: apply=true weight=0
      IKMarkerTask L.TH2: apply=true weight=0
      IKMarkerTask L.TH3: apply=true weight=0
      IKMarkerTask L.TH4: apply=true weight=0
      IKMarkerTask L_HJC: apply=true weight=200
      IKMarkerTask L.Ankle: apply=true weight=5
      IKMarkerTask L.MAnkle: apply=false weight=5
      IKMarkerTask L.SH1: apply=true weight=0
      IKMarkerTask L.SH2: apply=true weight=0
      IKMarkerTask L.SH3: apply=true weight=0
      IKMarkerTask L.Heel: apply=true weight=1
      IKMarkerTask L.MT1: apply=false weight=1
      IKMarkerTask L.MT5: apply=true weight=1
