# OpenSim document version 30512
Model ball_and_floor:
  gravity: 0 0 -9.80665
  WISCO_ContactMesh floorMesh: socket_parent_frame_connectee_name=../ground
      file_name=C:\github\wisco_opensim\build\sandbox\wipContactAnalysis\inputs\Geometry/floor_coarse.stl
    PhysicalOffsetFrame mesh_frame: socket_parent_connectee_name=../../ground translation=(0 0 0)
  WISCO_ContactMesh ballMesh: socket_parent_frame_connectee_name=../ball
      file_name=C:\github\wisco_opensim\build\sandbox\wipContactAnalysis\inputs\Geometry\ball_coarse.stl
    PhysicalOffsetFrame mesh_frame: socket_parent_connectee_name=../../ball translation=(0 0 0)
  Ground: meshes=./geometry/floor.stl
  BodySet:
    Body ball: mass=1 [kg] mass_center=(0 0 0) inertia=(0.01 0.01 0.01 0 0 0) meshes=./geometry/ball.stl
  JointSet:
    FreeJoint ground_to_ball: socket_parent_frame_connectee_name=ground_offset
        socket_child_frame_connectee_name=ball_offset
      Coordinate ground_to_ball_coord_0: default_value=0 range=(-1.570796 1.570796)
      Coordinate ground_to_ball_coord_1: default_value=0 range=(-1.570796 1.570796)
      Coordinate ground_to_ball_coord_2: default_value=0 range=(-1.570796 1.570796)
      Coordinate ground_to_ball_coord_3: default_value=0 range=(-1 1)
      Coordinate ground_to_ball_coord_4: default_value=0 range=(-1 1)
      Coordinate ground_to_ball_coord_5: default_value=0 range=(-1 1)
      PhysicalOffsetFrame ground_offset: socket_parent_connectee_name=../../ground translation=(0 0 0)
      PhysicalOffsetFrame ball_offset: socket_parent_connectee_name=../../ball translation=(0 0 0)
  ForceSet:
    WISCO_ElasticFoundationForce ball_contact: socket_target_mesh_connectee_name=../floorMesh
        socket_casting_mesh_connectee_name=../ballMesh verbose=2
      ContactParameters target_mesh_contact_params: youngs_modulus=30000 poissons_ratio=0.45 thickness=0.01
      ContactParameters casting_mesh_contact_params: youngs_modulus=30000 poissons_ratio=0.45 thickness=0.01
