# OpenSim document version 30512
Model FBKnee:
  gravity: 0 0 0
  length_units: m
  force_units: N
  WISCO_ContactMesh femurMesh: socket_parent_frame_connectee_name=femur_distal_r file_name=ACLC01-R-femur-cart.stl
    PhysicalOffsetFrame mesh_frame: socket_parent_connectee_name=../../femur_distal_r translation=(0 0 0)
  WISCO_ContactMesh tibiaMesh: socket_parent_frame_connectee_name=tibia_proximal_r file_name=ACLC01-R-tibia-cart.stl
    PhysicalOffsetFrame mesh_frame: socket_parent_connectee_name=../../tibia_proximal_r translation=(0 0 0)
  WISCO_ContactMesh patellaMesh: socket_parent_frame_connectee_name=patella_r
      file_name=ACLC01-R-patella-cart_shift-coarse.stl medial_lateral_axis=z
    PhysicalOffsetFrame mesh_frame: socket_parent_connectee_name=../../patella_r translation=(0 0 0)
  Ground
  BodySet:
    Body femur_distal_r: mass=0.01 [kg] mass_center=(0 0 0) inertia=(0.001 0.001 0.001 0 0 0)
        meshes=(ACLC01-R-femur-cart.stl ACLC01-R-femur.stl)
      WrapCylinder Capsule_r: xyz_body_rotation=(-0.0299066 0.02 0.331613) translation=(-0.004 -0.003 0) quadrant=all
          radius=0.018 length=0.5
    Body patella_r: mass=0.4875 mass_center=(0.0018 0.0264 0) inertia=(1.6e-5 7.4e-5 7.4e-5 0 0 0)
        meshes=(ACLC01-R-patella_shift.stl ACLC01-R-patella-cart_shift.stl)
      WrapEllipsoid PatTen_r: xyz_body_rotation=(0 0 0.01) translation=(0.0005 -0.009389232 0.00048233) quadrant=all
          dimensions=(0.005 0.008 0.012)
    Body tibia_proximal_r: mass=0.01 mass_center=(0 0 0) inertia=(0.001 0.001 0.001 0 0 0)
        meshes=(ACLC01-R-tibia.stl ACLC01-R-tibia-cart.stl ACLC01-R-fibula.stl)
      WrapEllipsoid Med_Lig_r: xyz_body_rotation=(-0.104907 -0.0349066 0.181613) translation=(0.001 -0.0346 -0.0187)
          quadrant=all dimensions=(0.03 0.018 0.012)
      WrapEllipsoid Med_LigP_r: xyz_body_rotation=(-0.139813 0.349066 0.181613) translation=(-0.0104 -0.0314 -0.0227)
          quadrant=all dimensions=(0.025 0.0054 0.0053)
  JointSet:
    CustomJoint gnd_pelvis: socket_parent_frame_connectee_name=ground socket_child_frame_connectee_name=femur_distal_r
      Coordinate pelvis_tilt: default_value=0 range=(-4.712389 4.712389) clamped=false locked=true
      Coordinate pelvis_list: default_value=0 range=(-4.712389 4.712389) clamped=false locked=true
      Coordinate pelvis_rot: default_value=0 range=(-4.712389 4.712389) clamped=false locked=true
      Coordinate pelvis_tx: default_value=0 range=(-10 10) clamped=false locked=true
      Coordinate pelvis_ty: default_value=0.969 range=(-10 10) clamped=false locked=true
      Coordinate pelvis_tz: default_value=0 range=(-10 10) clamped=false locked=true
      SpatialTransform:
        TransformAxis rotation1: coordinates=pelvis_tilt axis=(0 0 1) LinearFunction(coefficients=1 0)
        TransformAxis rotation2: coordinates=pelvis_list axis=(1 0 0) LinearFunction(coefficients=1 0)
        TransformAxis rotation3: coordinates=pelvis_rot axis=(0 1 0) LinearFunction(coefficients=1 0)
        TransformAxis translation1: coordinates=pelvis_tx axis=(1 0 0) LinearFunction(coefficients=1 0)
        TransformAxis translation2: coordinates=pelvis_ty axis=(0 1 0) LinearFunction(coefficients=1 0)
        TransformAxis translation3: coordinates=pelvis_tz axis=(0 0 1) LinearFunction(coefficients=1 0)
    CustomJoint pf_r: socket_parent_frame_connectee_name=../femur_distal_r
        socket_child_frame_connectee_name=../patella_r
      Coordinate pf_flex_r: default_value=0 range=(-1.570796 1.570796) clamped=true
      Coordinate pf_rot_r: default_value=0 range=(-1.570796 1.570796) clamped=true
      Coordinate pf_tilt_r: default_value=0 range=(-0.8726646 0.8726646) clamped=true
      Coordinate pf_tx_r: default_value=0.053 range=(-0.2 0.2) clamped=true
      Coordinate pf_ty_r: default_value=0.005 range=(-0.2 0.2) clamped=true
      Coordinate pf_tz_r: default_value=0.004 range=(-0.2 0.2) clamped=true
      SpatialTransform:
        TransformAxis rotation1: coordinates=pf_flex_r axis=(0 0 1)
          SimmSpline: x=(-6.28319 6.28319) y=(6.28319 -6.28319)
        TransformAxis rotation2: coordinates=pf_rot_r axis=(1 0 0) LinearFunction(coefficients=1 0)
        TransformAxis rotation3: coordinates=pf_tilt_r axis=(0 1 0) LinearFunction(coefficients=1 0)
        TransformAxis translation1: coordinates=pf_tx_r axis=(1 0 0) LinearFunction(coefficients=1 0)
        TransformAxis translation2: coordinates=pf_ty_r axis=(0 1 0) LinearFunction(coefficients=1 0)
        TransformAxis translation3: coordinates=pf_tz_r axis=(0 0 1) LinearFunction(coefficients=1 0)
    CustomJoint knee_r: socket_parent_frame_connectee_name=../femur_distal_r
        socket_child_frame_connectee_name=../tibia_proximal_r
      Coordinate knee_flex_r: default_value=0 range=(-0.1745329 2.792527) clamped=true
      Coordinate knee_add_r: default_value=0 range=(-0.8726646 0.8726646) clamped=true
      Coordinate knee_rot_r: default_value=0 range=(-0.8726646 0.8726646) clamped=true
      Coordinate knee_tx_r: default_value=0 range=(-0.2 0.2) clamped=true
      Coordinate knee_ty_r: default_value=0 range=(-0.2 0.2) clamped=true
      Coordinate knee_tz_r: default_value=0 range=(-0.2 0.2) clamped=true
      SpatialTransform:
        TransformAxis rotation1: coordinates=knee_flex_r axis=(0 0 1) LinearFunction(coefficients=-1 0)
        TransformAxis rotation2: coordinates=knee_add_r axis=(1 0 0) LinearFunction(coefficients=1 0)
        TransformAxis rotation3: coordinates=knee_rot_r axis=(0 1 0) LinearFunction(coefficients=1 0)
        TransformAxis translation1: coordinates=knee_tx_r axis=(1 0 0) LinearFunction(coefficients=1 0)
        TransformAxis translation2: coordinates=knee_ty_r axis=(0 1 0) LinearFunction(coefficients=1 0)
        TransformAxis translation3: coordinates=knee_tz_r axis=(0 0 1) LinearFunction(coefficients=1 0)
  ForceSet:
    WISCO_Ligament [values shared by the 75 below unless stated]: ligament_transition_strain=0.06
        defining_length_parameter=reference_strain
    WISCO_Ligament MCLd1: linear_stiffness=500 reference_strain=0.04
      PathPoint P1: socket_parent_frame_connectee_name=../../../femur_distal_r (-0.0017455 -0.00045737 -0.037269)
      PathPoint P2: socket_parent_frame_connectee_name=../../../tibia_proximal_r (-0.00021515 -0.031853 -0.031379)
      PathWrap pathwrap_: wrap_object=Med_Lig_r method=hybrid
      # Options: 'slack_length','reference_strain','reference_force' property to compute slack length.NOTE: other properties will be ignored.
    WISCO_Ligament MCLd2: linear_stiffness=500 reference_strain=-0.04
      PathPoint P1: socket_parent_frame_connectee_name=../../../femur_distal_r (0.0028899 -0.0006742 -0.038035)
      PathPoint P2: socket_parent_frame_connectee_name=../../../tibia_proximal_r (0.0049463 -0.031262 -0.031379)
      PathWrap pathwrap_: wrap_object=Med_Lig_r method=hybrid
      # Options: 'slack_length','reference_strain','reference_force' property to compute slack length.NOTE: other properties will be ignored.
    WISCO_Ligament MCLd3: linear_stiffness=500 reference_strain=0
      PathPoint P1: socket_parent_frame_connectee_name=../../../femur_distal_r (0.0038775 0.0036824 -0.039033)
      PathPoint P2: socket_parent_frame_connectee_name=../../../tibia_proximal_r (0.0054198 -0.032627 -0.031467)
      PathWrap pathwrap_: wrap_object=Med_Lig_r method=hybrid
      # Options: 'slack_length','reference_strain','reference_force' property to compute slack length.NOTE: other properties will be ignored.
    WISCO_Ligament MCLd4: linear_stiffness=500 reference_strain=0.04
      PathPoint P1: socket_parent_frame_connectee_name=../../../femur_distal_r (0.00096177 0.0014429 -0.038236)
      PathPoint P2: socket_parent_frame_connectee_name=../../../tibia_proximal_r (0.0026082 -0.032414 -0.031427)
      PathWrap pathwrap_: wrap_object=Med_Lig_r method=hybrid
      # Options: 'slack_length','reference_strain','reference_force' property to compute slack length.NOTE: other properties will be ignored.
    WISCO_Ligament MCLd5: linear_stiffness=500 reference_strain=0.04
      PathPoint P1: socket_parent_frame_connectee_name=../../../femur_distal_r (-0.0010825 0.0046882 -0.038669)
      PathPoint P2: socket_parent_frame_connectee_name=../../../tibia_proximal_r (-9.2907e-5 -0.033387 -0.031424)
      PathWrap pathwrap_: wrap_object=Med_Lig_r method=hybrid
      # Options: 'slack_length','reference_strain','reference_force' property to compute slack length.NOTE: other properties will be ignored.
    WISCO_Ligament MCLs1: linear_stiffness=500 reference_strain=0.04
      PathPoint P1: socket_parent_frame_connectee_name=../../../femur_distal_r (0.0053709 0.0083394 -0.04065)
      PathPoint P2: socket_parent_frame_connectee_name=../../../tibia_proximal_r (0.014323 -0.061131 -0.015466)
      PathWrap pathwrap_: wrap_object=Med_Lig_r method=hybrid
      # Options: 'slack_length','reference_strain','reference_force' property to compute slack length.NOTE: other properties will be ignored.
    WISCO_Ligament MCLs2: linear_stiffness=500 reference_strain=0.04
      PathPoint P1: socket_parent_frame_connectee_name=../../../femur_distal_r (0.0056326 0.015275 -0.040595)
      PathPoint P2: socket_parent_frame_connectee_name=../../../tibia_proximal_r (0.019234 -0.071438 -0.010942)
      PathWrap pathwrap_: wrap_object=Med_Lig_r method=hybrid
      # Options: 'slack_length','reference_strain','reference_force' property to compute slack length.NOTE: other properties will be ignored.
    WISCO_Ligament MCLs3: linear_stiffness=500 reference_strain=0.05
      PathPoint P1: socket_parent_frame_connectee_name=../../../femur_distal_r (-0.00040512 0.016541 -0.038878)
      PathPoint P2: socket_parent_frame_connectee_name=../../../tibia_proximal_r (0.0011834 -0.05547 -0.021542)
      PathWrap pathwrap_: wrap_object=Med_Lig_r method=hybrid
      # Options: 'slack_length','reference_strain','reference_force' property to compute slack length.NOTE: other properties will be ignored.
    WISCO_Ligament MCLs4: linear_stiffness=500 reference_strain=0.05
      PathPoint P1: socket_parent_frame_connectee_name=../../../femur_distal_r (-0.0011507 0.0080931 -0.039482)
      PathPoint P2: socket_parent_frame_connectee_name=../../../tibia_proximal_r (0.0065168 -0.074829 -0.017341)
      PathWrap pathwrap_: wrap_object=Med_Lig_r method=hybrid
      # Options: 'slack_length','reference_strain','reference_force' property to compute slack length.NOTE: other properties will be ignored.
    WISCO_Ligament MCLs5: linear_stiffness=500 reference_strain=0.05
      PathPoint P1: socket_parent_frame_connectee_name=../../../femur_distal_r (0.0025007 0.011534 -0.040624)
      PathPoint P2: socket_parent_frame_connectee_name=../../../tibia_proximal_r (0.011919 -0.065762 -0.016444)
      PathWrap pathwrap_: wrap_object=Med_Lig_r method=hybrid
      # Options: 'slack_length','reference_strain','reference_force' property to compute slack length.NOTE: other properties will be ignored.
    WISCO_Ligament MCLs6: linear_stiffness=500 reference_strain=0.05
      PathPoint P1: socket_parent_frame_connectee_name=../../../femur_distal_r (0.00092052 0.013423 -0.040266)
      PathPoint P2: socket_parent_frame_connectee_name=../../../tibia_proximal_r (0.0071679 -0.06075 -0.019481)
      PathWrap pathwrap_: wrap_object=Med_Lig_r method=hybrid
      # Options: 'slack_length','reference_strain','reference_force' property to compute slack length.NOTE: other properties will be ignored.
    WISCO_Ligament ACLpl1: linear_stiffness=820 reference_strain=0.03
      PathPoint P1: socket_parent_frame_connectee_name=../../../femur_distal_r (-0.0038361 -3.0877e-5 0.0070808)
      PathPoint P2: socket_parent_frame_connectee_name=../../../tibia_proximal_r (0.010136 -0.020482 -0.00036186)
      # Options: 'slack_length','reference_strain','reference_force' property to compute slack length.NOTE: other properties will be ignored.
    WISCO_Ligament ACLpl2: linear_stiffness=820 reference_strain=0.01
      PathPoint P1: socket_parent_frame_connectee_name=../../../femur_distal_r (-0.0038641 -0.0030479 0.0072371)
      PathPoint P2: socket_parent_frame_connectee_name=../../../tibia_proximal_r (0.010071 -0.021322 0.0039158)
      # Options: 'slack_length','reference_strain','reference_force' property to compute slack length.NOTE: other properties will be ignored.
    WISCO_Ligament ACLpl3: linear_stiffness=820 reference_strain=-0.05
      PathPoint P1: socket_parent_frame_connectee_name=../../../femur_distal_r (-0.0012585 -0.00061438 0.005778)
      PathPoint P2: socket_parent_frame_connectee_name=../../../tibia_proximal_r (0.014123 -0.021793 0.0014326)
      # Options: 'slack_length','reference_strain','reference_force' property to compute slack length.NOTE: other properties will be ignored.
    WISCO_Ligament ACLpl4: linear_stiffness=820 reference_strain=-0.12
      PathPoint P1: socket_parent_frame_connectee_name=../../../femur_distal_r (-0.00049734 -0.0048442 0.0061921)
      PathPoint P2: socket_parent_frame_connectee_name=../../../tibia_proximal_r (0.014311 -0.021465 0.0048355)
      # Options: 'slack_length','reference_strain','reference_force' property to compute slack length.NOTE: other properties will be ignored.
    WISCO_Ligament ACLpl5: linear_stiffness=820 reference_strain=-0.02
      PathPoint P1: socket_parent_frame_connectee_name=../../../femur_distal_r (-0.0015255 -0.0021886 0.0062745)
      PathPoint P2: socket_parent_frame_connectee_name=../../../tibia_proximal_r (0.012201 -0.021304 0.0017124)
      # Options: 'slack_length','reference_strain','reference_force' property to compute slack length.NOTE: other properties will be ignored.
    WISCO_Ligament ACLpl6: linear_stiffness=820 reference_strain=-0.03
      PathPoint P1: socket_parent_frame_connectee_name=../../../femur_distal_r (-0.0027392 -0.0031662 0.0068024)
      PathPoint P2: socket_parent_frame_connectee_name=../../../tibia_proximal_r (0.012531 -0.021976 0.0043276)
      # Options: 'slack_length','reference_strain','reference_force' property to compute slack length.NOTE: other properties will be ignored.
    WISCO_Ligament ACLam1: linear_stiffness=820 reference_strain=-0.14
      PathPoint P1: socket_parent_frame_connectee_name=../../../femur_distal_r (0.0011685 0.0031897 0.002616)
      PathPoint P2: socket_parent_frame_connectee_name=../../../tibia_proximal_r (0.016437 -0.020666 -0.0052185)
      # Options: 'slack_length','reference_strain','reference_force' property to compute slack length.NOTE: other properties will be ignored.
    WISCO_Ligament ACLam2: linear_stiffness=820 reference_strain=-0.05
      PathPoint P1: socket_parent_frame_connectee_name=../../../femur_distal_r (-0.0011691 0.0010628 0.0052107)
      PathPoint P2: socket_parent_frame_connectee_name=../../../tibia_proximal_r (0.014972 -0.021642 -0.00057088)
      # Options: 'slack_length','reference_strain','reference_force' property to compute slack length.NOTE: other properties will be ignored.
    WISCO_Ligament ACLam3: linear_stiffness=820 reference_strain=-0.08
      PathPoint P1: socket_parent_frame_connectee_name=../../../femur_distal_r (-0.0009364 0.0036972 0.0041682)
      PathPoint P2: socket_parent_frame_connectee_name=../../../tibia_proximal_r (0.011939 -0.019622 -0.0038468)
      # Options: 'slack_length','reference_strain','reference_force' property to compute slack length.NOTE: other properties will be ignored.
    WISCO_Ligament ACLam4: linear_stiffness=820 reference_strain=-0.14
      PathPoint P1: socket_parent_frame_connectee_name=../../../femur_distal_r (0.00084902 0.0010256 0.0040526)
      PathPoint P2: socket_parent_frame_connectee_name=../../../tibia_proximal_r (0.018517 -0.022158 -0.001854)
      # Options: 'slack_length','reference_strain','reference_force' property to compute slack length.NOTE: other properties will be ignored.
    WISCO_Ligament ACLam5: linear_stiffness=820 reference_strain=-0.14
      PathPoint P1: socket_parent_frame_connectee_name=../../../femur_distal_r (0.00056465 0.0025467 0.003565)
      PathPoint P2: socket_parent_frame_connectee_name=../../../tibia_proximal_r (0.016132 -0.02093 -0.0036845)
      # Options: 'slack_length','reference_strain','reference_force' property to compute slack length.NOTE: other properties will be ignored.
    WISCO_Ligament ACLam6: linear_stiffness=820 reference_strain=-0.12
      PathPoint P1: socket_parent_frame_connectee_name=../../../femur_distal_r (-0.00057334 0.0017233 0.0046087)
      PathPoint P2: socket_parent_frame_connectee_name=../../../tibia_proximal_r (0.016387 -0.02174 -0.0013455)
      # Options: 'slack_length','reference_strain','reference_force' property to compute slack length.NOTE: other properties will be ignored.
    WISCO_Ligament PCLal1: linear_stiffness=900 reference_strain=0.03
      PathPoint P1: socket_parent_frame_connectee_name=../../../femur_distal_r (0.0010633 -0.0026457 -0.010709)
      PathPoint P2: socket_parent_frame_connectee_name=../../../tibia_proximal_r (-0.014049 -0.03139 0.0029368)
      # Options: 'slack_length','reference_strain','reference_force' property to compute slack length.NOTE: other properties will be ignored.
    WISCO_Ligament PCLal2: linear_stiffness=900 reference_strain=-0.1
      PathPoint P1: socket_parent_frame_connectee_name=../../../femur_distal_r (0.0071112 -0.00473 -0.0046475)
      PathPoint P2: socket_parent_frame_connectee_name=../../../tibia_proximal_r (-0.010099 -0.02566 0.00288)
      # Options: 'slack_length','reference_strain','reference_force' property to compute slack length.NOTE: other properties will be ignored.
    WISCO_Ligament PCLal3: linear_stiffness=900 reference_strain=0.03
      PathPoint P1: socket_parent_frame_connectee_name=../../../femur_distal_r (0.0046634 -0.00088757 -0.0070401)
      PathPoint P2: socket_parent_frame_connectee_name=../../../tibia_proximal_r (-0.012055 -0.028137 0.0030545)
      # Options: 'slack_length','reference_strain','reference_force' property to compute slack length.NOTE: other properties will be ignored.
    WISCO_Ligament PCLal4: linear_stiffness=900 reference_strain=-0.04
      PathPoint P1: socket_parent_frame_connectee_name=../../../femur_distal_r (0.0048125 -0.0045282 -0.00815)
      PathPoint P2: socket_parent_frame_connectee_name=../../../tibia_proximal_r (-0.012695 -0.030786 -0.0022615)
      # Options: 'slack_length','reference_strain','reference_force' property to compute slack length.NOTE: other properties will be ignored.
    WISCO_Ligament PCLal5: linear_stiffness=900 reference_strain=-0.02
      PathPoint P1: socket_parent_frame_connectee_name=../../../femur_distal_r (0.0050176 -0.0034313 -0.0075544)
      PathPoint P2: socket_parent_frame_connectee_name=../../../tibia_proximal_r (-0.01241 -0.029808 0.00089554)
      # Options: 'slack_length','reference_strain','reference_force' property to compute slack length.NOTE: other properties will be ignored.
    WISCO_Ligament PCLpm1: linear_stiffness=300 reference_strain=-0.05
      PathPoint P1: socket_parent_frame_connectee_name=../../../femur_distal_r (0.0045535 -0.0054955 -0.0090256)
      PathPoint P2: socket_parent_frame_connectee_name=../../../tibia_proximal_r (-0.013917 -0.031775 -0.0033347)
      # Options: 'slack_length','reference_strain','reference_force' property to compute slack length.NOTE: other properties will be ignored.
    WISCO_Ligament PCLpm2: linear_stiffness=300 reference_strain=-0.12
      PathPoint P1: socket_parent_frame_connectee_name=../../../femur_distal_r (0.0022125 -0.008266 -0.010651)
      PathPoint P2: socket_parent_frame_connectee_name=../../../tibia_proximal_r (-0.017052 -0.032778 -0.0065962)
      # Options: 'slack_length','reference_strain','reference_force' property to compute slack length.NOTE: other properties will be ignored.
    WISCO_Ligament PCLpm3: linear_stiffness=300 reference_strain=-0.08
      PathPoint P1: socket_parent_frame_connectee_name=../../../femur_distal_r (0.0018148 -0.0061646 -0.010734)
      PathPoint P2: socket_parent_frame_connectee_name=../../../tibia_proximal_r (-0.013228 -0.029616 -0.0066956)
      # Options: 'slack_length','reference_strain','reference_force' property to compute slack length.NOTE: other properties will be ignored.
    WISCO_Ligament PCLpm4: linear_stiffness=300 reference_strain=-0.12
      PathPoint P1: socket_parent_frame_connectee_name=../../../femur_distal_r (0.0065082 -0.0078452 -0.0080514)
      PathPoint P2: socket_parent_frame_connectee_name=../../../tibia_proximal_r (-0.016262 -0.033443 -0.0014326)
      # Options: 'slack_length','reference_strain','reference_force' property to compute slack length.NOTE: other properties will be ignored.
    WISCO_Ligament PCLpm5: linear_stiffness=300 reference_strain=-0.1
      PathPoint P1: socket_parent_frame_connectee_name=../../../femur_distal_r (0.0048766 -0.0078242 -0.0097349)
      PathPoint P2: socket_parent_frame_connectee_name=../../../tibia_proximal_r (-0.014784 -0.032047 -0.0047864)
      # Options: 'slack_length','reference_strain','reference_force' property to compute slack length.NOTE: other properties will be ignored.
    WISCO_Ligament LCL1: linear_stiffness=600 reference_strain=0.06
      PathPoint P1: socket_parent_frame_connectee_name=../../../femur_distal_r (-0.0021714 0.0020776 0.035465)
      PathPoint P2: socket_parent_frame_connectee_name=../../../tibia_proximal_r (-0.013217 -0.048269 0.043157)
      # Options: 'slack_length','reference_strain','reference_force' property to compute slack length.NOTE: other properties will be ignored.
    WISCO_Ligament LCL2: linear_stiffness=600 reference_strain=0.06
      PathPoint P1: socket_parent_frame_connectee_name=../../../femur_distal_r (-0.0021909 0.006045 0.035642)
      PathPoint P2: socket_parent_frame_connectee_name=../../../tibia_proximal_r (-0.014842 -0.050771 0.045564)
      # Options: 'slack_length','reference_strain','reference_force' property to compute slack length.NOTE: other properties will be ignored.
    WISCO_Ligament LCL3: linear_stiffness=600 reference_strain=0.06
      PathPoint P1: socket_parent_frame_connectee_name=../../../femur_distal_r (-0.000376 0.0039832 0.036523)
      PathPoint P2: socket_parent_frame_connectee_name=../../../tibia_proximal_r (-0.011881 -0.050605 0.045433)
      # Options: 'slack_length','reference_strain','reference_force' property to compute slack length.NOTE: other properties will be ignored.
    WISCO_Ligament LCL4: linear_stiffness=600 reference_strain=0.06
      PathPoint P1: socket_parent_frame_connectee_name=../../../femur_distal_r (-3.0505e-5 0.0065622 0.036488)
      PathPoint P2: socket_parent_frame_connectee_name=../../../tibia_proximal_r (-0.011705 -0.053176 0.0463)
      # Options: 'slack_length','reference_strain','reference_force' property to compute slack length.NOTE: other properties will be ignored.
    WISCO_Ligament PT1: linear_stiffness=3000 reference_strain=0.02
      PathPoint P1: socket_parent_frame_connectee_name=../../../patella_r (0.0023888 -0.009575232 0.01486)
      PathPoint P2: socket_parent_frame_connectee_name=../../../tibia_proximal_r (0.032815 -0.046612 0.01998)
      PathWrap pathwrap_: wrap_object=PatTen_r method=hybrid
      # Options: 'slack_length','reference_strain','reference_force' property to compute slack length.NOTE: other properties will be ignored.
    WISCO_Ligament PT2: linear_stiffness=30000 reference_strain=0.02
      PathPoint P1: socket_parent_frame_connectee_name=../../../patella_r (0.0034486 -0.01150293 -0.011925)
      PathPoint P2: socket_parent_frame_connectee_name=../../../tibia_proximal_r (0.033646 -0.049788 0.0046861)
      PathWrap pathwrap_: wrap_object=PatTen_r method=hybrid
      # Options: 'slack_length','reference_strain','reference_force' property to compute slack length.NOTE: other properties will be ignored.
    WISCO_Ligament PT3: linear_stiffness=30000 reference_strain=0
      PathPoint P1: socket_parent_frame_connectee_name=../../../patella_r (0.0061702 -0.008735332 0.0034073)
      PathPoint P2: socket_parent_frame_connectee_name=../../../tibia_proximal_r (0.037044 -0.050068 0.014577)
      PathWrap pathwrap_: wrap_object=PatTen_r method=hybrid
      # Options: 'slack_length','reference_strain','reference_force' property to compute slack length.NOTE: other properties will be ignored.
    WISCO_Ligament PT4: linear_stiffness=30000 reference_strain=0.01
      PathPoint P1: socket_parent_frame_connectee_name=../../../patella_r (0.0028259 -0.01642144 0.0032342)
      PathPoint P2: socket_parent_frame_connectee_name=../../../tibia_proximal_r (0.034705 -0.046151 0.013008)
      PathWrap pathwrap_: wrap_object=PatTen_r method=hybrid
      # Options: 'slack_length','reference_strain','reference_force' property to compute slack length.NOTE: other properties will be ignored.
    WISCO_Ligament PT5: linear_stiffness=30000 reference_strain=0
      PathPoint P1: socket_parent_frame_connectee_name=../../../patella_r (0.0032667 -0.01249393 0.010452)
      PathPoint P2: socket_parent_frame_connectee_name=../../../tibia_proximal_r (0.035086 -0.048114 0.017907)
      PathWrap pathwrap_: wrap_object=PatTen_r method=hybrid
      # Options: 'slack_length','reference_strain','reference_force' property to compute slack length.NOTE: other properties will be ignored.
    WISCO_Ligament PT6: linear_stiffness=3000 reference_strain=0.02
      PathPoint P1: socket_parent_frame_connectee_name=../../../patella_r (0.0058293 -0.01270133 -0.0037896)
      PathPoint P2: socket_parent_frame_connectee_name=../../../tibia_proximal_r (0.035954 -0.048374 0.0099597)
      PathWrap pathwrap_: wrap_object=PatTen_r method=hybrid
      # Options: 'slack_length','reference_strain','reference_force' property to compute slack length.NOTE: other properties will be ignored.
    WISCO_Ligament lPFL1: linear_stiffness=150 reference_strain=0.01
      PathPoint P1: socket_parent_frame_connectee_name=../../../femur_distal_r (0.02 0.01 0.035456)
      PathPoint P2: socket_parent_frame_connectee_name=../../../patella_r (-0.0015501 0.01082177 0.018582)
      # Options: 'slack_length','reference_strain','reference_force' property to compute slack length.NOTE: other properties will be ignored.
    WISCO_Ligament lPFL2: linear_stiffness=150 reference_strain=-0.1
      PathPoint P1: socket_parent_frame_connectee_name=../../../femur_distal_r (0.023 0.0005 0.0344)
      PathPoint P2: socket_parent_frame_connectee_name=../../../patella_r (-0.00011041 -0.008670132 0.017223)
      # Options: 'slack_length','reference_strain','reference_force' property to compute slack length.NOTE: other properties will be ignored.
    WISCO_Ligament lPFL3: linear_stiffness=150 reference_strain=0.01
      PathPoint P1: socket_parent_frame_connectee_name=../../../femur_distal_r (0.017602 0.0055075 0.036008)
      PathPoint P2: socket_parent_frame_connectee_name=../../../patella_r (-0.0030893 0.002456768 0.021373)
      # Options: 'slack_length','reference_strain','reference_force' property to compute slack length.NOTE: other properties will be ignored.
    WISCO_Ligament lPFL4: linear_stiffness=150 reference_strain=-0.12
      PathPoint P1: socket_parent_frame_connectee_name=../../../femur_distal_r (0.025 0.0070288 0.033883)
      PathPoint P2: socket_parent_frame_connectee_name=../../../patella_r (0.00092173 0.004008768 0.021066)
      # Options: 'slack_length','reference_strain','reference_force' property to compute slack length.NOTE: other properties will be ignored.
    WISCO_Ligament lPFL5: linear_stiffness=150 reference_strain=0.01
      PathPoint P1: socket_parent_frame_connectee_name=../../../femur_distal_r (0.019 0.008 0.035591)
      PathPoint P2: socket_parent_frame_connectee_name=../../../patella_r (-0.0025654 0.006071768 0.021187)
      # Options: 'slack_length','reference_strain','reference_force' property to compute slack length.NOTE: other properties will be ignored.
    WISCO_Ligament lPFL6: linear_stiffness=150 reference_strain=0.01
      PathPoint P1: socket_parent_frame_connectee_name=../../../femur_distal_r (0.019 0.003 0.035537)
      PathPoint P2: socket_parent_frame_connectee_name=../../../patella_r (-0.0024546 -0.004656232 0.020621)
      # Options: 'slack_length','reference_strain','reference_force' property to compute slack length.NOTE: other properties will be ignored.
    WISCO_Ligament lPFL7: linear_stiffness=150 reference_strain=-0.08
      PathPoint P1: socket_parent_frame_connectee_name=../../../femur_distal_r (0.023 0.0095 0.034)
      PathPoint P2: socket_parent_frame_connectee_name=../../../patella_r (-0.00087067 0.007909768 0.020645)
      # Options: 'slack_length','reference_strain','reference_force' property to compute slack length.NOTE: other properties will be ignored.
    WISCO_Ligament lPFL8: linear_stiffness=150 reference_strain=-0.08
      PathPoint P1: socket_parent_frame_connectee_name=../../../femur_distal_r (0.0235 0.0042486 0.035)
      PathPoint P2: socket_parent_frame_connectee_name=../../../patella_r (-5.8994e-5 -0.0008052324 0.021541)
      # Options: 'slack_length','reference_strain','reference_force' property to compute slack length.NOTE: other properties will be ignored.
    WISCO_Ligament mPFL1: linear_stiffness=150 reference_strain=-0.05
      PathPoint P1: socket_parent_frame_connectee_name=../../../femur_distal_r (0.01482 0.014851 -0.037847)
      PathPoint P2: socket_parent_frame_connectee_name=../../../patella_r (0.00022401 0.007770768 -0.018839)
      # Options: 'slack_length','reference_strain','reference_force' property to compute slack length.NOTE: other properties will be ignored.
    WISCO_Ligament mPFL2: linear_stiffness=150 reference_strain=0.01
      PathPoint P1: socket_parent_frame_connectee_name=../../../femur_distal_r (0.014175 0.0056463 -0.039555)
      PathPoint P2: socket_parent_frame_connectee_name=../../../patella_r (0.00109 -0.009672032 -0.016379)
      # Options: 'slack_length','reference_strain','reference_force' property to compute slack length.NOTE: other properties will be ignored.
    WISCO_Ligament mPFL3: linear_stiffness=150 reference_strain=0.01
      PathPoint P1: socket_parent_frame_connectee_name=../../../femur_distal_r (0.011384 0.010327 -0.040161)
      PathPoint P2: socket_parent_frame_connectee_name=../../../patella_r (0.00031179 -0.001101232 -0.020734)
      # Options: 'slack_length','reference_strain','reference_force' property to compute slack length.NOTE: other properties will be ignored.
    WISCO_Ligament mPFL4: linear_stiffness=150 reference_strain=-0.06
      PathPoint P1: socket_parent_frame_connectee_name=../../../femur_distal_r (0.018919 0.010476 -0.036686)
      PathPoint P2: socket_parent_frame_connectee_name=../../../patella_r (0.0032401 -5.023237e-5 -0.020656)
      # Options: 'slack_length','reference_strain','reference_force' property to compute slack length.NOTE: other properties will be ignored.
    WISCO_Ligament mPFL5: linear_stiffness=150 reference_strain=-0.03
      PathPoint P1: socket_parent_frame_connectee_name=../../../femur_distal_r (0.015379 0.012476 -0.038367)
      PathPoint P2: socket_parent_frame_connectee_name=../../../patella_r (0.00088381 0.002788768 -0.020659)
      # Options: 'slack_length','reference_strain','reference_force' property to compute slack length.NOTE: other properties will be ignored.
    WISCO_Ligament mPFL6: linear_stiffness=150 reference_strain=0.01
      PathPoint P1: socket_parent_frame_connectee_name=../../../femur_distal_r (0.014485 0.0085394 -0.039286)
      PathPoint P2: socket_parent_frame_connectee_name=../../../patella_r (0.0016164 -0.004529232 -0.02005)
      # Options: 'slack_length','reference_strain','reference_force' property to compute slack length.NOTE: other properties will be ignored.
    WISCO_Ligament MCLp1: linear_stiffness=500 reference_strain=0.05
      PathPoint P1: socket_parent_frame_connectee_name=../../../femur_distal_r (-0.0080573 -0.0071292 -0.034763)
      PathPoint P2: socket_parent_frame_connectee_name=../../../tibia_proximal_r (-0.01695 -0.034752 -0.024723)
      PathWrap pathwrap_: wrap_object=Med_LigP_r method=hybrid
      # Options: 'slack_length','reference_strain','reference_force' property to compute slack length.NOTE: other properties will be ignored.
    WISCO_Ligament MCLp2: linear_stiffness=500 reference_strain=0.05
      PathPoint P1: socket_parent_frame_connectee_name=../../../femur_distal_r (-0.0055986 -0.0063413 -0.03542)
      PathPoint P2: socket_parent_frame_connectee_name=../../../tibia_proximal_r (-0.0154 -0.034926 -0.02684)
      PathWrap pathwrap_: wrap_object=Med_LigP_r method=hybrid
      # Options: 'slack_length','reference_strain','reference_force' property to compute slack length.NOTE: other properties will be ignored.
    WISCO_Ligament MCLp3: linear_stiffness=500 reference_strain=0.02
      PathPoint P1: socket_parent_frame_connectee_name=../../../femur_distal_r (-0.0072934 -0.0097238 -0.034157)
      PathPoint P2: socket_parent_frame_connectee_name=../../../tibia_proximal_r (-0.015144 -0.037335 -0.024747)
      PathWrap pathwrap_: wrap_object=Med_LigP_r method=hybrid
      # Options: 'slack_length','reference_strain','reference_force' property to compute slack length.NOTE: other properties will be ignored.
    WISCO_Ligament MCLp4: linear_stiffness=500 reference_strain=-0.02
      PathPoint P1: socket_parent_frame_connectee_name=../../../femur_distal_r (-0.0046077 -0.0095908 -0.034789)
      PathPoint P2: socket_parent_frame_connectee_name=../../../tibia_proximal_r (-0.01293 -0.037191 -0.02677)
      PathWrap pathwrap_: wrap_object=Med_LigP_r method=hybrid
      # Options: 'slack_length','reference_strain','reference_force' property to compute slack length.NOTE: other properties will be ignored.
    WISCO_Ligament MCLp5: linear_stiffness=500 reference_strain=0.05
      PathPoint P1: socket_parent_frame_connectee_name=../../../femur_distal_r (-0.0063085 -0.0083706 -0.034788)
      PathPoint P2: socket_parent_frame_connectee_name=../../../tibia_proximal_r (-0.015199 -0.03615 -0.025692)
      PathWrap pathwrap_: wrap_object=Med_LigP_r method=hybrid
      # Options: 'slack_length','reference_strain','reference_force' property to compute slack length.NOTE: other properties will be ignored.
    WISCO_Ligament PFL1: linear_stiffness=440 reference_strain=0.01
      PathPoint P1: socket_parent_frame_connectee_name=../../../femur_distal_r (-0.0017516 -0.0011259 0.034832)
      PathPoint P2: socket_parent_frame_connectee_name=../../../tibia_proximal_r (-0.023707 -0.039486 0.036077)
      # Options: 'slack_length','reference_strain','reference_force' property to compute slack length.NOTE: other properties will be ignored.
    WISCO_Ligament PFL2: linear_stiffness=440 reference_strain=-0.12
      PathPoint P1: socket_parent_frame_connectee_name=../../../femur_distal_r (-0.0009411 -0.0064366 0.033945)
      PathPoint P2: socket_parent_frame_connectee_name=../../../tibia_proximal_r (-0.021428 -0.039528 0.034615)
      # Options: 'slack_length','reference_strain','reference_force' property to compute slack length.NOTE: other properties will be ignored.
    WISCO_Ligament PFL3: linear_stiffness=440 reference_strain=-0.03
      PathPoint P1: socket_parent_frame_connectee_name=../../../femur_distal_r (0.00435 -0.0027203 0.036774)
      PathPoint P2: socket_parent_frame_connectee_name=../../../tibia_proximal_r (-0.023292 -0.041485 0.038865)
      # Options: 'slack_length','reference_strain','reference_force' property to compute slack length.NOTE: other properties will be ignored.
    WISCO_Ligament PFL4: linear_stiffness=440 reference_strain=-0.14
      PathPoint P1: socket_parent_frame_connectee_name=../../../femur_distal_r (0.0035 -0.007151 0.034517)
      PathPoint P2: socket_parent_frame_connectee_name=../../../tibia_proximal_r (-0.021261 -0.041671 0.038733)
      # Options: 'slack_length','reference_strain','reference_force' property to compute slack length.NOTE: other properties will be ignored.
    WISCO_Ligament PFL5: linear_stiffness=440 reference_strain=-0.1
      PathPoint P1: socket_parent_frame_connectee_name=../../../femur_distal_r (0.0017 -0.0048477 0.03444)
      PathPoint P2: socket_parent_frame_connectee_name=../../../tibia_proximal_r (-0.022384 -0.039633 0.036734)
      # Options: 'slack_length','reference_strain','reference_force' property to compute slack length.NOTE: other properties will be ignored.
    WISCO_Ligament pCAP1: linear_stiffness=500 reference_strain=0.04
      PathPoint P1: socket_parent_frame_connectee_name=../../../femur_distal_r (-0.00965 0.016897 -0.024009)
      PathPoint P2: socket_parent_frame_connectee_name=../../../tibia_proximal_r (-0.019173 -0.033168 -0.017395)
      PathWrap pathwrap_: wrap_object=Capsule_r
      # Options: 'slack_length','reference_strain','reference_force' property to compute slack length.NOTE: other properties will be ignored.
    WISCO_Ligament pCAP2: linear_stiffness=500 reference_strain=0.04
      PathPoint P1: socket_parent_frame_connectee_name=../../../femur_distal_r (-0.009839 0.016583 0.024113)
      PathPoint P2: socket_parent_frame_connectee_name=../../../tibia_proximal_r (-0.017485 -0.03569 0.021412)
      PathWrap pathwrap_: wrap_object=Capsule_r
      # Options: 'slack_length','reference_strain','reference_force' property to compute slack length.NOTE: other properties will be ignored.
    WISCO_Ligament pCAP3: linear_stiffness=500 reference_strain=0.04
      PathPoint P1: socket_parent_frame_connectee_name=../../../femur_distal_r (-0.00965 0.016897 -0.023009)
      PathPoint P2: socket_parent_frame_connectee_name=../../../tibia_proximal_r (-0.017476 -0.035694 0.020413)
      PathWrap pathwrap_: wrap_object=Capsule_r
      # Options: 'slack_length','reference_strain','reference_force' property to compute slack length.NOTE: other properties will be ignored.
    WISCO_Ligament pCAP4: linear_stiffness=500 reference_strain=0.03
      PathPoint P1: socket_parent_frame_connectee_name=../../../femur_distal_r (-0.009839 0.016583 0.023113)
      PathPoint P2: socket_parent_frame_connectee_name=../../../tibia_proximal_r (-0.01918 -0.033164 -0.016395)
      PathWrap pathwrap_: wrap_object=Capsule_r
      # Options: 'slack_length','reference_strain','reference_force' property to compute slack length.NOTE: other properties will be ignored.
    WISCO_Ligament pCAP5: linear_stiffness=500 reference_strain=0.04
      PathPoint P1: socket_parent_frame_connectee_name=../../../femur_distal_r (-0.00965 0.016897 -0.020009)
      PathPoint P2: socket_parent_frame_connectee_name=../../../tibia_proximal_r (-0.019206 -0.033152 -0.013396)
      PathWrap pathwrap_: wrap_object=Capsule_r
      # Options: 'slack_length','reference_strain','reference_force' property to compute slack length.NOTE: other properties will be ignored.
    WISCO_Ligament pCAP6: linear_stiffness=500 reference_strain=0.04
      PathPoint P1: socket_parent_frame_connectee_name=../../../femur_distal_r (-0.009839 0.016583 0.020113)
      PathPoint P2: socket_parent_frame_connectee_name=../../../tibia_proximal_r (-0.017453 -0.035705 0.017413)
      PathWrap pathwrap_: wrap_object=Capsule_r
      # Options: 'slack_length','reference_strain','reference_force' property to compute slack length.NOTE: other properties will be ignored.
    WISCO_Ligament pCAP7: linear_stiffness=500 reference_strain=0.04
      PathPoint P1: socket_parent_frame_connectee_name=../../../femur_distal_r (-0.00965 0.016897 -0.016009)
      PathPoint P2: socket_parent_frame_connectee_name=../../../tibia_proximal_r (-0.019237 -0.033136 -0.0093957)
      PathWrap pathwrap_: wrap_object=Capsule_r
      # Options: 'slack_length','reference_strain','reference_force' property to compute slack length.NOTE: other properties will be ignored.
    WISCO_Ligament pCAP8: linear_stiffness=500 reference_strain=0.04
      PathPoint P1: socket_parent_frame_connectee_name=../../../femur_distal_r (-0.009839 0.016583 0.016113)
      PathPoint P2: socket_parent_frame_connectee_name=../../../tibia_proximal_r (-0.01742 -0.035721 0.013413)
      PathWrap pathwrap_: wrap_object=Capsule_r
      # Options: 'slack_length','reference_strain','reference_force' property to compute slack length.NOTE: other properties will be ignored.
    WISCO_ElasticFoundationForce TF_contact: socket_target_mesh_connectee_name=../femurMesh
        socket_casting_mesh_connectee_name=../tibiaMesh min_proximity=0 max_proximity=0.1
        elastic_foundation_formulation=linear verbose=2
      ContactParameters target_mesh_contact_params: elastic_modulus=5000000 poissons_ratio=0.45 thickness=0.03
      ContactParameters casting_mesh_contact_params: elastic_modulus=5000000 poissons_ratio=0.45 thickness=0.03
    WISCO_ElasticFoundationForce PF_contact: socket_target_mesh_connectee_name=../femurMesh
        socket_casting_mesh_connectee_name=../patellaMesh min_proximity=0 max_proximity=0.1
        elastic_foundation_formulation=linear verbose=2
      ContactParameters target_mesh_contact_params: elastic_modulus=5000000 poissons_ratio=0.45 thickness=0.04
      ContactParameters casting_mesh_contact_params: elastic_modulus=5000000 poissons_ratio=0.45 thickness=0.04
    BushingForce TF_bushing: socket_frame1_connectee_name=../femur_distal_r
        socket_frame2_connectee_name=../tibia_proximal_r rotational_damping=(0.2 0.2 0.2) [Nm/(rad/s)]
        translational_damping=(1 1 1) [N/(m/s)]
    BushingForce PF_bushing: socket_frame1_connectee_name=../femur_distal_r socket_frame2_connectee_name=../patella_r
        rotational_damping=(0.2 0.2 0.2) translational_damping=(1 1 1) translational_stiffness=(0 10000 0)
